# ----------------------------------------------------------------------------------------------------------------------------------------------
# EXAMPLE  1.1 : number representation - base 10
# ----------------------------------------------------------------------------------------------------------------------------------------------
# define an integer number
a := 8*10^0 + 3*10^1 + 6*10^2 + 5*10^3
a = 5638
# define an fractional number
b := 4*10^-1 + 7*10^-2 + 9*10^-3 + 2*10^-4
b = 0.4792
# combined
c := a + b
c = 5638.48
# ----------------------------------------------------------------------------------------------------------------------------------------------
