# ----------------------------------------------------------------------------------------------------------------------------------------------
# ----------------------------------------------------------------------------------------------------------------------------------------------
# EXAMPLE  2.2 : base conversion from decimal to binary (simple method)
# ----------------------------------------------------------------------------------------------------------------------------------------------
# define two useful functions using x defined as
x := 4/3
x = 1.33333
# floor gives the greatest integer less than or equal to x
floor(x) = 1
# ceil gives the least integer greater than or equal to x
ceil(x) = 2
# Now extract the quotient of a number and store it in a subscripted variable y
# then calculate remainders and store them in a subscripted variable c
i := 0 .. 12
y[i] := 5638
y[i + 1] := floor(y[i]/2)
c[i] := y[i] - 2*y[i + 1]
# show the binary result
# horizontally with this trick
binary := sum(c[i]*10^i, i)
y = [5638; 2819; 1409; 704; 352; 176; 88; 44; 22; 11; 5; 2; 1; 0]
c = [0; 1; 1; 0; 0; 0; 0; 0; 0; 1; 1; 0; 1]
binary = 1011000000110
# and check that the decimal
# number is retrieved
check := sum(c[i]*2^i, i)
check = 5638
# ----------------------------------------------------------------------------------------------------------------------------------------------
