# ----------------------------------------------------------------------------------------------------------------------------------------------
# EXAMPLE  1.3 : base conversion from decimal to binary (fancy method)
# ----------------------------------------------------------------------------------------------------------------------------------------------
y[0] := 5638
x := y[0]
M := floor(ln(x)/ln(2))
M = 12  # M+1 is the number of binary digits
i := 0 .. M
f(x, i) := (mod(x, 2^(i + 1)) ≥ 2^i)  # this is a function that finds the i'th  digit in the binary number
# the argument on the right hand side is a conditional test  and f has the value 1 if the test is satisfied or 0 if it is not whereas mod(a,b) is the remainder on dividing a by b
c[i] := f(x, i)
# check that the binary number is retrieved
binary := sum(c[i]*10^i, i)
binary = 1011000000110
# check that the decimal number is retrieved
check := sum(c[i]*2^i, i)
check = 5638
# ----------------------------------------------------------------------------------------------------------------------------------------------
