# ----------------------------------------------------------------------------------------------------------------------------------------------
# ----------------------------------------------------------------------------------------------------------------------------------------------
# EXAMPLE  1.4 : conversion from decimal to binary for a fraction
# ----------------------------------------------------------------------------------------------------------------------------------------------
# store the number as a subscripted variable y
y[0] := 0.1
# set binary string length
im := 9
i := 0 .. im
# multiply by 2 | retrieve integer part
y[i + 1] := 2*y[i]
d[i + 1] := floor(y[i + 1])
# subtract the integer part to leave the fractional part
y[i + 1] := y[i + 1] - d[i + 1]
c[i] := d[i + 1] - 2*d[i]
binary := sum(c[i]*10^i, i)
# show the binary result
# horizontally with this trick
# in reverse order the binary string is
binary = 110011000
y = [0.1; 0.2; 0.4; 0.8; 0.6; 0.2; 0.4; 0.8; 0.6; 0.2; 0.4]
d = [0; 0; 0; 0; 1; 3; 6; 12; 25; 51; 102]
c = [0; 0; 0; 1; 1; 0; 0; 1; 1; 0]
# check the decimal value
i := 1 .. im + 1
check := sum(c[i - 1]*2^(-i), i)
check = 0.0996094
y[0] - check = 0.000390625  # which is not zero because the binary string was chopped off
# ----------------------------------------------------------------------------------------------------------------------------------------------
