# ----------------------------------------------------------------------------------------------------------------------------------------------
# ----------------------------------------------------------------------------------------------------------------------------------------------
# EXAMPLE  1.5 : conversion from decimal to binary for a fraction (part 2)
# ----------------------------------------------------------------------------------------------------------------------------------------------
# store the number as subscripted variable y
y[0] := 0.1
# set binary string length
im := 14
i := 0 .. im
# multiply by 2 | retrieve integer part
y[i + 1] := 2*y[i]
d[i + 1] := floor(y[i + 1])
# subtract the integer part to leave the fractional part
y[i + 1] := y[i + 1] - d[i + 1]
c[i] := d[i + 1] - 2*d[i]
binary := sum(c[i]*10^i, i)
# show the binary result
# horizontally with this trick
binary = 1100110011000
# in reverse order the binary string is
y = [0.1; 0.2; 0.4; 0.8; 0.6; 0.2; 0.4; 0.8; 0.6; 0.2; 0.4; 0.8; 0.6; 0.2; 0.4; 0.8]
d = [0; 0; 0; 0; 1; 3; 6; 12; 25; 51; 102; 204; 409; 819; 1638; 3276]
c = [0; 0; 0; 1; 1; 0; 0; 1; 1; 0; 0; 1; 1; 0; 0]
i := 1 .. im + 1
# check the decimal value
check := sum(c[i - 1]*2^(-i), i)
check = 0.0999756
y[0] - check = 2.44141e-5  # which is not zero because the binary string was chopped
# ----------------------------------------------------------------------------------------------------------------------------------------------
