# ----------------------------------------------------------------------------------------------------------------------------------------------
# ----------------------------------------------------------------------------------------------------------------------------------------------
# EXAMPLE  1.6 : Loss of numerical significance for x close to zero in the exponential function
# ----------------------------------------------------------------------------------------------------------------------------------------------
# define two exponential functions
g(x) := exp(x)  # and use them to define
h(x) := exp(-x)
f(x) := (g(x) - h(x))*(2*x)^-1
# To compare this with an exact value subtract the Taylor Series for exp(-x) from that for exp(x) and divide by 2x to obtain
# (See Eq. (2.22) in Section 2.3)
# to a high degree of precision ee(x) gives the exact value
ee(x) := 1 + x^2/3! + x^4/5! + x^6/7! + x^8/9! + x^10/11! + x^12/13! + x^14/15! + x^16/17!
# now choose some x value
# and compare the result of f(x) and ee(x)
x := 0.0000001
g(x) = 1
h(x) = 1
f(x) = 1
# both should be the same but are not
ee(x) = 1
# now choose some x value
# and compare the result of f(x) and ee(x)
x := 0.00000001
g(x) = 1
h(x) = 1
f(x) = 1
# both should be the same but are not
ee(x) = 1
# now choose some x value
# and compare the result of f(x) and ee(x)
x := 0.000000001
g(x) = 1
h(x) = 1
f(x) = 1
# both should be the same but are not
ee(x) = 1
# the conclusion is that there is a loss of significance
# ----------------------------------------------------------------------------------------------------------------------------------------------
