# ----------------------------------------------------------------------------------------------------------------------------------------------
# ----------------------------------------------------------------------------------------------------------------------------------------------
# EXAMPLE  1.7 : Two ways of summing an increment such as x=x+h
# ----------------------------------------------------------------------------------------------------------------------------------------------
# Continued positive incrementation of a variable leads to loss of numerical significance after a large number of increments. In each of the following three cases the exact result should be N*h where h is the step size and N is the number of steps. The correct way of performing this operation is to compute the term at each iteration as j*h and not from the incremental sum.
N := 100
j := 1 .. N
h := 1/N
h = 0.01
N*h = 1
xsum := sum(h, j)
xsum = 1
xsum - N*h = 6.66134e-16
N := 10000
j := 1 .. N
h := 1/N
h = 0.0001
N*h = 1
xsum := sum(h, j)
xsum = 1
xsum - N*h = -9.38138e-14
N := 1000000
j := 1 .. N
h := 1/N
h = 1e-6
N*h = 1
xsum := sum(h, j)
xsum = 1
xsum - N*h = 7.91811e-12
# The conclusion is that the loss of numerical significance increases with increasing number of increments
# ----------------------------------------------------------------------------------------------------------------------------------------------
