# ----------------------------------------------------------------------------------------------------------------------------------------------
# -------------------------------------------------------------------------------------------------------------------------------------------
# EXAMPLE  1.8 : Recurrence for the spherical Bessel function and the associated error
# -------------------------------------------------------------------------------------------------------------------------------------------
# (See Section 2.1 and 2.6 for information on expressions used here for this function)
# Maximum order
n := 10
# index ranges
M := n + 3
# argument range
i := 1 .. 10
r[i] := i
# note that the recurrence starts at n+3
m := M - 1 .. M
# set up starting values using the asymptotic expansion for large orders
j[m, i] := sqrt(e/2)*(e*r[i])^m/(2*m + 1)^(m + 1)
# do downward recurrence in order at each value of the argument
m := 0 .. M - 2
j[M - m - 2, i] := (2*M - 2*m - 1)/r[i]*j[M - m - 1, i] - j[M - m, i]
m := 0 .. M
# calculate the normalization constant and normalize orders 0 to n at each value of the argument
σ[i] := sum((2*m + 1)*j[m, i]^2, m)
σ[i] := sqrt(σ[i])
m := 0 .. n
j[m, i] := j[m, i]/σ[i]
# for a numerical check compute the first two Bessel functions from their explicit expressions
j0[i] := sin(r[i])/r[i]
j1[i] := 1/r[i]*(sin(r[i])/r[i] - cos(r[i]))
# compare exact and recurrence values for order 0 on the grid in argument r and check the absolute error
j0[i] = [0.841471; 0.454649; 0.04704; -0.189201; -0.191785; -0.0465692; 0.0938552; 0.12367; 0.0457909; -0.0544021]
j[0, i] = [0.841471; 0.454649; 0.04704; -0.189201; -0.191785; -0.0465693; 0.0938553; 0.123672; 0.0458199; -0.0543526]
|j[0, i] - j0[i]| = [1.11022e-16; 0; 4.85723e-17; 6.31162e-14; 3.42887e-11; 2.05936e-9; 2.64171e-8; 2.36964e-6; 2.89619e-5; 4.94929e-5]
# compare exact and recurrence values for order 1 on the grid in argument r and check the absolute error
j1[i] = [0.301169; 0.435398; 0.345677; 0.116111; -0.0950894; -0.16779; -0.0942924; 0.0336462; 0.106325; 0.0784669]
j[1, i] = [0.301169; 0.435398; 0.345677; 0.116111; -0.0950894; -0.16779; -0.0942926; 0.0336454; 0.106343; 0.0787273]
|j[1, i] - j1[i]| = [5.55112e-17; 5.55112e-17; 1.11022e-16; 8.07687e-14; 4.63345e-12; 2.7379e-9; 1.18789e-7; 8.18488e-7; 1.80706e-5; 0.000260402]
# Notice how the error increases as r increases. This shows that the recurrence is less accurate at large r.
# -------------------------------------------------------------------------------------------------------------------------------------------
