# ----------------------------------------------------------------------------------------------------------------------------------------------
# -------------------------------------------------------------------------------------------------------------------------------------------
# EXAMPLE  1.9 : Recurrence for the spherical Bessel function and the associated error with larger order
# -------------------------------------------------------------------------------------------------------------------------------------------
# (See Section 2.1 or 2.6 for information on expressions used here for this function)
# Maximum order
n := 20
# index ranges
M := n + 3
# argument range
i := 1 .. 10
r[i] := i
# note that the recurrence starts at n+3
m := M - 1 .. M
# set up starting values using the asymptotic expansion for large orders
j[m, i] := sqrt(e/2)*(e*r[i])^m/(2*m + 1)^(m + 1)
# do downward recurrence in order at each value of the argument
m := 0 .. M - 2
j[M - m - 2, i] := (2*M - 2*m - 1)/r[i]*j[M - m - 1, i] - j[M - m, i]
m := 0 .. M
# calculate the normalization constant and normalize orders 0 to n at each value of the argument
σ[i] := sum((2*m + 1)*j[m, i]^2, m)
σ[i] := sqrt(σ[i])
m := 0 .. n
j[m, i] := j[m, i]/σ[i]
# for a numerical check compute the first two Bessel functions from their explicit expressions
j0[i] := sin(r[i])/r[i]
j1[i] := 1/r[i]*(sin(r[i])/r[i] - cos(r[i]))
# compare exact and recurrence values for order 0 on the grid in argument r and check the absolute error
j0[i] = [0.841471; 0.454649; 0.04704; -0.189201; -0.191785; -0.0465692; 0.0938552; 0.12367; 0.0457909; -0.0544021]
j[0, i] = [0.841471; 0.454649; 0.04704; -0.189201; -0.191785; -0.0465692; 0.0938552; 0.12367; 0.0457909; -0.0544021]
|j[0, i] - j0[i]| = [1.11022e-16; 0; 2.08167e-17; 2.77556e-17; 2.77556e-17; 6.93889e-18; 2.77556e-17; 4.16334e-17; 2.08167e-17; 6.8695e-16]
# compare exact and recurrence values for order 1 on the grid in argument r and check the absolute error
j1[i] = [0.301169; 0.435398; 0.345677; 0.116111; -0.0950894; -0.16779; -0.0942924; 0.0336462; 0.106325; 0.0784669]
j[1, i] = [0.301169; 0.435398; 0.345677; 0.116111; -0.0950894; -0.16779; -0.0942924; 0.0336462; 0.106325; 0.0784669]
|j[1, i] - j1[i]| = [1.11022e-16; 0; 5.55112e-17; 1.38778e-17; 1.38778e-17; 0; 1.38778e-17; 6.93889e-18; 5.55112e-17; 4.23273e-15]
# Notice how the error at large r is reduced because the recurrence was started at a larger maximum order
# -------------------------------------------------------------------------------------------------------------------------------------------
