# ----------------------------------------------------------------------------------------------------------------------------------------------
# EXAMPLE  10.1 : Functional for CASE (1) - HJ search
# ----------------------------------------------------------------------------------------------------------------------------------------------
# Define function
F(x1, x2) := (1 - x1)^2 + (1 - x2)^2
ORIGIN := 0
# Minimum and maximum value of the range
# set up grid in x1 for plots
x1min := -1
x1max := 3
# for plots set argument range
imax := 21
i := 1 .. imax
x1[i] := x1min + (i - 1)*(x1max - x1min)/(imax - 1)
# Minimum and maximum value of the range
# set up grid in x2 for plots
x2min := -1
x2max := 3
# for plots set argument range
jmax := 21
j := 1 .. jmax
x2[j] := x2min + (j - 1)*(x2max - x2min)/(jmax - 1)
# the 3-D perspective plot shows the magnitude in the vertical (z) axis, x2 axis on the left and the x1 axis on the right, with the minimum at
# A contour plot shows a large symmetric central valley
x1[11] = 1
x2[11] = 1
# [contour plot: F(x1[i], x2[j])]
# [3D plot: F(x1[i], x2[j])]
# Read in output from Fortran Hook and Jeeves search
C := READFILE("Case1-HJ.PRN", "delimited")
# number of base steps
kmax := 59
k := 0 .. kmax
# values of variables x1 and x2 in search sequence steps
sx1[k] := C[k, 2]
sx2[k] := C[k, 3]
# value of functional in search sequence steps
d[k] := C[k, 4]
# starting values
sx1[0] = 2.5
sx2[0] = 2.5
# number of base moves
C[59, 0] = 59
# ending values
sx1[58] = 1.001
sx2[58] = 1.001
# number of trial moves
C[59, 1] = 238
# number of function evaluations 308
# log delta versus iteration count | search path in (x1,x2) plane starting from (2.5,2.5)
# [plot: d[k] vs k]
# [plot: sx2[k] vs sx1[k]]
# function value along search path in the x1 axis | function value along search path in the x2 axis
# [plot: d[k] vs sx1[k]]
# [plot: d[k] vs sx2[k]]
# slices in each dimension show a shallow valley at the minimal values
# [plot: F(x1[11], x2[j]) vs x2[j]]
# [plot: F(x1[i], x2[11]) vs x1[i]]
# ----------------------------------------------------------------------------------------------------------------------------------------------
