# ----------------------------------------------------------------------------------------------------------------------------------------------
# EXAMPLE  10.11 : Functional for CASE (7)  - HJ search
# ----------------------------------------------------------------------------------------------------------------------------------------------
ORIGIN := 0
# Define function
F(x1, x2, x3, x4) := (x1 + 10*x2)^2 + 5*(x3 - x4)^2 + (x2 - 2*x3)^4 + 10*(x1 - x4)^4
# Minimum and maximum value of the range
# set up grid in x1 for plots
x1min := -1
x1max := 4
# for plots set argument range
imax := 61
i := 1 .. imax
x1[i] := x1min + (i - 1)*(x1max - x1min)/(imax - 1)
# Minimum and maximum value of the range
# set up grid in x2 for plots
x2min := -2
x2max := 2
# for plots set argument range
jmax := 61
j := 1 .. jmax
x2[j] := x2min + (j - 1)*(x2max - x2min)/(jmax - 1)
# Minimum and maximum value of the range
# set up grid in x3 for plots
x3min := -1
x3max := 1
# for plots set argument range
lmax := 61
l := 1 .. lmax
x3[l] := x3min + (l - 1)*(x3max - x3min)/(lmax - 1)
# Minimum and maximum value of the range
# set up grid in x4 for plots
x4min := -2
x4max := 2
# for plots set argument range
nmax := 61
n := 1 .. nmax
x4[n] := x4min + (n - 1)*(x4max - x4min)/(nmax - 1)
# the 3-D perspective plot shows the magnitude in the vertical (z) axis, x1 axis on the left and the x2 axis on the right, with the minimum at
# A contour plot flat shaped valley at the minimum with steep sides
x1[13] = 0
x2[31] = 0
x3[31] = 0
x4[31] = 0
# [contour plot: F(x1[i], x2[j], 0, 1)]
# [3D plot: F(x1[i], x2[j], 0, 1)]
# Read in output from Fortran Hook and Jeeves search
C := READFILE("Case7-HJ.PRN", "delimited")
# number of base steps
kmax := 131
k := 0 .. kmax
# values of variables x1, x2, x3 in search sequence steps
sx1[k] := C[k, 2]
sx2[k] := C[k, 3]
sx3[k] := C[k, 4]
# value of functional in search sequence steps
d[k] := C[k, 6]
sx4[k] := C[k, 5]
# starting values
sx1[0] = 3
sx2[0] = -1
sx3[0] = 0
sx4[0] = 1
# number of base moves
C[kmax, 0] = 131
# ending values
sx1[kmax] = 0.01
sx3[kmax] = 0.003
# number of trial moves
C[kmax, 1] = 913
sx2[kmax] = -0.001
sx4[kmax] = 0.003
# number of function evaluations 1061
# Read in output from Fortran DSC search
D := READFILE("Case7-DSC.PRN", "delimited")
# number of search steps
kmax := 1021
j := 0 .. kmax
# values of variables x1 and x2 in search sequence steps
rx1[j] := D[j, 3]
rx2[j] := D[j, 4]
rx3[j] := D[j, 5]
# value of functional in search sequence steps
e[j] := D[j, 2]
e[kmax] = 0.002
rx4[j] := D[j, 5]
# starting values
rx1[0] = 2.3
rx2[0] = -1
rx3[0] = 0
rx4[0] = 0
# ending values
rx1[kmax] = 0.165
rx3[kmax] = 0.096  # number of function evaluations 1022
rx2[kmax] = -0.016
rx4[kmax] = 0.096
# log delta versus iteration count - HJ | log delta versus iteration count - DSC
# [plot: d[k] vs k]
# [plot: e[j] vs j]
# HJ algorithm showed convergence after 1061 function evaluations and the precision is better than that of the DSC search
# DSC algorithm shows the result of eighteen (concatenated) searches where each restart uses the final values of the preceding one
# with a total of 1022 function evaluations DSC is not more efficient than the HJ search
# ---------------------------------------------------------------------------------------------------------------------------------------------
