# ----------------------------------------------------------------------------------------------------------------------------------------------
# EXAMPLE  10.2 : Functional for CASE (2) - HJ search
# ----------------------------------------------------------------------------------------------------------------------------------------------
ORIGIN := 0
# Define function
F(x1, x2) := 100*(x2 - x1^2)^2 + (1 - x1)^2
# Minimum and maximum value of the range
# set up grid in x1 for plots
x1min := -1.5
x1max := 1.5
# for plots set argument range
imax := 61
i := 1 .. imax
x1[i] := x1min + (i - 1)*(x1max - x1min)/(imax - 1)
# Minimum and maximum value of the range
# set up grid in x2 for plots
x2min := 1.5
x2max := -0.5
# for plots set argument range
jmax := 61
j := 1 .. jmax
x2[j] := x2min + (j - 1)*(x2max - x2min)/(jmax - 1)
# the 3-D perspective plot shows the magnitude in the vertical (z) axis, x2 axis on the left and the x1 axis on the right, with the minimum at
# A contour plot shows a banana shaped valley with steep sides, but with one branch having a deeper minimum
x1[51] = 1
x2[16] = 1
# [contour plot: F(x1[i], x2[j])]
# [3D plot: F(x1[i], x2[j])]
# Read in output from Fortran Hook and Jeeves search
C := READFILE("Case2-HJ.PRN", "delimited")
# number of base steps
kmax := 109
k := 0 .. kmax
# values of variables x1 and x2 in search sequence steps
sx1[k] := C[k, 2]
sx2[k] := C[k, 3]
# value of functional in search sequence steps
d[k] := C[k, 4]
# starting values
sx1[0] = 2.5
sx2[0] = 2.5
# number of base moves
C[kmax, 0] = 109
# ending values
sx1[kmax - 1] = 1.007
sx2[kmax - 1] = 1.012
# number of trial moves
C[kmax, 1] = 395
# number of function evaluations 517
# log delta versus iteration count | search path in (x1,x2) plane starting from (2.5,2.5)
# [plot: d[k] vs k]
# [plot: sx2[k] vs sx1[k]]
# function value along search path in the x1 axis | function value along search path in the x2 axis
# [plot: d[k] vs sx1[k]]
# [plot: d[k] vs sx2[k]]
# slices in each dimension show a steep valley at the minimal values with one branch slightly lower than the other in the x1 direction
# [plot: F(x1[16], x2[j]) vs x2[j]]
# [plot: F(x1[i], x2[16]) vs x1[i]]
# ----------------------------------------------------------------------------------------------------------------------------------------------
