# ----------------------------------------------------------------------------------------------------------------------------------------------
# EXAMPLE  10.3 : Functional for CASE (3) - HJ search
# ----------------------------------------------------------------------------------------------------------------------------------------------
ORIGIN := 0
# Define function
F(x1, x2) := (x1 + 2*x2 - 7)^2 + (2*x1 + x2 - 5)^2
# Minimum and maximum value of the range
# set up grid in x1 for plots
x1min := -1.5
x1max := 1.5
# for plots set argument range
imax := 61
i := 1 .. imax
x1[i] := x1min + (i - 1)*(x1max - x1min)/(imax - 1)
# Minimum and maximum value of the range
# set up grid in x2 for plots
x2min := 4.0
x2max := -2.0
# for plots set argument range
jmax := 61
j := 1 .. jmax
x2[j] := x2min + (j - 1)*(x2max - x2min)/(jmax - 1)
# the 3-D perspective plot shows the magnitude in the vertical (z) axis, x2 axis on the left and the x1 axis on the right, with the minimum at
# A contour plot shows a U shaped valley with steep sides but shallow and elongated
x1[51] = 1
x2[11] = 3
# [contour plot: F(x1[i], x2[j])]
# [3D plot: F(x1[i], x2[j])]
# Read in output from Fortran Hook and Jeeves search
C := READFILE("Case3-HJ.PRN", "delimited")
# number of base steps
kmax := 115
k := 0 .. kmax
# values of variables x1 and x2 in search sequence steps
sx1[k] := C[k, 2]
sx2[k] := C[k, 3]
# value of functional in search sequence steps
d[k] := C[k, 4]
# starting values
sx1[0] = 0
sx2[0] = 0
# number of base moves
C[115, 0] = 115
# ending values
sx1[114] = 0.999
sx2[114] = 3.001
# number of trial moves
C[115, 1] = 302
# number of function evaluations 429
# log delta versus iteration count | search path in (x1,x2) plane starting from (0,0)
# [plot: d[k] vs k]
# [plot: sx2[k] vs sx1[k]]
# function value along search path in the x1 axis | function value along search path in the x2 axis
# [plot: d[k] vs sx1[k]]
# [plot: d[k] vs sx2[k]]
# slices in each dimension show a steep valley that is shallow close to the minimal values
# [plot: F(x1[51], x2[j]) vs x2[j]]
# [plot: F(x1[i], x2[11]) vs x1[i]]
# ----------------------------------------------------------------------------------------------------------------------------------------------
