# ----------------------------------------------------------------------------------------------------------------------------------------------
# EXAMPLE  10.4 : Functional for CASE (4)  - HJ search
# ----------------------------------------------------------------------------------------------------------------------------------------------
ORIGIN := 0
# Define function
F(x1, x2) := 9*x1^2 + 4*(x1*x2 + x2^2) - 18*x1 - 4*x2 + 9
# Minimum and maximum value of the range
# set up grid in x1 for plots
x1min := -1.5
x1max := 1.5
# for plots set argument range
imax := 61
i := 1 .. imax
x1[i] := x1min + (i - 1)*(x1max - x1min)/(imax - 1)
# Minimum and maximum value of the range
# set up grid in x2 for plots
x2min := 4.0
x2max := -2.0
# for plots set argument range
jmax := 61
j := 1 .. jmax
x2[j] := x2min + (j - 1)*(x2max - x2min)/(jmax - 1)
# the 3-D perspective plot shows the magnitude in the vertical (z) axis, x1 axis on the left and the x2 axis on the right, with the minimum at
# A contour plot shows a U shaped valley with steep sides but bowl shaped at the minimum
x1[51] = 1
x2[41] = 0
# [contour plot: F(x1[i], x2[j])]
# [3D plot: F(x1[i], x2[j])]
# Read in output from Fortran Hook and Jeeves search
C := READFILE("Case4-HJ.PRN", "delimited")
# number of base steps
kmax := 85
k := 0 .. kmax
# values of variables x1 and x2 in search sequence steps
sx1[k] := C[k, 2]
sx2[k] := C[k, 3]
# value of functional in search sequence steps
d[k] := C[k, 4]
# starting values
sx1[0] = 0
sx2[0] = 0
# number of base moves
C[85, 0] = 85
# ending values
sx1[84] = 1
sx2[84] = 0
# number of trial moves
C[85, 1] = 249
# number of function evaluations 346
# log delta versus iteration count | search path in (x1,x2) plane starting from (0,0)
# [plot: d[k] vs k]
# [plot: sx2[k] vs sx1[k]]
# function value along search path in the x1 axis | function value along search path in the x2 axis
# [plot: d[k] vs sx1[k]]
# [plot: d[k] vs sx2[k]]
# slices in each dimension show a shallow valley at the minimal values
# [plot: F(x1[51], x2[j]) vs x2[j]]
# [plot: F(x1[i], x2[41]) vs x1[i]]
# ----------------------------------------------------------------------------------------------------------------------------------------------
