# ----------------------------------------------------------------------------------------------------------------------------------------------
# EXAMPLE  10.5 : Functional for CASE (5)  - HJ search
# ----------------------------------------------------------------------------------------------------------------------------------------------
ORIGIN := 0
# Define function
F(x1, x2, x3) := (x1 - 1)^2 + 2*(x2 - 1)^2 + (x3 - 1)^2
# Minimum and maximum value of the range
# set up grid in x1 for plots
x1min := 0
x1max := 1.0
# for plots set argument range
imax := 61
i := 1 .. imax
x1[i] := x1min + (i - 1)*(x1max - x1min)/(imax - 1)
# Minimum and maximum value of the range
# set up grid in x2 for plots
x2min := 0
x2max := 1
# for plots set argument range
jmax := 61
j := 1 .. jmax
x2[j] := x2min + (j - 1)*(x2max - x2min)/(jmax - 1)
# Minimum and maximum value of the range
# set up grid in x3 for plots
x3min := 0
x3max := 1
# for plots set argument range
lmax := 61
l := 1 .. lmax
x3[l] := x3min + (l - 1)*(x3max - x3min)/(lmax - 1)
# the 3-D perspective plot shows the magnitude in the vertical (z) axis, x1 axis on the left and the x2 axis on the right, with the minimum at
# A contour plot flat shaped valley at the minimum
x1[61] = 1
x2[61] = 1
x3[61] = 1
# [contour plot: F(x1[i], x2[j], 0)]
# [3D plot: F(x1[i], x2[j], 0)]
# Read in output from Fortran Hook and Jeeves search
C := READFILE("Case5-HJ.PRN", "delimited")
# number of search steps
kmax := 48
k := 0 .. kmax
# values of variables x1, x2, x3 in search sequence steps
sx1[k] := C[k, 2]
sx2[k] := C[k, 3]
sx3[k] := C[k, 4]
# value of functional in search sequence steps
d[k] := C[k, 5]
# starting values
sx1[0] = 0
sx2[0] = 0
sx3[0] = 0
# number of base moves
C[48, 0] = 48
# ending values
sx1[47] = 0.999
sx2[47] = 0.999
sx3[47] = 0.999
# number of trial moves
C[48, 1] = 150
# number of function evaluations 217
# log delta versus iteration count | search path in (x1,x2) plane starting from (0,0,0)
# [plot: d[k] vs k]
# [plot: d[k] vs sx3[k]]
# function value along search path in the x1 axis | function value along search path in the x2 axis
# [plot: d[k] vs sx1[k]]
# [plot: d[k] vs sx2[k]]
# ---------------------------------------------------------------------------------------------------------------------------------------------
