# ----------------------------------------------------------------------------------------------------------------------------------------------
# EXAMPLE  10.6 : Functional for CASE (6)  - HJ search
# ----------------------------------------------------------------------------------------------------------------------------------------------
ORIGIN := 0
# Define function
F(x1, x2, x3) := 2*x1^2 + 2*x1*x2 + 3*x2^2 + 8*x2*x3 + 9*x3^2 + 2*x1*x3 + 8*x1 - 10*x2 - 30*x3 + 42
# Minimum and maximum value of the range
# set up grid in x1 for plots
x1min := -4
x1max := 0
# for plots set argument range
imax := 61
i := 1 .. imax
x1[i] := x1min + (i - 1)*(x1max - x1min)/(imax - 1)
# Minimum and maximum value of the range
# set up grid in x2 for plots
x2min := 2
x2max := 0
# for plots set argument range
jmax := 61
j := 1 .. jmax
x2[j] := x2min + (j - 1)*(x2max - x2min)/(jmax - 1)
# Minimum and maximum value of the range
# set up grid in x3 for plots
x3min := 0
x3max := 2
# for plots set argument range
lmax := 61
l := 1 .. lmax
x3[l] := x3min + (l - 1)*(x3max - x3min)/(lmax - 1)
# the 3-D perspective plot shows the magnitude in the vertical (z) axis, x1 axis on the left and the x2 axis on the right, with the minimum at
# A contour plot flat shaped valley at the minimum
x1[16] = -3
x2[61] = 0
x3[61] = 2
# [contour plot: F(x1[i], x2[j], 2)]
# [3D plot: F(x1[i], x2[j], 2)]
# Read in output from Fortran Hook and Jeeves search
C := READFILE("Case6-HJ.PRN", "delimited")
# number of base steps
kmax := 179
k := 0 .. kmax
# values of variables x1, x2, x3 in search sequence steps
sx1[k] := C[k, 2]
sx2[k] := C[k, 3]
sx3[k] := C[k, 4]
# value of functional in search sequence steps
d[k] := C[k, 5]
# starting values
sx1[0] = 1
sx2[0] = 1
sx3[0] = 1.111
# number of base moves
C[kmax, 0] = 179
# ending values
sx1[kmax] = -3.001
sx2[kmax] = 0
sx3[kmax] = 2
# number of trial moves
C[kmax, 1] = 898
# number of function evaluations 1095
# log delta versus iteration count | search path in (x1,x2) plane starting from (1,1,1.11)
# [plot: d[k] vs k]
# [plot: d[k] vs sx3[k]]
# function value along search path in the x1 axis | function value along search path in the x2 axis
# [plot: d[k] vs sx1[k]]
# [plot: d[k] vs sx2[k]]
# ---------------------------------------------------------------------------------------------------------------------------------------------
