# ----------------------------------------------------------------------------------------------------------------------------------------------
# EXAMPLE  10.7 : Functional for CASE (7)  - HJ search
# ----------------------------------------------------------------------------------------------------------------------------------------------
ORIGIN := 0
# Define function
F(x1, x2, x3, x4) := (x1 + 10*x2)^2 + 5*(x3 - x4)^2 + (x2 - 2*x3)^4 + 10*(x1 - x4)^4
# Minimum and maximum value of the range
# set up grid in x1 for plots
x1min := -1
x1max := 4
# for plots set argument range
imax := 61
i := 1 .. imax
x1[i] := x1min + (i - 1)*(x1max - x1min)/(imax - 1)
# Minimum and maximum value of the range
# set up grid in x2 for plots
x2min := -2
x2max := 2
# for plots set argument range
jmax := 61
j := 1 .. jmax
x2[j] := x2min + (j - 1)*(x2max - x2min)/(jmax - 1)
# Minimum and maximum value of the range
# set up grid in x3 for plots
x3min := -1
x3max := 1
# for plots set argument range
lmax := 61
l := 1 .. lmax
x3[l] := x3min + (l - 1)*(x3max - x3min)/(lmax - 1)
# Minimum and maximum value of the range
# set up grid in x4 for plots
x4min := -2
x4max := 2
# for plots set argument range
nmax := 61
n := 1 .. nmax
x4[n] := x4min + (n - 1)*(x4max - x4min)/(nmax - 1)
# the 3-D perspective plot shows the magnitude in the vertical (z) axis, x1 axis on the left and the x2 axis on the right, with the minimum at
# A contour plot flat shaped valley at the minimum
x1[13] = 0
x2[31] = 0
x3[31] = 0
x4[31] = 0
# [contour plot: F(x1[i], x2[j], 0, 1)]
# [3D plot: F(x1[i], x2[j], 0, 1)]
# Read in output from Fortran Hook and Jeeves search
C := READFILE("Case7-HJ.PRN", "delimited")
# number of base steps
kmax := 131
k := 0 .. kmax
# values of variables x1, x2, x3 in search sequence steps
sx1[k] := C[k, 2]
sx2[k] := C[k, 3]
sx3[k] := C[k, 4]
# value of functional in search sequence steps
d[k] := C[k, 6]
sx4[k] := C[k, 5]
# starting values
sx1[0] = 3
sx2[0] = -1
sx3[0] = 0
sx4[0] = 1
# number of base moves
C[kmax, 0] = 131
# ending values
sx1[kmax] = 0.01
sx3[kmax] = 0.003
# number of trial moves
C[kmax, 1] = 913
sx2[kmax] = -0.001
sx4[kmax] = 0.003
# log delta versus iteration count | number of function evaluations 1061
# [plot: d[k] vs k]
# function value along search path in the x1 axis | function value along search path in the x2 axis
# [plot: d[k] vs sx1[k]]
# [plot: d[k] vs sx2[k]]
# function value along search path in the x3 axis | function value along search path in the x4 axis
# [plot: d[k] vs sx3[k]]
# [plot: d[k] vs sx4[k]]
# ---------------------------------------------------------------------------------------------------------------------------------------------
