# ----------------------------------------------------------------------------------------------------------------------------------------------
# EXAMPLE  10.8 : Functional for CASE (1) - DSC search
# ----------------------------------------------------------------------------------------------------------------------------------------------
# Define function
F(x1, x2) := (1 - x1)^2 + (1 - x2)^2
ORIGIN := 0
# Minimum and maximum value of the range
# set up grid in x1 for plots
x1min := -1
x1max := 3
# for plots set argument range
imax := 21
i := 1 .. imax
x1[i] := x1min + (i - 1)*(x1max - x1min)/(imax - 1)
# Minimum and maximum value of the range
# set up grid in x2 for plots
x2min := -1
x2max := 3
# for plots set argument range
jmax := 21
j := 1 .. jmax
x2[j] := x2min + (j - 1)*(x2max - x2min)/(jmax - 1)
# the 3-D perspective plot shows the magnitude in the vertical (z) axis, x2 axis on the left and the x1 axis on the right, with the minimum at
# A contour plot shows a large symmetric central valley
x1[11] = 1
x2[11] = 1
# [contour plot: F(x1[i], x2[j])]
# [3D plot: F(x1[i], x2[j])]
# Read in output from Fortran Hook and Jeeves search
C := READFILE("Case1-HJ.PRN", "delimited")
# number of base steps
kmax := 59
k := 0 .. kmax
# values of variables x1 and x2 in search sequence steps
sx1[k] := C[k, 2]
sx2[k] := C[k, 3]
# value of functional in search sequence steps
d[k] := C[k, 4]
# starting values
sx1[0] = 2.5
sx2[0] = 2.5
# number of base moves
C[59, 0] = 59
# ending values
sx1[58] = 1.001
sx2[58] = 1.001
# number of trial moves
C[59, 1] = 238
# number of function evaluations 308
# Read in output from Fortran DSC search
D := READFILE("Case1-DSC.PRN", "delimited")
# number of search steps
jmax := 73
j := 0 .. jmax
# values of variables x1 and x2 in search sequence steps
rx1[j] := D[j, 3]
rx2[j] := D[j, 4]
# value of functional in search sequence steps
e[j] := D[j, 2]
# starting values
rx1[0] = 1.893
rx2[0] = 2.5
# number of moves
D[jmax - 1, 1] = 72
# ending values
rx1[jmax - 1] = 1
rx2[jmax - 1] = 1  # number of function evaluations 74
# log delta versus iteration count - HJ | log delta versus iteration count - DSC
# [plot: d[k] vs k]
# [plot: e[j] vs j]
# search path in (x1,x2) plane starting from (1.9,2.5)
# [plot: rx2[j] vs rx1[j]]
# note that the DSC search already found the minimum at step
jmax - 1 = 72
e[jmax - 1] = 0
rx1[jmax - 1] = 1
rx2[jmax - 1] = 1
# comparison of the two searches:
#
# HJ has 308 function evaluations
# DSC has 74
# function value along search path in the x1 axis | function value along search path in the x2 axis
# [plot: e[j] vs rx1[j]]
# [plot: e[j] vs rx2[j]]
# ----------------------------------------------------------------------------------------------------------------------------------------------
