# ----------------------------------------------------------------------------------------------------------------------------------------------
# EXAMPLE  2.1 : Some interval mappings
# ----------------------------------------------------------------------------------------------------------------------------------------------
# To demonstrate some interval mappings choose x[a,b]  and  t[-1,+1]
# select a number of argument values
N := 10
i := 0 .. N
# and
tolerance := 0.001
# set up a grid in argument values
tmin := -1
tmax := 1
τ[i] := tmin + i*(tmax - tmin)/N
# now consider two cases
# CASE 1 is the finite interval [0,π] | CASE 2 is the semi-infinite interval [0,∞]
a := 0
b := π
Γ := 4  # a mapping parameter that contracts the interval
x1[i] := 1/2*(b + a) + 1/2*(b - a)*τ[i]
x2[i] := Γ*(1 + τ[i])/(1 - τ[i] + tolerance^4)
t1[i] := (2*x1[i] - (b + a))/(b - a)
t2[i] := (x2[i] - Γ)/(x2[i] + Γ)
# For CASE 2 the tolerance is added to avoid the singularity and Γ determines the amount of expansion in x: doubling Γ doubles the x value
x1[i] = [0; 0.314159; 0.628319; 0.942478; 1.25664; 1.5708; 1.88496; 2.19911; 2.51327; 2.82743; 3.14159]
t1[i] = [-1; -0.8; -0.6; -0.4; -0.2; 0; 0.2; 0.4; 0.6; 0.8; 1]
x2[i] = [0; 0.444444; 1; 1.71429; 2.66667; 4; 6; 9.33333; 16; 36; 8e12]
t2[i] = [-1; -0.8; -0.6; -0.4; -0.2; -5.00044e-13; 0.2; 0.4; 0.6; 0.8; 1]
# ----------------------------------------------------------------------------------------------------------------------------------------------
