# ----------------------------------------------------------------------------------------------------------------------------------------------
# EXAMPLE  2.10 : Evaluation of Chebyshev polynomials by recurrence and a plot on [-1,+1]
# ----------------------------------------------------------------------------------------------------------------------------------------------
# Chebyshev polynomial largest order
n := 5
# range
k := 2 .. n
# for argument range
xmin := -1
xmax := 1
# select the number of argument values
N := 50
i := 0 .. N
# set up a grid in argument values
x[i] := xmin + (i - 1)*(xmax - xmin)/(N - 1)
# initial values for polynomial | recurrence at each grid point in argument
T[i, 0] := 1
T[i, 1] := x[i]
T[:, k] := vectorize(2*x*T[:, k - 1] - T[:, k - 2])
# [plot: T[i, 1], T[i, 2], T[i, 3], T[i, 4], T[i, 5] vs x[i]]
# ----------------------------------------------------------------------------------------------------------------------------------------------
