# ----------------------------------------------------------------------------------------------------------------------------------------------
# EXAMPLE  2.11 : Expansion of a polynomial for exp(x) in Legendre form
# ----------------------------------------------------------------------------------------------------------------------------------------------
# Define coefficients
a[1] := 1
a[2] := 1/2
a[3] := 1/6
# and argument value
x := 1.0
i := 1 .. 3
# Define the mononomial
# and Legendre polynomials
p0(x) := 1
p(x) := sum(a[i]*x^i, i) + 1
p1(x) := x
p2(x) := 1/2*(3*x^2 - 1)
p3(x) := 1/2*(5*x^3 - 3*x)
# and the Legendre form of p(x)
PT(x) := 7/6*p0(x) + 33/30*p1(x) + 2/6*p2(x) + 2/30*p3(x)
# to check these forms compare values
p(x) = 2.66667
PT(x) = 2.66667
# what is the error if the last term in PT(x) is neglected? | inspect error on the range [-1,+1]
# to check define an approximation
pa(x) := PT(x) - 2/30*p3(x)
# set a grid in argument
# define the error curve
E(x) := p(x) - pa(x)
N := 20
j := 0 .. N
y[j] := j*2/N - 1
# with values
pa(x) = 2.6
E(x) = 0.0666667
transpose(y) = [-1, -0.9, -0.8, -0.7, -0.6, -0.5, -0.4, -0.3, -0.2, -0.1, 0, 0.1, 0.2, 0.3, 0.4, 0.5, 0.6, 0.7, 0.8, 0.9, 1]
# [plot: 30/2*E(y) vs y]
30/2*E(y[j]) = [-1; -0.4725; -0.08; 0.1925; 0.36; 0.4375; 0.44; 0.3825; 0.28; 0.1475; 0; -0.1475; -0.28; -0.3825; -0.44; -0.4375; -0.36; -0.1925; 0.08; 0.4725; 1]
# note that the error curve has three roots which means it is a 3rd order polynomial and this is expected since the neglected term is proportional to p3(x)
# ----------------------------------------------------------------------------------------------------------------------------------------------
