# ----------------------------------------------------------------------------------------------------------------------------------------------
# EXAMPLE  2.12 : Expansion of a polynomial for exp(x) in Chebyshev form
# ----------------------------------------------------------------------------------------------------------------------------------------------
# Define coefficients
a[1] := 1
a[2] := 1/2
a[3] := 1/6
# and argument value
x := 1.0
i := 1 .. 3
# Define the mononomial
# and Chebyshev polynomials
t0(x) := 1
p(x) := sum(a[i]*x^i, i) + 1
t1(x) := x
t2(x) := 2*x^2 - 1
t3(x) := 4*x^3 - 3*x
# and the Chebyshev form of p(x)
PT(x) := 1/2*5/2*t0(x) + 27/24*t1(x) + 1/4*t2(x) + 1/24*t3(x)
# to check these forms compare values
p(x) = 2.66667
PT(x) = 2.66667
# what is the error if the last term in PT(x) is neglected? | inspect error on the range [-1,+1]
# to check define an approximation
pa(x) := PT(x) - 1/24*t3(x)
# set a grid in argument
N := 20
j := 0 .. N
# define the error curve
E(x) := p(x) - pa(x)
y[j] := j*2/N - 1
# with values
pa(x) = 2.625
E(x) = 0.0416667
transpose(y) = [-1, -0.9, -0.8, -0.7, -0.6, -0.5, -0.4, -0.3, -0.2, -0.1, 0, 0.1, 0.2, 0.3, 0.4, 0.5, 0.6, 0.7, 0.8, 0.9, 1]
# [plot: 30/2*E(y) vs y]
30/2*E(y[j]) = [-0.625; -0.135; 0.22; 0.455; 0.585; 0.625; 0.59; 0.495; 0.355; 0.185; 0; -0.185; -0.355; -0.495; -0.59; -0.625; -0.585; -0.455; -0.22; 0.135; 0.625]
# note that the error curve has three roots which means it is a 3rd order polynomial and this is expected since the neglected term is proportional to p3(x)
# ----------------------------------------------------------------------------------------------------------------------------------------------
