# ----------------------------------------------------------------------------------------------------------------------------------------------
# EXAMPLE  2.13 : Evaluation of a Chebyshev expansion by recurrence
# ----------------------------------------------------------------------------------------------------------------------------------------------
# Define the Chebyshev polynomial coefficients and  use the argument value
x := 1.0
# note that the first coefficient does not include the series factor of 0.5
h[0] := 5/2
h[1] := 27/24
h[2] := 1/4
h[3] := 1/24
# set up the recurrence that runs downward in index
n := 3
i := 0 .. n
A[n + 1] := 0
A[n + 2] := 0
A[n - i] := 2*x*A[n - i + 1] - A[n - i + 2] + h[n - i]
# then compute the function value at the given argument and check the value
fN := A[0] - x*A[1] - 0.5*h[0]
fN = 2.66667  # which agrees with EXAMPLE 2.12
# ----------------------------------------------------------------------------------------------------------------------------------------------
