# ----------------------------------------------------------------------------------------------------------------------------------------------
# EXAMPLE  2.14 : Evaluation of a Sine functions and a plot
# ----------------------------------------------------------------------------------------------------------------------------------------------
# Largest order
n := 3
# range
k := 1 .. n
# for argument range
xmin := -1
xmax := 1
# select the number of argument values
N := 60
i := 0 .. N
# compute function values
# set up a grid in argument values
x[i] := xmin + (i - 1)*(xmax - xmin)/(N - 1)
S[i, k] := sin(k*π*x[i])
# [plot: S[i, 1], S[i, 2], S[i, 3] vs x[i]]
# ----------------------------------------------------------------------------------------------------------------------------------------------
