# ----------------------------------------------------------------------------------------------------------------------------------------------
# EXAMPLE  2.16 : Expansion of a polynomial for exp(x) in Fourier form
# ----------------------------------------------------------------------------------------------------------------------------------------------
# Define coefficients
K := 10
k := 0 .. K
i := 1 .. K
# and argument value
x := 0.1
# cosine series
c[k] := (-1)^k*((e - e^-1)/(1 + (k*π)^2))
# sine series
s[i] := -i*π*c[i]
C(t) := 1/2*c[0] + sum(c[i]*cos(i*π*t), i)
S(t) := sum(s[i]*sin(i*π*t), i)
# check values of each
C(x) = 1.00394
S(x) = 0.106056
# for
p(t) := exp(t)
# the Fourier expansion is
PF(t) := C(t) + S(t)
# to check these forms compare values
p(x) = 1.10517
PF(x) = 1.10999
# inspect error on the range [-1,+1] | set a grid in argument
N := 20
j := 0 .. N
# define the error curve
E(t) := p(t) - PF(t)
y[j] := j*2/N - 1
transpose(y) = [-1, -0.9, -0.8, -0.7, -0.6, -0.5, -0.4, -0.3, -0.2, -0.1, 0, 0.1, 0.2, 0.3, 0.4, 0.5, 0.6, 0.7, 0.8, 0.9, 1]
# [plot: E(y) vs y]
E(y[j]) = [-1.15254; 0.206613; -0.110346; 0.0724271; -0.0516082; 0.0379751; -0.0279636; 0.0199671; -0.0131367; 0.00695821; -0.00107184; -0.00482026; 0.0110171; -0.0178824; 0.025939; -0.0360543; 0.0498778; -0.0710887; 0.109993; -0.209868; 1.19786]
absolute_error := p(x) - PF(x)
# note that the error curve shows increasing error as the argument moves away from zero
absolute_error = -0.00482026
relative_error := absolute_error/p(x)
relative_error = -0.00436155
# ----------------------------------------------------------------------------------------------------------------------------------------------
