# ----------------------------------------------------------------------------------------------------------------------------------------------
# EXAMPLE  2.17 : Evaluation of a Fourier cosine expansion by recurrence
# ----------------------------------------------------------------------------------------------------------------------------------------------
# Define the Fourier cosine coefficients
# and argument value
x := 0.1
# Define range in order
K := 10
k := 0 .. K
# note that the first coefficient should not include the series factor of 0.5
c[k] := (-1)^k*((e - e^-1)/(1 + (k*π)^2))
# from Eq.(2.178)
# set up the recurrence that runs downward in index
n := K
i := 0 .. n
A[n + 1] := 0
A[n + 2] := 0
A[n - i] := 2*cos(π*x)*A[n - i + 1] - A[n - i + 2] + c[n - i]
fN := A[0] - cos(π*x)*A[1] - 1/2*c[0]
# then compute the function value at the argument and check the value which agrees with the value of C(x) in Example 2.16
fN = 1.00394
# ----------------------------------------------------------------------------------------------------------------------------------------------
