# ----------------------------------------------------------------------------------------------------------------------------------------------
# EXAMPLE  2.18 : Evaluation of a Fourier sine expansion by recurrence
# ----------------------------------------------------------------------------------------------------------------------------------------------
# Define the Fourier cosine coefficients
# and argument value
x := 0.1
# Define range in order
K := 10
k := 1 .. K
s[k] := k*π*(-1)^(k + 1)*((e - e^-1)/(1 + (k*π)^2))
# from Eq.(2.179)
# set up the recurrence that runs downward in index
n := K
i := 0 .. n - 1
A[n + 1] := 0
A[n + 2] := 0
A[n - i] := 2*cos(π*x)*A[n - i + 1] - A[n - i + 2] + s[n - i]
fN := A[1]*sin(π*x)
# then compute the function value at the argument and check the value which agrees with the value of S(x) in Example 2.16
fN = 0.106056
# ----------------------------------------------------------------------------------------------------------------------------------------------
