# ----------------------------------------------------------------------------------------------------------------------------------------------
# -------------------------------------------------------------------------------------------------------------------------------------------
# EXAMPLE  2.19 : Recurrence for the integer order Bessel function and plots
# -------------------------------------------------------------------------------------------------------------------------------------------
# (See Section 2.1 and 2.6 for information on expressions used here for this function)
# Maximum order
n := 10
# index ranges
M := n + 10
# argument range
i := 1 .. 100
r[i] := i*0.1
# note that the recurrence starting values
m := M - 1 .. M
# set up starting values using the asymptotic expansion for large orders
J[m, i] := 1/sqrt(2*π*m)*(e*r[i]/(2*m))^m
# do downward recurrence in order at each value of the argument
m := 0 .. M - 2
J[M - m - 2, i] := (2*M - 2*m - 2)/r[i]*J[M - m - 1, i] - J[M - m, i]
m := 1 .. n
# calculate the normalization constant and normalize orders 0 to n at each value of the argument
σ[i] := J[0, i]^2 + sum(J[m, i]^2, m)
σ[i] := sqrt(σ[i])
m := 0 .. n
J[m, i] := J[m, i]/σ[i]
# [plot: J[0, i], J[1, i], J[2, i] vs r[i]]
# [plot: J[4, i], J[5, i], J[6, i] vs r[i]]
# -------------------------------------------------------------------------------------------------------------------------------------------
