# ----------------------------------------------------------------------------------------------------------------------------------------------
# EXAMPLE  2.2 : Evaluation of a mononomial by recurrence and a plot on [-1,+1]
# ----------------------------------------------------------------------------------------------------------------------------------------------
# select a number of argument values
N := 20
i := 0 .. N + 1
# and order
n := 5
# recurrence range
k := 2 .. n
# set up a grid in argument values
origin := 0
xmin := -1
xmax := 1
x[i] := xmin + (i - 1)*(xmax - xmin)/N
# values for mononomial
P[i, 0] := 1
P[i, 1] := x[i]
P[i, 2] := x[i]*P[i, 1]
P[i, 3] := x[i]*P[i, 2]
P[i, 4] := x[i]*P[i, 3]
P[i, 5] := x[i]*P[i, 4]
# [plot: P[i, 1], P[i, 2], P[i, 3], P[i, 4], P[i, 5] vs x[i]]
# ----------------------------------------------------------------------------------------------------------------------------------------------
