# ----------------------------------------------------------------------------------------------------------------------------------------------
# -------------------------------------------------------------------------------------------------------------------------------------------
# EXAMPLE  2.20 : Recurrence for the spherical Bessel function and plots
# -------------------------------------------------------------------------------------------------------------------------------------------
# (See Section 2.1 and 2.6 for information on expressions used here for this function)
# Maximum order
n := 10
# index ranges
M := n + 10
# argument range
i := 1 .. 100
r[i] := i*0.1
# note that the recurrence starting values
m := M - 1 .. M
# set up starting values using the asymptotic expansion for large orders
j[m, i] := sqrt(e/2)*(e*r[i])^m/(2*m + 1)^(m + 1)
# do downward recurrence in order at each value of the argument
m := 0 .. M - 2
j[M - m - 2, i] := (2*M - 2*m - 1)/r[i]*j[M - m - 1, i] - j[M - m, i]
m := 0 .. n
# calculate the normalization constant and normalize orders 0 to n at each value of the argument
σ[i] := sum((2*m + 1)*j[m, i]^2, m)
σ[i] := sqrt(σ[i])
m := 0 .. n
j[m, i] := j[m, i]/σ[i]
# [plot: j[0, i], j[1, i], j[2, i] vs r[i]]
# [plot: j[4, i], j[5, i], j[6, i] vs r[i]]
# -------------------------------------------------------------------------------------------------------------------------------------------
