# -------------------------------------------------------------------------------------------------------------------------------------------
# EXAMPLE  2.23 : Chebyshev recurrence for the spherical Bessel function for order
m := 2
# -------------------------------------------------------------------------------------------------------------------------------------------
# (See Section 2.1 and 2.6 for information on expressions used here for this function)
# Maximum order
Kmax := 10
K := Kmax + 5
# argument range
a := 1
k := K - 1 .. K
# note that the recurrence is started at  K
B[k] := 0
B[K - 2] := 1
# set up coefficients of the recurrence defined in Eq.(2.118)
k := 0 .. K - 3
C1[k] := -(16*(k + 1)*(k + m + 1.5)/a^2 - (k + 1)/(k + 2))
C2[k] := -(16*(k + 1)*(k - m + 1.5)/a^2 - 1)
C3[k] := -(k + 1)/(k + 2)
# perform downward recurrence
B[K - k - 3] := C1[K - k - 3]*B[K - k - 2] + C2[K - k - 3]*B[K - k - 1] + C3[K - k - 3]*B[K - k]
# calculation of normalization  constant  in Eq.(2.119)  and normalize for selected order m
k := 1 .. K - 2
μ := 0 .. m
σ := (0.5*B[0] + sum((-1)^k*B[k], k))*(sqrt(π)/2^(m + 1)*product(2*μ + 1, μ))
σ = -7.33424e37
# inspect first seven coefficients of Eq.(2.110)
k := 0 .. K - 2  # normalization
B[k] := B[k]/σ
k := 0 .. 6
# evaluate sum of Eq.(2.110) in even Chebyshev polynomials at
x := a
B[k] = [0.580751; -0.0104522; 7.2951e-5; -2.77297e-7; 6.68292e-10; -1.11601e-12; 0]
t1 := 1/2*B[0] + B[1]*(2*x^2 - 1) + B[2]*(8*x^4 - 8*x^2 + 1)
# evaluate spherical Bessel function
# for order
m = 2
SBF := sqrt(π)/2*(a/2)^m*t1
error := SBF - 1/x*((3/x^2 - 1)*sin(x) - 3/x*cos(x))
error = 6.12892e-8
# -------------------------------------------------------------------------------------------------------------------------------------------
