# ----------------------------------------------------------------------------------------------------------------------------------------------
# EXAMPLE  2.24 : Evaluation of Associated Legendre polynomials by recurrence and a plot on [-1,+1]
# ----------------------------------------------------------------------------------------------------------------------------------------------
# Legendre polynomial largest order
n := 5
# range
k := 2 .. n
# for argument range
xmin := -1
xmax := 1
# select the number of argument values
N := 30
i := 0 .. N
# set up a grid in argument values
h := (xmax - xmin)/(N - 1)
x[i] := xmin + i*h
# initial values for the Legendre polynomial | recurrence at each grid point in argument
P[i, 0] := 1
P[i, 1] := x[i]
P[:, k] := vectorize((2*k - 1)/k*x*P[:, k - 1] - (k - 1)/k*P[:, k - 2])
# generate selected associated Legendre polynomials and reset grid to avoid x = 1
j := 1 .. N - 2
y[j] := xmin + j*h
# recurrence in L for m=0 using Legendre polynomial
P0[j, k] := P[j, k]
P0[j, 0] := 1
P0[j, 1] := y[j]
P1[:, k] := vectorize(1/k*((2*k - 1)*y*P0[:, k - 1] - (k - 1)*P0[:, k - 2]))
# followed by recurrence in L and m=1
P2[:, k] := vectorize(1/sqrt(1 - y^2)*((k + 0)*P1[:, k - 1] - (k - 0)*y*P1[:, k - 2]))
# [plot: P2[j, 3], P2[j, 4], P2[j, 5] vs y[j]]
# plot for m=1, L=3, 4, 5
# followed by recurrence in L and m=2
P3[:, k] := vectorize(1/sqrt(1 - y^2)*((k + 1)*P2[:, k - 1] - (k - 1)*y*P2[:, k - 2]))
# [plot: P3[j, 3], P3[j, 4], P3[j, 5] vs y[j]]
# plot for m=2, L=3, 4, 5
# note the change in scale
# followed by recurrence in L and m=3
P4[:, k] := vectorize(1/sqrt(1 - y^2)*((k + 2)*P3[:, k - 1] - (k - 2)*y*P3[:, k - 2]))
# [plot: P4[j, 3], P4[j, 4], P4[j, 5] vs y[j]]
# plot for m=3, L=3, 4, 5 note the change in scale
# ----------------------------------------------------------------------------------------------------------------------------------------------
