# ----------------------------------------------------------------------------------------------------------------------------------------------
# EXAMPLE  2.25:  Parabolic Cylinder Function from Chebyshev series against tabular values for λ= 1.5
# ----------------------------------------------------------------------------------------------------------------------------------------------
ORIGIN := 0
# z range
zmin := 0
zmax := 3
h := 0.1
J := zmax/h - 1
J = 29
i := 0, 1 .. J
z[i] := i*h
# Case 1
λ := 1.5
N := 48
n := 0 .. N
a := READFILE("DLRCHB+1.5+2.5+3.5.PRN", "delimited")
# 1st column of matrix a has Chebyshev coefficients for λ generated from Fortran code DLRCHB
c[n] := a[n, 0]  # multiplier
d(λ, z) := 2^(λ/2)*exp(-z^2*0.25)
# check at test argument x on the grid
x[i] := z[i]/(zmax*sqrt(2))
# x grid range is
x[0] = 0
x[29] = 0.683537
# evaluate Chebyshev series values on the x grid by downward recurrence
B[i, N] := 0.0
B[i, N - 1] := 0.0
n := N - 2 .. 0
B[:, n] := vectorize(2*x*B[:, n + 1] - B[:, n + 2]) + c[n]
D[i] := d(-λ, z[i])*(B[i, 0] - x[i]*B[i, 1])
# hyperbolic cylinder function values on the  grid as a table and plot
z = [0; 0.1; 0.2; 0.3; 0.4; 0.5; 0.6; 0.7; 0.8; 0.9; 1; 1.1; 1.2; 1.3; 1.4; 1.5; 1.6; 1.7; 1.8; 1.9; 2; 2.1; 2.2; 2.3; 2.4; 2.5; 2.6; 2.7; 2.8; 2.9]
x = [0; 0.0235702; 0.0471405; 0.0707107; 0.0942809; 0.117851; 0.141421; 0.164992; 0.188562; 0.212132; 0.235702; 0.259272; 0.282843; 0.306413; 0.329983; 0.353553; 0.377124; 0.400694; 0.424264; 0.447834; 0.471405; 0.494975; 0.518545; 0.542115; 0.565685; 0.589256; 0.612826; 0.636396; 0.659966; 0.683537]
D = [-0.60814; -0.515155; -0.411898; -0.300458; -0.183085; -0.0621256; 0.0600402; 0.181067; 0.298708; 0.41087; 0.515667; 0.611464; 0.696907; 0.770947; 0.832852; 0.882206; 0.918903; 0.943125; 0.955318; 0.956159; 0.946518; 0.927422; 0.900009; 0.865488; 0.825103; 0.780094; 0.731668; 0.680966; 0.629047; 0.576866]
# note that the zero occurs between z=0.5 and z=0.6
# [plot: D[i] vs x[i]]
# read tabulated values from Abramowitz and Stegun Chapter 19 p. 702 for U(-2,z) with 5 significant figures
as := READFILE("AS-U-2x.PRN", "delimited")
xs[n] := as[n, 0]
cs[n] := as[n, 1]
# show absolute error as a table and a plot
error[i] := |cs[i] - D[i]|
error = [1.07129e-7; 4.8667e-6; 1.62908e-6; 1.66836e-6; 4.89568e-6; 4.36507e-6; 1.81835e-7; 2.60822e-6; 1.90237e-6; 9.51547e-8; 2.76928e-6; 4.0382e-6; 3.23103e-6; 3.28844e-6; 1.5154e-6; 3.97386e-6; 3.04828e-6; 4.9823e-6; 2.12567e-6; 1.3478e-6; 1.55485e-6; 2.46128e-6; 1.14854e-6; 2.10406e-6; 2.96945e-6; 4.49332e-6; 2.161e-6; 4.11507e-6; 3.33554e-6; 3.71132e-6]
xs = [
    0; 0.1; 0.2; 0.3; 0.4; 0.5; 0.6; 0.7; 0.8; 0.9
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]
cs = [
    -0.60814; -0.51516; -0.4119; -0.30046; -0.18308; -0.06213; 0.06004; 0.18107; 0.29871; 0.41087
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]
# note the log scale showing the error is due to the limit of typically 5 significant figures in the values from the Abramowitz and Stegun tables
# [plot: error[i] vs x[i]]
# ----------------------------------------------------------------------------------------------------------------------------------------------
