# ----------------------------------------------------------------------------------------------------------------------------------------------
# EXAMPLE  2.26:  Parabolic Cylinder Function from Chebyshev series against tabular values for λ= 2.5
# ----------------------------------------------------------------------------------------------------------------------------------------------
ORIGIN := 0
# z range
zmin := 0
zmax := 3
h := 0.1
J := zmax/h - 1
J = 29
i := 0, 1 .. J
z[i] := i*h
# Case 1
λ := 2.5
N := 48
n := 0 .. N
a := READFILE("DLRCHB+1.5+2.5+3.5.PRN", "delimited")
# 2nd column of matrix a has Chebyshev coefficients for λ generated from Fortran code DLRCHB
c[n] := a[n, 1]  # multiplier
d(λ, z) := 2^(λ/2)*exp(-z^2*0.25)
# check at test argument x on the grid
x[i] := z[i]/(zmax*sqrt(2))
# x grid range is
x[0] = 0
x[29] = 0.683537
# evaluate Chebyshev series values on the x grid by downward recurrence
B[i, N] := 0.0
B[i, N - 1] := 0.0
n := N - 2 .. 0
B[:, n] := vectorize(2*x*B[:, n + 1] - B[:, n + 2]) + c[n]
D[i] := d(-λ, z[i])*(B[i, 0] - x[i]*B[i, 1])
# hyperbolic cylinder function values on the  grid as a table and plot
z = [0; 0.1; 0.2; 0.3; 0.4; 0.5; 0.6; 0.7; 0.8; 0.9; 1; 1.1; 1.2; 1.3; 1.4; 1.5; 1.6; 1.7; 1.8; 1.9; 2; 2.1; 2.2; 2.3; 2.4; 2.5; 2.6; 2.7; 2.8; 2.9]
x = [0; 0.0235702; 0.0471405; 0.0707107; 0.0942809; 0.117851; 0.141421; 0.164992; 0.188562; 0.212132; 0.235702; 0.259272; 0.282843; 0.306413; 0.329983; 0.353553; 0.377124; 0.400694; 0.424264; 0.447834; 0.471405; 0.494975; 0.518545; 0.542115; 0.565685; 0.589256; 0.612826; 0.636396; 0.659966; 0.683537]
D = [-0.872052; -1.01028; -1.11831; -1.19299; -1.23224; -1.23512; -1.2018; -1.1336; -1.03286; -0.902852; -0.747638; -0.5719; -0.380756; -0.179563; 0.0262689; 0.231467; 0.431061; 0.62053; 0.795921; 0.953942; 1.09202; 1.20831; 1.30174; 1.37192; 1.41914; 1.44426; 1.44865; 1.43409; 1.40267; 1.35666]
# note that the zero occurs between z=1.3 and z=1.4
# [plot: D[i] vs x[i]]
# read tabulated values from Abramowitz and Stegun Chapter 19 p. 702 for U(-3,z) with 5 significant figures
as := READFILE("AS-U-3x.PRN", "delimited")
xs[n] := as[n, 0]
cs[n] := as[n, 1]
# show absolute error as a table and a plot
error[i] := |cs[i] - D[i]|
error = [4.75245e-5; 1.76577e-5; 9.77349e-6; 1.0873e-5; 4.16419e-5; 1.54871e-5; 1.01642e-6; 1.29105e-6; 3.99154e-5; 1.57404e-6; 2.36462e-6; 1.24386e-8; 4.44656e-6; 3.16566e-6; 0.0525389; 2.93376e-6; 9.98399e-7; 3.57734e-7; 9.73532e-7; 1.75442e-6; 1.59712e-5; 1.19814e-5; 3.98675e-5; 2.17375e-5; 3.87011e-5; 4.10351e-5; 4.80983e-5; 6.91887e-6; 3.48842e-5; 4.11843e-5]
xs = [
    0; 0.1; 0.2; 0.3; 0.4; 0.5; 0.6; 0.7; 0.8; 0.9
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]
cs = [
    -0.8721; -1.0103; -1.1183; -1.193; -1.2322; -1.2351; -1.2018; -1.1336; -1.0329; -0.90285
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]
# note the log scale and how the error jumps up close to the zero between z=1.3 and z=1.4
# [plot: error[i] vs x[i]]
# ----------------------------------------------------------------------------------------------------------------------------------------------
