# ----------------------------------------------------------------------------------------------------------------------------------------------
# EXAMPLE  2.27: Parabolic Cylinder Function from Luke's Chebyshev series for λ= 1.5 <CORRECT ERROR>
# ----------------------------------------------------------------------------------------------------------------------------------------------
ORIGIN := 0
# z range
zmin := 0
zmax := 9
h := 0.1
J := zmax/h - 1
J = 89
i := 0, 1 .. J
z[i] := i*h
# Case 1
λ := 1.5
x[i] := z[i]^2/(2*zmax)
x[42] = 0.98
M := 42
m := 0 .. M
# read in Chebyshev coefficients of 1st series from Luke's expansion in shifted Chebyshev polynomials
f11 := READPRN("pF11-9.PRN")
N := length(f11)
N = 37
c := f11
# evaluate 1st Chebyshev series by downward recurrence on x grid
B[i, N] := 0.0
B[i, N - 1] := 0.0
n := N - 2 .. 0
B[:, n] := vectorize(2*(2*x - 1)*B[:, n + 1] - B[:, n + 2]) + c[n]
# value of the series
F1[i] := (B[i, 0] - (2*x[i] - 1)*B[i, 1])
# read in Chebyshev coefficients of 2nd series from Luke's expansion in shifted Chebyshev polynomials
f12 := READPRN("pF12-9.PRN")
N := length(f12)
N = 37
d := f12
# evaluate 2nd Chebyshev series by downward recurrence on x grid
D[i, N] := 0.0
D[i, N - 1] := 0.0
n := N - 2 .. 0
D[:, n] := vectorize(2*(2*x - 1)*D[:, n + 1] - D[:, n + 2]) + d[n]
# value of the series
F2[i] := (D[i, 0] - (2*x[i] - 1)*D[i, 1])
# parabolic cylinder function values on the  grid as a table and plot
DL[i] := 2^(λ/2)*exp(-0.25*z[i]^2)*(Γ(0.5)*F1[i]/Γ(0.5*(1 - λ)) + z[i]/sqrt(2)*Γ(-0.5)*F2[i]/Γ(-0.5*λ))
z = [
    0; 0.1; 0.2; 0.3; 0.4; 0.5; 0.6; 0.7; 0.8; 0.9
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]
x = [
    0; 0.000555556; 0.00222222; 0.005; 0.00888889; 0.0138889; 0.02; 0.0272222; 0.0355556; 0.045
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]
DL = [
    -0.60814; -0.52347; -0.441852; -0.360221; -0.27536; -0.183767; -0.0815055; 0.0359648; 0.173993; 0.338987
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]
DLOUT[i, 0] := z[i]
DLOUT[i, 1] := DL[i]
PRNPRECISION := 15
PRNCOLWIDTH := 22
# write out tabular values of Dλ(z)
DLOUT := WRITEPRN("DLZLUKE.PRN", DLOUT)
# note that the zero occurs between z=0.5 and z=0.6
# [plot: DL[i] vs x[i]]
# ----------------------------------------------------------------------------------------------------------------------------------------------
c = [
    3847.19; 6809.92; 4769.98; 2703.27; 1269.91; 505.562; 173.825; 52.4404; 14.0663; 3.39206
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]
d = [
    10450.3; 18676.9; 13420.7; 7882.75; 3859.32; 1605.26; 577.028; 181.922; 50.9442; 12.8086
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]
F1 = [
    0; 0; 0; 0; 0; 0; 0; 0; 0; 0
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]
F2 = [
    0; 0; 0; 0; 0; 0; 0; 0; 0; 0
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]
i = [
    0; 1; 2; 3; 4; 5; 6; 7; 8; 9
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]
F1[8] = 1.58108
F2[89] = 2.17226e18
