# ----------------------------------------------------------------------------------------------------------------------------------------------
# EXAMPLE  2.28:  Parabolic Cylinder Function from Chebyshev series against Luke's values for λ= 1.5
# ----------------------------------------------------------------------------------------------------------------------------------------------
ORIGIN := 0
# z range
zmin := 0
zmax := 3
h := 0.1
J := zmax/h - 1
J = 29
i := 0, 1 .. J
z[i] := i*h
# Case 1
λ := 1.5
N := 48
n := 0 .. N
a := READFILE("DLRCHB+1.5+2.5+3.5.PRN", "delimited")
# 1st column of matrix a has Chebyshev coefficients for λ= 1.5 generated from Fortran code DLRCHB
c[n] := a[n, 0]  # multiplier
d(λ, z) := 2^(λ/2)*exp(-z^2*0.25)
# check at test argument x on the grid
x[i] := z[i]/(zmax*sqrt(2))
# x grid range is
x[0] = 0
x[29] = 0.683537
# evaluate Chebyshev series values on the x grid by downward recurrence
B[i, N] := 0.0
B[i, N - 1] := 0.0
n := N - 2 .. 0
B[:, n] := vectorize(2*x*B[:, n + 1] - B[:, n + 2]) + c[n]
D[i] := d(-λ, z[i])*(B[i, 0] - x[i]*B[i, 1])
# parabolic cylinder function values on the  grid as a table and plot
z = [0; 0.1; 0.2; 0.3; 0.4; 0.5; 0.6; 0.7; 0.8; 0.9; 1; 1.1; 1.2; 1.3; 1.4; 1.5; 1.6; 1.7; 1.8; 1.9; 2; 2.1; 2.2; 2.3; 2.4; 2.5; 2.6; 2.7; 2.8; 2.9]
x = [0; 0.0235702; 0.0471405; 0.0707107; 0.0942809; 0.117851; 0.141421; 0.164992; 0.188562; 0.212132; 0.235702; 0.259272; 0.282843; 0.306413; 0.329983; 0.353553; 0.377124; 0.400694; 0.424264; 0.447834; 0.471405; 0.494975; 0.518545; 0.542115; 0.565685; 0.589256; 0.612826; 0.636396; 0.659966; 0.683537]
D = [-0.60814; -0.515155; -0.411898; -0.300458; -0.183085; -0.0621256; 0.0600402; 0.181067; 0.298708; 0.41087; 0.515667; 0.611464; 0.696907; 0.770947; 0.832852; 0.882206; 0.918903; 0.943125; 0.955318; 0.956159; 0.946518; 0.927422; 0.900009; 0.865488; 0.825103; 0.780094; 0.731668; 0.680966; 0.629047; 0.576866]
# note that the zero occurs between z=0.5 and z=0.6
# [plot: D[i] vs x[i]]
# read tabulated values from Luke's Chebyshev method in the previous example
aluke := READFILE("DLZLUKE.PRN", "delimited")
xs[n] := aluke[n, 0]
cs[n] := aluke[n, 1]
# show absolute error as a table and a plot
error[i] := cs[i] - D[i]
error = [0; 0.000799982; 0.00641443; 0.0217323; 0.0517991; 0.101915; 0.177755; 0.285527; 0.432167; 0.625597; 0.875052; 1.19149; 1.58815; 2.08116; 2.69047; 3.44089; 4.36347; 5.49729; 6.89167; 8.6091; 10.7289; 13.3522; 16.6079; 20.6609; 25.723; 32.0662; 40.0414; 50.1022; 62.837; 79.0109]
xs = [
    0; 0.1; 0.2; 0.3; 0.4; 0.5; 0.6; 0.7; 0.8; 0.9
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]
cs = [
    -0.60814; -0.514355; -0.405484; -0.278726; -0.131286; 0.039789; 0.237795; 0.466594; 0.730875; 1.03647
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]
# note the linear scale and scaling factor of 10^8 multiplying the error in the plot to show the error is largest near the zero that occurs between z=0.5 and z=0.6
# [plot: 10^8*error[i] vs x[i]]
# ----------------------------------------------------------------------------------------------------------------------------------------------
