# -------------------------------------------------------------------------------------------------------------------------------------------
# EXAMPLE  2.29 : Convolution of two Chebyshev series : form sin(4x) & cos(4x)
# -------------------------------------------------------------------------------------------------------------------------------------------
# Read in Chebyshev coefficients for  sin(2x) + cos(2x)  into vector c then separate even and odd terms for cos(2x) and sin(2x) respectively
c := READPRN("SCIN2X.PRN")
N := length(c)
N = 22
j := 1 .. N - 1
# initialize some arrays and sort coefficients | cos(2x) | sin(2x)
i := 0, 2 .. N - 1
a[0] := 0
a[j] := 0
b[0] := 0
b[j] := 0
a[i] := c[i]
b[i + 1] := c[i + 1]
# remove a factor of 0.5
a[0] := 2*a[0]
b[0] := 2*b[0]
a[N + j - 1] := 0.0  # is set to zero to minimize truncation error in j summation
c[0] := 0.5*a[0]*b[0] + sum(a[j]*b[j], j)
# perform convolution sum of sin(2x) and cos(2x) coefficients
k := 1 .. N - 1
b[N + j - 1] := 0.0
c[k] := 0.5*a[0]*b[k] + 0.5*sum(a[j]*(b[|k - j|] + b[k + j]), j)
# restore a factor of 0.5
a[0] := 0.5*a[0]
b[0] := 0.5*b[0]
c[0] := 0.5*c[0]
j := 0 .. N - 1  # inspect the coefficients
# for  cos(2x) | for  sin(2x) | for  sin(2x) * cos(2x)
a[j] = [0.220277; 0; 0.575761; 0; 0.631361; 0; -0.555377; 0; 0.146591; 0; -0.0202769; 0; 0.00176673; 0; -0.000106847; 0; 4.76904e-6; 0; -1.63968e-7; 0; 4.48281e-9; 0]
b[j] = [0; -0.424765; 0; -0.0582244; 0; 0.745649; 0; -0.315042; 0; 0.0582478; 0; -0.00629565; 0; 0.000452771; 0; -2.33769e-5; 0; 9.11617e-7; 0; -2.78529e-8; 0; 6.8557e-10]
c[j] = [0; -0.154531; 0; -0.096566; 0; 0.0487161; 0; 0.229619; 0; 0.14511; 0; -0.291338; 0; 0.159042; 0; -0.0487173; 0; 0.0100088; 0; -0.00150307; 0; 0.000173852]
# store coefficients of sin(4x) using  sin(4x) = 2 cos(2x) sin(2x)
sin4x := 2*c
# Convolution of two Chebyshev series for cos(4x) | use cos(4x) = 1 - 2 sin(2x)*sin(2x)  from the above
# remove a factor of 0.5
a[0] := 2*a[0]
b[0] := 2*b[0]
j := 1 .. N - 1
a[j] := b[j]
a[N + j - 1] := 0.0  # is set to zero to minimize truncation error in j summation
c[0] := 0.5*a[0]*b[0] + sum(a[j]*b[j], j)
# perform convolution sum of sin(2x) and sin(2x) coefficients
k := 1 .. N - 1
b[N + j - 1] := 0.0
c[k] := 0.5*a[0]*b[k] + 0.5*sum(a[j]*(b[|k - j|] + b[k + j]), j)
# restore a factor of 0.5
a[0] := 0.5*a[0]
b[0] := 0.5*b[0]
c[0] := 0.5*c[0]
j := 0 .. N - 1  # inspect the first few coefficients
# for  sin(2x) | for  sin(2x) | for  sin(2x) * sin(2x)
a[j] = [0.220277; -0.424765; 0; -0.0582244; 0; 0.745649; 0; -0.315042; 0; 0.0582478; 0; -0.00629565; 0; 0.000452771; 0; -2.33769e-5; 0; 9.11617e-7; 0; -2.78529e-8; 0; 6.8557e-10]
b[j] = [0; -0.424765; 0; -0.0582244; 0; 0.745649; 0; -0.315042; 0; 0.0582478; 0; -0.00629565; 0; 0.000452771; 0; -2.33769e-5; 0; 9.11617e-7; 0; -2.78529e-8; 0; 6.8557e-10]
c[j] = [0.421246; -0.0935659; -0.182102; -0.0128255; -0.228209; 0.164249; -0.189442; -0.0693965; 0.0663739; 0.0128306; 0.274228; -0.00138679; -0.235819; 9.9735e-5; 0.0932423; -5.14939e-6; -0.0230617; 2.00808e-7; 0.00401839; -6.13535e-9; -0.000526822; 1.51015e-10]
# store coefficients of cos(4x) using  cos(4x) = 1 - 2 sin(2x) * sin(2x)
cos4x := -2*c
cos4x[0] := cos4x[0] + 0.5*2  # the 0.5 is from the first term in the Chebyshev sum
# first Chebyshev coefficient
# for later use store in a single array
d[i] := cos4x[i]
d[i + 1] := sin4x[i + 1]
# inspect the first few coefficients
sin4x[j] = [0; -0.309062; 0; -0.193132; 0; 0.0974322; 0; 0.459239; 0; 0.290219; 0; -0.582676; 0; 0.318085; 0; -0.0974346; 0; 0.0200175; 0; -0.00300615; 0; 0.000347705]
cos4x[j] = [0.157507; 0.187132; 0.364203; 0.025651; 0.456417; -0.328499; 0.378883; 0.138793; -0.132748; -0.0256613; -0.548456; 0.00277357; 0.471637; -0.00019947; -0.186485; 1.02988e-5; 0.0461233; -4.01616e-7; -0.00803678; 1.22707e-8; 0.00105364; -3.0203e-10]
d[j] = [0.157507; -0.309062; 0.364203; -0.193132; 0.456417; 0.0974322; 0.378883; 0.459239; -0.132748; 0.290219; -0.548456; -0.582676; 0.471637; 0.318085; -0.186485; -0.0974346; 0.0461233; 0.0200175; -0.00803678; -0.00300615; 0.00105364; 0.000347705]
PRNPRECISION := 15
PRNCOLWIDTH := 18
d[0] = 0.157507
d := WRITEPRN("SCIN4X.PRN", d)  # write coefficient vector d to file named SCI4X.PRN
# Chebyshev polynomial largest order
n := N - 1
# range
k := 2 .. n
# for argument range
xmin := -1
xmax := 1
# select the number of argument values
R := 6
i := 0 .. R
# set up a grid in argument values
x[i] := xmin + i*(xmax - xmin)/R
# initial values for polynomial | recurrence at each grid point in argument
T[i, 0] := 1
T[i, 1] := x[i]
T[:, k] := vectorize(2*x*T[:, k - 1] - T[:, k - 2])
k := 1 .. n/2
# Chebyshev series for cosine is with even order terms and for sine is with odd order terms
csum[i] := d[0]*T[i, 0] + sum(d[2*k]*T[i, 2*k], k)
cosx[i] := cos(4*π*x[i])
ssum[i] := sum(d[2*k - 1]*T[i, 2*k - 1], k)
sinx[i] := sin(4*π*x[i])
# compute the function value at the given arguments x and check the error
EC[i] := |cosx[i] - csum[i]|
ES[i] := |sinx[i] - ssum[i]|
csum = [1.0001; -0.499901; -0.500037; 0.999882; -0.500037; -0.499901; 1.0001]
cosx = [1; -0.5; -0.5; 1; -0.5; -0.5; 1]
EC = [0.000100022; 9.93231e-5; 3.67435e-5; 0.000118175; 3.67435e-5; 9.93231e-5; 0.000100022]
ssum = [0.000317885; -0.865925; 0.866321; 0; -0.866321; 0.865925; -0.000317885]
sinx = [0; -0.866025; 0.866025; 0; -0.866025; 0.866025; 0]
ES = [0.000317885; 0.000100648; 0.000296059; 0; 0.000296059; 0.000100648; 0.000317885]
# -------------------------------------------------------------------------------------------------------------------------------------------
