# ----------------------------------------------------------------------------------------------------------------------------------------------
# EXAMPLE  2.3 : Examples of Taylor series
# ----------------------------------------------------------------------------------------------------------------------------------------------
# choose a value to evaluate the series
x := 0.1
# compare to exact value
# define the series | evaluate the series
exp(x) = 1.10517
ex := 1 + x + x^2/2! + x^3/3! + x^4/4!
ex = 1.10517
ex - exp(x) = -8.47423e-8
sinx := x - x^3/3! + x^5/5! + x^7/7!
sinx = 0.0998334
sin(x) = 0.0998334
sinx - sin(x) = 3.96798e-11
cosx := 1 - x^2/2! + x^4/4! - x^6/6!
cosx = 0.995004
cos(x) = 0.995004
cosx - cos(x) = -2.48024e-13
fx := 1 + x + x^2 + x^3
fx = 1.111
1/(1 - x) = 1.11111
# change the variable for the next case
y := x - 1
y = -0.9
lnx := y - y^2/2 + y^3/3 - y^4/4 + y^5/5
lnx = -1.83012
ln(x) = -2.30259
# Note the poor approximation in the last case because the power series is in y and not x. While x is close to 0 the value of abs(y) is close to 1.
# ----------------------------------------------------------------------------------------------------------------------------------------------
