# ----------------------------------------------------------------------------------------------------------------------------------------------
# EXAMPLE  2.30 : Convergence of a Fourier cosine series
# ----------------------------------------------------------------------------------------------------------------------------------------------
# Define the Fourier cosine coefficients
# and range in order
N := 30
k := 0 .. N - 1
a[k] := 0
# compute the EN error of the cosine series
c[k] := (-1)^k*((e - e^-1)/(1 + (k*π)^2))
a[k] := c[k]
K := 0 .. N - 3
EN[N - 2] := |a[N - 1]|
EN[N - K - 3] := |a[N - K - 2]| + EN[N - K - 2]
# tabulate and plot the EN error and its log
logEN[K] := log(EN[K])
# [plot: logEN[K] vs K]
EN[K] = [0.359808; 0.143572; 0.085506; 0.0593399; 0.0445495; 0.0350621; 0.0284655; 0.0236155; 0.0199003; 0.0169639; 0.0145849; 0.0126184; 0.0109658; 0.00955746; 0.00834306; 0.00728511; 0.00635522; 0.00553148; 0.00479669; 0.00413719; 0.00354198; 0.00300209; 0.00251016; 0.00206006; 0.00164669; 0.00126572; 0.000913482; 0.000586853]
logEN[K] = [-0.443929; -0.842932; -1.068; -1.22665; -1.35116; -1.45516; -1.54568; -1.6268; -1.70114; -1.77047; -1.8361; -1.899; -1.95996; -2.01966; -2.07867; -2.13756; -2.19687; -2.25716; -2.31906; -2.38329; -2.45075; -2.52258; -2.6003; -2.68612; -2.78339; -2.89766; -3.0393; -3.23147]
# This is an example of algebraic convergence with q=2. The log(EN) versus K plot starts to bend down as K approaches the maximum value. Previous to this point the plot is a straight line.
i := 7, 12 .. 27
# compute the ratio of successive coefficients
# print some values and note how the ratio approaches a magnitude of 1
r[K] := a[K]/a[K + 1]
i = [7; 12; 17; 22; 27]
r[i] = [-1.30549; -1.17349; -1.12106; -1.09296; -1.07544]
# ----------------------------------------------------------------------------------------------------------------------------------------------
