# ----------------------------------------------------------------------------------------------------------------------------------------------
# EXAMPLE  2.31: Convergence of a Chebyshev series for f(x) = Dλ(x)
# ----------------------------------------------------------------------------------------------------------------------------------------------
# Read in λ and corresponding Chebyshev series coefficients for f(x) = Dλ(x) from Fortran code DLRCHB
# vector of λ values
λ := READPRN("lambda.PRN")
L := length(λ)
L = 6
# Read in Chebyshev coefficient matrix
BB := READPRN("DLRCHB123.PRN")
λ[0] = 0.0178817
B1 := BB[:, 0]
length(B1) = 49  # store Chebyshev coefficients and range in order
N := length(B1)
k := 0 .. N - 1
λ[1] = 1.11151
B2 := BB[:, 1]
length(B2) = 49
λ[2] = 2.32044
B3 := BB[:, 2]
length(B3) = 49
b[k] := B3[k]
b[0] := 2*b[0]
# compute the EN error of the Chebyshev series
a[k] := b[k]
K := 0 .. N - 3
EN[N - 2] := |a[N - 1]|
EN[N - K - 3] := |a[N - K - 2]| + EN[N - K - 2]
# tabulate and plot the EN error and its log
logEN[K] := log(EN[K])
# for tables use
k := 0, 4 .. N - 3
# [plot: logEN[K] vs K]
EN[k] = [440.101; 101.563; 12.2554; 0.903131; 0.0441211; 0.00152382; 3.90525e-5; 7.70813e-7; 1.20652e-8; 1.53329e-10; 0; 0]
logEN[k] = [2.64355; 2.00674; 1.08833; -0.0442494; -1.35535; -2.81707; -4.40835; -6.11305; -7.91846; -9.81438; -11.7924; -13.8489]
K := 2 .. N - 3
r[K] := ln(|ln(|a[K]|)|)/ln(K)
# [plot: r[K] vs K]
# The log(EN) versus K plot bends down steeply before K approaches the maximum value
# The asymptotic index of convergence is evident even when K is not very large and asymptotes close to 1
# ----------------------------------------------------------------------------------------------------------------------------------------------
