# ----------------------------------------------------------------------------------------------------------------------------------------------
# EXAMPLE  2.32 : Convergence of a Chebyshev series for f(x) = exp(x)
# ----------------------------------------------------------------------------------------------------------------------------------------------
# Read in Chebyshev series coefficients for f(x) = exp(x)
b := READPRN("CEXP1X.PRN")
# Define the Chebyshev coefficients
# and range in order
N := length(b)
k := 0 .. N - 1
a[k] := 0
N = 19
# only even polynomials coefficients are non-zero
b[0] := 2*b[0]
# compute the EN error of the Chebyshev series
a[k] := b[k]
K := 0 .. N - 3
EN[N - 2] := |a[N - 1]|
EN[N - K - 3] := |a[N - K - 2]| + EN[N - K - 2]
# tabulate and plot the EN error and its log
logEN[K] := log(EN[K])
# [plot: logEN[K] vs K]
EN[K] = [1.45222; 0.321898; 0.0504024; 0.00606555; 0.000591313; 4.83866e-5; 3.40926e-6; 2.10826e-7; 1.16134e-8; 5.7665e-10; 2.60601e-11; 1.08054e-12; 4.13853e-14; 0; 0; 0; 0]
logEN[K] = [0.162031; -0.492282; -1.29755; -2.21713; -3.22818; -4.31528; -5.46734; -6.67608; -7.93504; -9.23909; -10.584; -11.9664; -13.3832; -14.8319; -16.3104; -17.8168; -19.3496]
K := 2 .. N - 3
r[K] := ln(|ln(|a[K]|)|)/ln(K)
# Compute the exponential index of convergence and tabulate it
# This is an example of exponential convergence. The log(EN) versus K plot starts to bend down well before K approaches the maximum value and then falls steeply.
K = [2; 3; 4; 5; 6; 7; 8; 9; 10; 11; 12; 13; 14; 15; 16]
r[K] = [0.382734; 1.03451; 1.19032; 1.25346; 1.28562; 1.30421; 1.31585; 1.32354; 1.32879; 1.33247; 1.33508; 1.33695; 1.33828; 1.33922; 1.33987]
# The asymptotic index of convergence is evident even when K is not very large. The larger the numerical value of the exponential index of convergence the greater the rate of convergence.
# ----------------------------------------------------------------------------------------------------------------------------------------------
