# ----------------------------------------------------------------------------------------------------------------------------------------------
# EXAMPLE  2.33 : Conversion of a mononomial series into a Chebyshev series for exp(x)
# ----------------------------------------------------------------------------------------------------------------------------------------------
# Define the mononomial coefficients
# and range in order
N := 19
k := 0 .. N - 1
n := 1 .. N - 1
a[0] := 1
a[n] := 1/n!
# Define the Chebyshev coefficients
# and initialize them
b[0] := a[0]
b[n] := 1/2^(n - 1)*a[n]
# compute the EN error of the Chebyshev series
c[k] := b[k]
K := 0 .. N - 3
EN[N - 2] := |c[N - 1]|
EN[N - K - 3] := |c[N - K - 2]| + EN[N - K - 2]
# tabulate and plot the EN error and its log
logEN[K] := log(EN[K])
# [plot: logEN[K] vs K]
EN[K] = [1.29744; 0.297443; 0.0474425; 0.00577587; 0.000567541; 4.67081e-5; 3.30529e-6; 2.05091e-7; 1.13283e-8; 5.63754e-10; 2.5525e-11; 1.06003e-12; 4.06551e-14; 0; 0; 0; 0]
logEN[K] = [0.113088; -0.526597; -1.32383; -2.23838; -3.246; -4.33061; -5.48079; -6.68805; -7.94583; -9.24891; -10.593; -11.9747; -13.3909; -14.8391; -16.3172; -17.8231; -19.3556]
# compute the exponential index of convergence
I := 2 .. N - 1
s[I] := ln(|c[I]|)
r[I] := ln(|s[I]|)/ln(I)
r = [0; 0; 0.471234; 1.05248; 1.19719; 1.25689; 1.2876; 1.30548; 1.31672; 1.32416; 1.32925; 1.33282; 1.33536; 1.33717; 1.33847; 1.33937; 1.34; 1.3404; 1.34063]
# For the asymptotic index the larger the positive value of  r the faster the exponential rate of convergence
PRNPRECISION := 15
PRNCOLWIDTH := 20
# write coefficient vector to file named CHEBEXP.PRN
c := WRITEPRN("CHEBEXP.PRN", c)
# ----------------------------------------------------------------------------------------------------------------------------------------------
