# ----------------------------------------------------------------------------------------------------------------------------------------------
# EXAMPLE  2.34 : Chebyshev series for exp(x)
ORIGIN = 0
# ----------------------------------------------------------------------------------------------------------------------------------------------
# Define the range in order for Chebyshev series
N := 19
n := 0 .. N - 1
# Define the range in series summation for the modified Bessel function of the first kind
k := 0 .. N - 1
# generate coefficients in the Bessel function series by recurrence
C[n, 0] := 1/n!
C[n, k + 1] := 1/(4*(k + 1)*(n + k + 1))*C[n, k]
# sum the the Bessel function series to evaluate the Chebyshev series coefficients of exp(x)
I[n] := (1/2)^n*sum(C[n, k], k)
I[n] := 2*I[n]
# Minimum and maximum value of the argument grid
xmin := -1
xmax := 1
imax := 21
i := 1 .. imax
# set up argument grid range
x[i] := xmin + (i - 1)*(xmax - xmin)/(imax - 1)
# initial values for the Chebyshev polynomials and recurrence for grid values
k := 2 .. N - 1
T[i, 0] := 1.0
T[i, 1] := x[i]
T[:, k] := vectorize(2*x*T[:, k - 1] - T[:, k - 2])
# compare exact function value against | Chebyshev series value | error is | maximum error is
k := 1 .. N - 1
EA[i] := exp(x[i])
TA[i] := (1/2*I[0] + sum(I[k]*T[i, k], k))
e[i] := EA[i] - TA[i]
max(e) = 4.44089e-16
# compute the EN error of the Chebyshev series
K := 0 .. N - 3
EN[N - 2] := |I[N - 1]|
EN[N - K - 3] := |I[N - K - 2]| + EN[N - K - 2]
# tabulate and plot the EN error and its log
logEN[K] := log(EN[K])
# [plot: logEN[K] vs K]
EN[K] = [1.45222; 0.321898; 0.0504024; 0.00606555; 0.000591313; 4.83866e-5; 3.40926e-6; 2.10826e-7; 1.16134e-8; 5.7665e-10; 2.60601e-11; 1.08054e-12; 4.13853e-14; 0; 0; 0; 0]
logEN[K] = [0.162031; -0.492282; -1.29755; -2.21713; -3.22818; -4.31528; -5.46734; -6.67608; -7.93504; -9.23909; -10.584; -11.9664; -13.3832; -14.8319; -16.3104; -17.8168; -19.3496]
# compute the exponential index of convergence
j := 2 .. N - 1
r[j] := ln(|ln(I[j])|)/ln(j)
# For the asymptotic index the larger the positive value of  r the faster the exponential rate of convergence
r = [0; 0; 0.382734; 1.03451; 1.19032; 1.25346; 1.28562; 1.30421; 1.31585; 1.32354; 1.32879; 1.33247; 1.33508; 1.33695; 1.33828; 1.33922; 1.33987; 1.34029; 1.34054]
PRNPRECISION := 15
PRNCOLWIDTH := 20
# write Chebyshev coefficient vector I to file named CHEBEXP34.PRN
I := WRITEPRN("CHEBEXP34.PRN", I)
# ----------------------------------------------------------------------------------------------------------------------------------------------
