# ----------------------------------------------------------------------------------------------------------------------------------------------
# EXAMPLE  2.35 : Convergence of a Chebyshev series for f(  α , x )=1/( α^2 -x^2 )
# ----------------------------------------------------------------------------------------------------------------------------------------------
# Define the Chebyshev coefficients
# and range in order
N := 30
k := 0 .. N - 1
a[k] := 0
α := 1.1  # compute the Chebyshev series coefficients for for f(  α , x )=1/( α^2 -x^2 ) from the known analytical expression
# only even polynomials coefficients are non-zero
i := 0, 2 .. N
α2 := sqrt(α^2 - 1)
b[i] := 2/(α*α2)*(α - α2)^i
# compute the EN error of the Chebyshev series
a[k] := b[k]
K := 0 .. N - 3
EN[N - 2] := |a[N - 1]|
EN[N - K - 3] := |a[N - K - 2]| + EN[N - K - 2]
logEN[K] := log(EN[K])
# tabulate and plot the EN error and its log
# [plot: logEN[K] vs K]
EN[K] = [2.77809; 2.77809; 1.14411; 1.14411; 0.471174; 0.471174; 0.194039; 0.194039; 0.079905; 0.079905; 0.0329009; 0.0329009; 0.0135431; 0.0135431; 0.00557091; 0.00557091; 0.00228769; 0.00228769; 0.000935549; 0.000935549; 0.000378693; 0.000378693; 0.000149361; 0.000149361; 5.4915e-5; 5.4915e-5; 1.60188e-5; 1.60188e-5]
logEN[K] = [0.443747; 0.443747; 0.058466; 0.058466; -0.326819; -0.326819; -0.712112; -0.712112; -1.09743; -1.09743; -1.48279; -1.48279; -1.86828; -1.86828; -2.25407; -2.25407; -2.6406; -2.6406; -3.02893; -3.02893; -3.42171; -3.42171; -3.82576; -3.82576; -4.26031; -4.26031; -4.79537; -4.79537]
# This is an example of algebraic convergence with q=2. The log(EN) versus K plot starts to bend down as K approaches the maximum value. Previous to this point the plot is a straight line.
K := 0 .. (N - 6)/2
i := 0, 4 .. (N - 6)/2
# compute the ratio of successive coefficients | print some values and note how the ratio is constant
r[K] := a[2*K]/a[2*K + 2]
i = [0; 4; 8; 12]
r[i] = [2.42817; 2.42817; 2.42817; 2.42817]
# In this example this is a series on even Chebyshev polynomials so that it would suffice to plot only the second value of K.
# The function that is approximated has a singularity at x=1 and the closer α is  to 1 the slower the convergence rate
# ----------------------------------------------------------------------------------------------------------------------------------------------
