# ----------------------------------------------------------------------------------------------------------------------------------------------
# EXAMPLE 2.36 : Legendre polynomial showing explicit forms and expansion of monomials
# ----------------------------------------------------------------------------------------------------------------------------------------------
ORIGIN := 0
# Define Legendre Polynomials
P0(x) := 1
P1(x) := x
P2(x) := 1/2*(3*x^2 - 1)
P3(x) := 1/2*(5*x^3 - 3*x)
P4(x) := 1/8*(35*x^4 - 30*x^2 + 3)
P5(x) := 1/8*(63*x^5 - 70*x^3 + 15*x)
P6(x) := 1/16*(231*x^6 - 315*x^4 + 105*x^2 - 5)
P7(x) := 1/16*(429*x^7 - 693*x^5 + 315*x^3 - 35*x)
P8(x) := 1/128*(6435*x^8 - 12012*x^6 + 6930*x^4 - 1260*x^2 + 35)
P9(x) := 1/128*(12155*x^9 - 25740*x^7 + 18018*x^5 - 4620*x^3 + 315*x)
P10(x) := 1/256*(46189*x^10 - 109395*x^8 + 90090*x^6 - 30030*x^4 + 3465*x^2 - 63)
P11(x) := 1/256*(88179*x^11 - 230945*x^9 + 218790*x^7 - 90090*x^5 + 15015*x^3 - 693)
P12(x) := 1/1024*(676039*x^12 - 1939938*x^10 + 2078505*x^8 - 1021020*x^6 + 225225*x^4 - 18018*x^2 + 231)
# define powers of x as a series in Legendre polynomials with a triangular coefficient array c
# initialize the square  coefficient array to zero
k := 0 .. 12
c[k, k] := 0
c[0, 0] := 1
c[1, 1] := 1
x0(x) := c[0, 0]*P0(x)
x1(x) := c[1, 1]*P1(x)
c[2, 0] := 1/3
c[2, 2] := 2/3
c[3, 1] := 3/5
c[3, 3] := 2/5
x2(x) := c[2, 0]*P0(x) + c[2, 2]*P2(x)
x3(x) := c[3, 1]*P1(x) + c[3, 3]*P3(x)
c[4, 0] := 7/35
c[4, 2] := 20/35
c[4, 4] := 8/35
c[5, 1] := 27/63
c[5, 3] := 28/63
c[5, 5] := 8/63
x4(x) := c[4, 0]*P0(x) + c[4, 2]*P2(x) + c[4, 4]*P4(x)
x5(x) := c[5, 1]*P1(x) + c[5, 3]*P3(x) + c[5, 5]*P5(x)
c[6, 0] := 33/231
c[6, 2] := 110/231
c[6, 4] := 72/231
c[6, 6] := 16/231
x6(x) := c[6, 0]*P0(x) + c[6, 2]*P2(x) + c[6, 4]*P4(x) + c[6, 6]*P6(x)
c[7, 1] := 143/429
c[7, 3] := 182/429
c[7, 5] := 88/429
c[7, 7] := 16/429
x7(x) := c[7, 1]*P1(x) + c[7, 3]*P3(x) + c[7, 5]*P5(x) + c[7, 7]*P7(x)
c[8, 0] := 715/6435
c[8, 2] := 2600/6435
c[8, 4] := 2160/6435
c[8, 6] := 832/6435
c[8, 8] := 128/6435
x8(x) := c[8, 0]*P0(x) + c[8, 2]*P2(x) + c[8, 4]*P4(x) + c[8, 6]*P6(x) + c[8, 8]*P8(x)
c[9, 1] := 3315/12155
c[9, 3] := 4760/12155
c[9, 5] := 2992/12155
c[9, 7] := 960/12155
c[9, 9] := 128/12155
x9(x) := c[9, 1]*P1(x) + c[9, 3]*P3(x) + c[9, 5]*P5(x) + c[9, 7]*P7(x) + c[9, 9]*P9(x)
c[10, 0] := 4199/46189
c[10, 2] := 16150/46189
c[10, 4] := 15504/46189
c[10, 6] := 7904/46189
c[10, 8] := 2176/46189
c[10, 10] := 256/46189
x10(x) := c[10, 0]*P0(x) + c[10, 2]*P2(x) + c[10, 4]*P4(x) + c[10, 6]*P6(x) + c[10, 8]*P8(x) + c[10, 10]*P10(x)
c[11, 1] := 20349/88179
c[11, 3] := 31654/88179
c[11, 5] := 23408/88179
c[11, 7] := 10080/88179
c[11, 9] := 2432/88179
c[11, 11] := 256/88179
x11(x) := c[11, 1]*P1(x) + c[11, 3]*P3(x) + c[11, 5]*P5(x) + c[11, 7]*P7(x) + c[11, 9]*P9(x) + c[11, 11]*P11(x)
c[12, 0] := 52003/676039
c[12, 2] := 208012/676039
c[12, 4] := 220248/676039
c[12, 6] := 133952/676039
c[12, 8] := 50048/676039
c[12, 10] := 10752/676039
c[12, 12] := 1024/676039
x12(x) := c[12, 0]*P0(x) + c[12, 2]*P2(x) + c[12, 4]*P4(x) + c[12, 6]*P6(x) + c[12, 8]*P8(x) + c[12, 10]*P10(x) + c[12, 12]*P12(x)
# apply this to the power series for sin(x)/x truncated at the x^12 term
# the series is
f(x) := 1 - x^2/3! + x^4/5! - x^6/7! + x^8/9! - x^10/11! + x^12/13!
# with the general form
k := 1 .. 6
F(x) := sum((-1)^(k - 1)/(2*k - 1)!*x^(2*k - 2), k)
# check two values
x := 1
f(x) = 0.841471
F(x) = 0.841471
x := 0
f(x) = 1
F(x) = 1
# compute the coefficients of the Legendre series for sin(x)/x
# this series has only even order polynomials
j := 0, 1 .. 6
k := 0, 1 .. 6
K[j, k] := (-1)^j/(2*j + 1)!*c[2*j, 2*k]
h[k] := sum(K[j, k], j)
# Legendre series coefficients are
h[0] = 0.946083
h[1] = -0.106443
h[2] = 0.00184384
h[3] = -1.33908e-5
h[4] = 5.36465e-8
h[5] = -1.36296e-10
h[6] = 2.43247e-13
# set up grid in x for plots: showing the range [0,1]
# Minimum and maximum value of the range
xmin := 0
xmax := 1
# for plots set argument range
imax := 101
i := 1 .. imax
x[i] := xmin + (i - 1)*(xmax - xmin)/(imax - 1)
# compute the Legendre series on this grid for various increasing orders and check two values
L4[i] := h[0]*P0(x[i]) + h[1]*P2(x[i]) + h[2]*P4(x[i])
L4[1] = 0.999996
L4[101] = 0.841484
L6[i] := L4[i] + h[3]*P6(x[i])
L6[1] = 1
L6[101] = 0.841471
L8[i] := L6[i] + h[4]*P8(x[i])
L8[1] = 1
L8[101] = 0.841471
L10[i] := L8[i] + h[5]*P10(x[i])
L10[1] = 1
L10[101] = 0.841471
L12[i] := L10[i] + h[6]*P12(x[i])
L12[1] = 1
L12[101] = 0.841471
# tabulate the series value on this grid
S[i] := f(x[i])
# show the error for this order
error[i] := S[i] - L6[i]
S[1] = 1
L6[1] = 1
error[1] = 1.47026e-8
# check two values of argument
S[101] = 0.841471
L6[101] = 0.841471
error[101] = 5.35105e-8
# plot error scaled by 10^8
# [plot: 10^8*error[i] vs x[i]]
# ----------------------------------------------------------------------------------------------------------------------------------------------
