# ----------------------------------------------------------------------------------------------------------------------------------------------
# EXAMPLE 3.37 : Chebyshev polynomial showing explicit forms and expansion of monomials for sin(x)/x
# ----------------------------------------------------------------------------------------------------------------------------------------------
ORIGIN := 0
# Define Chebyshev Polynomials
T0(x) := 1
T1(x) := x
T2(x) := 2*x^2 - 1
T3(x) := 4*x^3 - 3*x
T4(x) := 8*x^4 - 8*x^2 + 1
T5(x) := 16*x^5 - 20*x^3 + 5*x
T6(x) := 32*x^6 - 48*x^4 + 18*x^2 - 1
T7(x) := 64*x^7 - 112*x^5 + 56*x^3 - 7*x
T8(x) := 128*x^8 - 256*x^6 + 160*x^4 - 32*x^2 + 1
T9(x) := 256*x^9 - 576*x^7 + 432*x^5 - 120*x^3 + 9*x
T10(x) := 512*x^10 - 1280*x^8 + 1120*x^6 - 400*x^4 + 50*x^2 - 1
T11(x) := 1024*x^11 - 2816*x^9 + 2816*x^7 - 1232*x^5 + 220*x^3 - 11*x
T12(x) := 2048*x^12 - 6144*x^10 + 6912*x^8 - 3584*x^6 + 840*x^4 - 72*x^2 + 1
# define powers of x as a series in Chebyshev polynomials with a triangular coefficient array c
# initialize the square  coefficient array to zero
k := 0 .. 12
c[k, k] := 0
c[0, 0] := 1
c[1, 1] := 1
x0(x) := c[0, 0]*T0(x)
x1(x) := c[1, 1]*T1(x)
c[2, 0] := 1/2
c[2, 2] := 1/2
c[3, 1] := 3/4
c[3, 3] := 1/4
x2(x) := c[2, 0]*T0(x) + c[2, 2]*T2(x)
x3(x) := c[3, 1]*T1(x) + c[3, 3]*T3(x)
c[4, 0] := 3/8
c[4, 2] := 4/8
c[4, 4] := 1/8
c[5, 1] := 10/16
c[5, 3] := 5/16
c[5, 5] := 1/16
x4(x) := c[4, 0]*T0(x) + c[4, 2]*T2(x) + c[4, 4]*T4(x)
x5(x) := c[5, 1]*T1(x) + c[5, 3]*T3(x) + c[5, 5]*T5(x)
c[6, 0] := 10/32
c[6, 2] := 15/32
c[6, 4] := 6/32
c[6, 6] := 1/32
x6(x) := c[6, 0]*T0(x) + c[6, 2]*T2(x) + c[6, 4]*T4(x) + c[6, 6]*T6(x)
c[7, 1] := 35/64
c[7, 3] := 21/64
c[7, 5] := 7/64
c[7, 7] := 1/64
x7(x) := c[7, 1]*T1(x) + c[7, 3]*T3(x) + c[7, 5]*T5(x) + c[7, 7]*T7(x)
c[8, 0] := 35/128
c[8, 2] := 56/128
c[8, 4] := 28/128
c[8, 6] := 8/128
c[8, 8] := 1/128
x8(x) := c[8, 0]*T0(x) + c[8, 2]*T2(x) + c[8, 4]*T4(x) + c[8, 6]*T6(x) + c[8, 8]*T8(x)
c[9, 1] := 126/256
c[9, 3] := 84/256
c[9, 5] := 36/256
c[9, 7] := 9/256
c[9, 9] := 1/256
x9(x) := c[9, 1]*T1(x) + c[9, 3]*T3(x) + c[9, 5]*T5(x) + c[9, 7]*T7(x) + c[9, 9]*T9(x)
c[10, 0] := 126/512
c[10, 2] := 210/512
c[10, 4] := 120/512
c[10, 6] := 45/512
c[10, 8] := 10/512
c[10, 10] := 1/512
x10(x) := c[10, 0]*T0(x) + c[10, 2]*T2(x) + c[10, 4]*T4(x) + c[10, 6]*T6(x) + c[10, 8]*T8(x) + c[10, 10]*T10(x)
c[11, 1] := 462/1024
c[11, 3] := 330/1024
c[11, 5] := 165/1024
c[11, 7] := 55/1024
c[11, 9] := 11/1024
c[11, 11] := 1/1024
x11(x) := c[11, 1]*T1(x) + c[11, 3]*T3(x) + c[11, 5]*T5(x) + c[11, 7]*T7(x) + c[11, 9]*T9(x) + c[11, 11]*T11(x)
c[12, 0] := 462/2048
c[12, 2] := 792/2048
c[12, 4] := 495/2048
c[12, 6] := 220/2048
c[12, 8] := 66/2048
c[12, 10] := 12/2048
c[12, 12] := 1/2048
x12(x) := c[12, 0]*T0(x) + c[12, 2]*T2(x) + c[12, 4]*T4(x) + c[12, 6]*T6(x) + c[12, 8]*T8(x) + c[12, 10]*T10(x) + c[12, 12]*T12(x)
# apply this to the power series for sin(x)/x and its derivative truncated at the x^12 term
# the series is
f(x) := 1 - x^2/3! + x^4/5! - x^6/7! + x^8/9! - x^10/11! + x^12/13!
# with the general form
k := 1 .. 6
F(x) := sum((-1)^(k - 1)/(2*k - 1)!*x^(2*k - 2), k)
# check two values
x := 1
f(x) = 0.841471
F(x) = 0.841471
x := 0
f(x) = 1
F(x) = 1
# and the derivative
fp(x) := -2*x/3! + 4*x^3/5! - 6*x^5/7! + 8*x^7/9! - 10*x^9/11! + 12*x^11/13!
# with the general form
k := 1 .. 6
Fp(x) := sum(2*k*(-1)^k/(2*k + 1)!*x^(2*k - 1), k)
# check two values
x := 1
fp(x) = -0.301169
Fp(x) = -0.301169
x := 0
fp(x) = 0
Fp(x) = 0
# compute the coefficients of the Chebyshev series for sin(x)/x
# this series has only even order polynomials
j := 0, 1 .. 6
k := 0, 1 .. 6
K[j, k] := (-1)^j/(2*j + 1)!*c[2*j, 2*k]
h[k] := sum(K[j, k], j)
# Chebyshev series coefficients are
h[0] = 0.91973
h[1] = -0.0792585
h[2] = 0.00100506
h[3] = -6.03035e-6
h[4] = 2.1045e-8
h[5] = -4.79889e-11
h[6] = 7.84133e-14
# compute the coefficients of the Chebyshev series for the derivative of sin(x)/x  this series has only odd order polynomials
j := 1 .. 6
k := 1 .. 6
Kp[j, k] := 2*j*(-1)^j/(2*j + 1)!*c[2*j - 1, 2*k - 1]
hp[k] := sum(Kp[j, k], j)
# Chebyshev series coefficients are
hp[0] := 0
hp[0] = 0
hp[1] = -0.309065
hp[2] = 0.00796846
hp[3] = -7.20284e-5
hp[4] = 3.35763e-7
hp[5] = -9.57897e-10
hp[6] = 1.88192e-12
# set up grid in x for plots: showing the range [0,1]
# Minimum and maximum value of the range
xmin := 0
xmax := 1
# for plots set argument range
imax := 101
i := 1 .. imax
x[i] := xmin + (i - 1)*(xmax - xmin)/(imax - 1)
# compute the Chebyshev series on this grid for various increasing orders and check two values
L4[i] := h[0]*T0(x[i]) + h[1]*T2(x[i]) + h[2]*T4(x[i])
L4[1] = 0.999994
L4[101] = 0.841477
L6[i] := L4[i] + h[3]*T6(x[i])
L6[1] = 1
L6[101] = 0.841471
L8[i] := L6[i] + h[4]*T8(x[i])
L8[1] = 1
L8[101] = 0.841471
L10[i] := L8[i] + h[5]*T10(x[i])
L10[1] = 1
L10[101] = 0.841471
L12[i] := L10[i] + h[6]*T12(x[i])
L12[1] = 1
L12[101] = 0.841471
# tabulate the series value on this grid
S[i] := f(x[i])
Sp[i] := fp(x[i])
x[101] = 1
# show the error for this order
error[i] := S[i] - L6[i]
S[1] = 1
L6[1] = 1
error[1] = 2.10931e-8
# check two values of argument
S[101] = 0.841471
L6[101] = 0.841471
error[101] = 2.09971e-8
# plot error scaled by 10^8
# [plot: 10^8*error[i] vs x[i]]
# compute the Chebyshev series derivative on this grid for various increasing orders and check two values
Lp5[i] := hp[1]*T1(x[i]) + hp[2]*T3(x[i]) + hp[3]*T5(x[i])
Lp5[1] = 0
Lp5[101] = -0.301169
Lp7[i] := Lp5[i] + hp[4]*T7(x[i])
Lp7[1] = 0
Lp7[101] = -0.301169
Lp9[i] := Lp7[i] + hp[5]*T9(x[i])
Lp9[1] = 0
Lp9[101] = -0.301169
Lp11[i] := Lp9[i] + hp[6]*T11(x[i])
Lp11[1] = 0
Lp11[101] = -0.301169
# tabulate the series value on this grid
S[i] := f(x[i])
Sp[i] := fp(x[i])
# show the error for this order
error[i] := Sp[i] - Lp9[i]
S[1] = 1
Lp9[1] = 0
error[1] = 0
# check two values of argument
Sp[101] = -0.301169
Lp9[101] = -0.301169
error[101] = 1.88188e-12
# plot error scaled by 10^12
# [plot: 10^12*error[i] vs x[i]]
# ----------------------------------------------------------------------------------------------------------------------------------------------
