# ----------------------------------------------------------------------------------------------------------------------------------------------
# EXAMPLE 2.38 : Chebyshev polynomials showing recurrence for coefficients of exp(x) and the derivative
# ----------------------------------------------------------------------------------------------------------------------------------------------
ORIGIN := 0
# Read in Chebyshev coefficients of the series expansion for exp(x)
c := READPRN("CEXP1X.PRN")
N := length(c)
N = 19
k := 0 .. N - 1
P[k] := c[k]
i := 0 .. 11
# Recurrence for coefficients of the derivative
Pp[N] := 0
Pp[N + 1] := 0
M := N - 2
m := M .. 0
Pp[m] := (2*m + 2)*P[m + 1] + Pp[m + 2]
P[i] = [2.53213; 1.13032; 0.271495; 0.0443368; 0.00547424; 0.000542926; 4.49773e-5; 3.19844e-6; 1.99212e-7; 1.10368e-8; 5.5059e-10; 2.49796e-11]
Pp[i] = [2.53213; 1.13032; 0.271495; 0.0443368; 0.00547424; 0.000542926; 4.49773e-5; 3.19844e-6; 1.99212e-7; 1.10368e-8; 5.5059e-10; 2.49796e-11]
P[i] - Pp[i] = [-3.10862e-15; 8.88178e-16; 5.55112e-16; 2.498e-16; 4.05058e-16; -4.39102e-17; -6.77626e-21; 1.27055e-21; 1.1382e-21; 3.30872e-23; 1.20758e-21; 3.17592e-23]
# Compute the L2 error of the Chebyshev series for exp(x) and the derivative
K := 0 .. N - 3
L2P[N - 2] := P[N - 1]^2
L2P[N - K - 3] := P[N - K - 2]^2 + L2P[N - K - 2]
L2P[K] := sqrt(π/2*L2P[K])
L2Pp[N - 2] := Pp[N - 1]^2
L2Pp[N - K - 3] := Pp[N - K - 2]^2 + L2Pp[N - K - 2]
L2Pp[K] := sqrt(π/2*L2Pp[K])
LOGL2P[K] := log(L2P[K])
LOGL2Pp[K] := log(L2Pp[K])  # show the Log L2 error curves
# [plot: LOGL2P[K], LOGL2Pp[K] vs K]
LOGL2P[i] = [0.163761; -0.462376; -1.25186; -2.16148; -3.16571; -4.24785; -5.39616; -6.60196; -7.85856; -9.16066; -10.504; -11.8849]
LOGL2Pp[i] = [0.163761; -0.462376; -1.25186; -2.16148; -3.16571; -4.24785; -5.39616; -6.60196; -7.85856; -9.16066; -10.504; -11.8849]
# ----------------------------------------------------------------------------------------------------------------------------------------------
