# ----------------------------------------------------------------------------------------------------------------------------------------------
# EXAMPLE 2.39 : Chebyshev polynomial showing explicit forms and expansion of monomials for sin(x)
# ----------------------------------------------------------------------------------------------------------------------------------------------
ORIGIN := 0
# Define Chebyshev Polynomials
T0(x) := 1
T1(x) := x
T2(x) := 2*x^2 - 1
T3(x) := 4*x^3 - 3*x
T4(x) := 8*x^4 - 8*x^2 + 1
T5(x) := 16*x^5 - 20*x^3 + 5*x
T6(x) := 32*x^6 - 48*x^4 + 18*x^2 - 1
T7(x) := 64*x^7 - 112*x^5 + 56*x^3 - 7*x
T8(x) := 128*x^8 - 256*x^6 + 160*x^4 - 32*x^2 + 1
T9(x) := 256*x^9 - 576*x^7 + 432*x^5 - 120*x^3 + 9*x
T10(x) := 512*x^10 - 1280*x^8 + 1120*x^6 - 400*x^4 + 50*x^2 - 1
T11(x) := 1024*x^11 - 2816*x^9 + 2816*x^7 - 1232*x^5 + 220*x^3 - 11*x
T12(x) := 2048*x^12 - 6144*x^10 + 6912*x^8 - 3584*x^6 + 840*x^4 - 72*x^2 + 1
# define powers of x as a series in Chebyshev polynomials with a triangular coefficient array c
# initialize the square  coefficient array to zero
k := 0 .. 12
c[k, k] := 0
c[0, 0] := 1
c[1, 1] := 1
x0(x) := c[0, 0]*T0(x)
x1(x) := c[1, 1]*T1(x)
c[2, 0] := 1/2
c[2, 2] := 1/2
c[3, 1] := 3/4
c[3, 3] := 1/4
x2(x) := c[2, 0]*T0(x) + c[2, 2]*T2(x)
x3(x) := c[3, 1]*T1(x) + c[3, 3]*T3(x)
c[4, 0] := 3/8
c[4, 2] := 4/8
c[4, 4] := 1/8
c[5, 1] := 10/16
c[5, 3] := 5/16
c[5, 5] := 1/16
x4(x) := c[4, 0]*T0(x) + c[4, 2]*T2(x) + c[4, 4]*T4(x)
x5(x) := c[5, 1]*T1(x) + c[5, 3]*T3(x) + c[5, 5]*T5(x)
c[6, 0] := 10/32
c[6, 2] := 15/32
c[6, 4] := 6/32
c[6, 6] := 1/32
x6(x) := c[6, 0]*T0(x) + c[6, 2]*T2(x) + c[6, 4]*T4(x) + c[6, 6]*T6(x)
c[7, 1] := 35/64
c[7, 3] := 21/64
c[7, 5] := 7/64
c[7, 7] := 1/64
x7(x) := c[7, 1]*T1(x) + c[7, 3]*T3(x) + c[7, 5]*T5(x) + c[7, 7]*T7(x)
c[8, 0] := 35/128
c[8, 2] := 56/128
c[8, 4] := 28/128
c[8, 6] := 8/128
c[8, 8] := 1/128
x8(x) := c[8, 0]*T0(x) + c[8, 2]*T2(x) + c[8, 4]*T4(x) + c[8, 6]*T6(x) + c[8, 8]*T8(x)
c[9, 1] := 126/256
c[9, 3] := 84/256
c[9, 5] := 36/256
c[9, 7] := 9/256
c[9, 9] := 1/256
x9(x) := c[9, 1]*T1(x) + c[9, 3]*T3(x) + c[9, 5]*T5(x) + c[9, 7]*T7(x) + c[9, 9]*T9(x)
c[10, 0] := 126/512
c[10, 2] := 210/512
c[10, 4] := 120/512
c[10, 6] := 45/512
c[10, 8] := 10/512
c[10, 10] := 1/512
x10(x) := c[10, 0]*T0(x) + c[10, 2]*T2(x) + c[10, 4]*T4(x) + c[10, 6]*T6(x) + c[10, 8]*T8(x) + c[10, 10]*T10(x)
c[11, 1] := 462/1024
c[11, 3] := 330/1024
c[11, 5] := 165/1024
c[11, 7] := 55/1024
c[11, 9] := 11/1024
c[11, 11] := 1/1024
x11(x) := c[11, 1]*T1(x) + c[11, 3]*T3(x) + c[11, 5]*T5(x) + c[11, 7]*T7(x) + c[11, 9]*T9(x) + c[11, 11]*T11(x)
c[12, 0] := 462/2048
c[12, 2] := 792/2048
c[12, 4] := 495/2048
c[12, 6] := 220/2048
c[12, 8] := 66/2048
c[12, 10] := 12/2048
c[12, 12] := 1/2048
x12(x) := c[12, 0]*T0(x) + c[12, 2]*T2(x) + c[12, 4]*T4(x) + c[12, 6]*T6(x) + c[12, 8]*T8(x) + c[12, 10]*T10(x) + c[12, 12]*T12(x)
# apply this to the power series for sin(x) truncated at the x^11 term
# the series is
f(x) := x - x^3/3! + x^5/5! - x^7/7! + x^9/9! - x^11/11!
# with the general form
k := 1 .. 6
F(x) := sum((-1)^(k - 1)/(2*k - 1)!*x^(2*k - 1), k)
# check three values
x := 1
f(x) = 0.841471
F(x) = 0.841471
x := 0.5
f(x) = 0.479426
F(x) = 0.479426
x := 0
f(x) = 0
F(x) = 0
# compute the coefficients of the Chebyshev series for sin(x)
# this series has only even order polynomials
j := 0, 1 .. 5
k := 0, 1 .. 5
K[j, k] := (-1)^j/(2*j + 1)!*c[2*j + 1, 2*k + 1]
h[k] := sum(K[j, k], j)
# Chebyshev series coefficients are written to a file for later use
h[0] = 0.880101
h[1] = -0.0391267
h[2] = 0.000499515
h[3] = -3.00466e-6
h[4] = 1.04955e-8
h[5] = -2.44649e-11
PRNPRECISION := 15
PRNCOLWIDTH := 22
h := WRITEPRN("SCIN1X.PRN", h)
# set up grid in x for plots: showing the range [0,1]
# Minimum and maximum value of the range
xmin := 0
xmax := 1
# for plots set argument range
imax := 101
i := 1 .. imax
x[i] := xmin + (i - 1)*(xmax - xmin)/(imax - 1)
# compute the Chebyshev series on this grid for various increasing orders and check two values
L5[i] := h[0]*T1(x[i]) + h[1]*T3(x[i]) + h[2]*T5(x[i])
L5[1] = 0
L5[51] = 0.479427
L5[101] = 0.841474
L7[i] := L5[i] + h[3]*T7(x[i])
L7[1] = 0
L7[51] = 0.479426
L7[101] = 0.841471
L9[i] := L7[i] + h[4]*T9(x[i])
L9[1] = 0
L9[51] = 0.479426
L9[101] = 0.841471
L11[i] := L9[i] + h[5]*T11(x[i])
L11[1] = 0
L11[51] = 0.479426
L11[101] = 0.841471
# tabulate the series value on this grid
S[i] := f(x[i])
# show the error for this order
error[i] := S[i] - L7[i]
S[1] = 0
L7[1] = 0
error[1] = 0
# check two values of argument
S[51] = 0.479426
L7[51] = 0.479426
error[51] = -1.05077e-8
S[101] = 0.841471
L7[101] = 0.841471
error[101] = 1.0471e-8
# plot error scaled by 10^8
# [plot: 10^8*error[i] vs x[i]]
# ----------------------------------------------------------------------------------------------------------------------------------------------
