# ----------------------------------------------------------------------------------------------------------------------------------------------
# EXAMPLE  2.4 : Taylor series about x=x0 for f(x) = sqrt(x), x[0,1]
# ----------------------------------------------------------------------------------------------------------------------------------------------
# Retain up to the 4th derivative term (Taylor polynomial of order 4).
# Compare the values of the series truncated at 2nd, 3rd, and 4th derivative terms to the exact value when x[0,1].
# Define the function and its derivatives then check values at
x0 := 1.
f(x) := sqrt(x)
f(x0) = 1
f1(x0) := d/dx0(f(x0))
f1(x0) = 0.5
f2(x0) := d/dx0(f1(x0))
f2(x0) = -0.25
f3(x0) := d/dx0(f2(x0))
f3(x0) = 0.375
f4(x0) := d/dx0(f3(x0))
f4(x0) = -0.9375
# generate a grid in argument values where the function is computed and evaluate the function and partial sums at all grid points
N := 9
xmax := 1.
i := 0 .. N
x[i] := i*xmax/N
root[i] := sqrt(x[i])
z := x - x0
sum2 := (f(x0) + f1(x0)*z + f2(x0)/2!*z^2)
sum3 := (sum2 + f3(x0)/3!*z^3)
sum4 := (sum3 + f4(x0)/4!*z^4)
# Tabulate values for exact and some partial sums with the error
E := root - sum4
x = [0; 0.111111; 0.222222; 0.333333; 0.444444; 0.555556; 0.666667; 0.777778; 0.888889; 1]
root = [0; 0.333333; 0.471405; 0.57735; 0.666667; 0.745356; 0.816497; 0.881917; 0.942809; 1]
sum3 = [0.3125; 0.412894; 0.506087; 0.592593; 0.672925; 0.747599; 0.81713; 0.88203; 0.942816; 1]
sum4 = [0.273438; 0.388508; 0.491792; 0.584877; 0.669204; 0.746075; 0.816647; 0.881935; 0.94281; 1]
E = [-0.273438; -0.0551745; -0.0203877; -0.00752627; -0.00253748; -0.000719301; -0.000150796; -1.78148e-5; -5.05362e-7; 0]
# ----------------------------------------------------------------------------------------------------------------------------------------------
