# ----------------------------------------------------------------------------------------------------------------------------------------------
# EXAMPLE  2.5 : Taylor series about x=x0 for f(x) = sqrt(x), x[0,π]
# ----------------------------------------------------------------------------------------------------------------------------------------------
# Retain up to the 4th derivative term (Taylor polynomial of order 4).
# Compare the values of the series truncated at 2nd, 3rd, and 4th derivative terms to the exact value when x[0,1].
# Define the function and its derivatives then check values at
x0 := 4.
f(x) := sqrt(x)
f(x0) = 2
f1(x0) := d/dx0(f(x0))
f1(x0) = 0.25
f2(x0) := d/dx0(f1(x0))
f2(x0) = -0.03125
f3(x0) := d/dx0(f2(x0))
f3(x0) = 0.0117188
f4(x0) := d/dx0(f3(x0))
f4(x0) = -0.00732422
# generate a grid in argument values where the function is computed and evaluate the function and partial sums at all grid points
N := 9
xmax := π
i := 0 .. N
x[i] := i*xmax/N
root[i] := sqrt(x[i])
z := x - x0
sum2 := (f(x0) + f1(x0)*z + f2(x0)/2!*z^2)
sum3 := (sum2 + f3(x0)/3!*z^3)
sum4 := (sum3 + f4(x0)/4!*z^4)
# Tabulate values for exact and some partial sums with the error
E := root - sum4
x = [0; 0.349066; 0.698132; 1.0472; 1.39626; 1.74533; 2.0944; 2.44346; 2.79253; 3.14159]
root = [0; 0.590818; 0.835543; 1.02333; 1.18164; 1.32111; 1.4472; 1.56316; 1.67109; 1.77245]
sum3 = [0.625; 0.783948; 0.933875; 1.07528; 1.20866; 1.33452; 1.45334; 1.56564; 1.67191; 1.77265]
sum4 = [0.546875; 0.729727; 0.897602; 1.05208; 1.19463; 1.32663; 1.44932; 1.56385; 1.67126; 1.77248]
E = [-0.546875; -0.138909; -0.062059; -0.0287533; -0.0129986; -0.00552028; -0.00211713; -0.000694382; -0.000177894; -2.97172e-5]
# ----------------------------------------------------------------------------------------------------------------------------------------------
