# ----------------------------------------------------------------------------------------------------------------------------------------------
# EXAMPLE  2.6 : Taylor series about x=x0 for f(x) = ln(1+x), x[0,1]
# ----------------------------------------------------------------------------------------------------------------------------------------------
# Retain up to the 4th derivative term (Taylor polynomial of order 4).
# Compare the error of the series truncated at 3rd, and 4th terms when x[0,1].
ff(x) := ln(1 + x)
# Define the function and its derivatives then check values at
x0 := 0
f1(x) := x
f2(x) := -1/2*x^2
f3(x) := 1/3*x^3
f4(x) := -1/4*x^4
f5(x) := 1/5*x^5
f1(x0) = 0
f2(x0) = 0
f3(x0) = 0
f4(x0) = 0
f5(x0) = 0
# input argument value and compute partial sum of order 4 and check against exact result
x := .1
sum := f1(x) + f2(x) + f3(x) + f4(x)
ff(x) = 0.0953102
sum = 0.0953083
ff(x) - sum = 1.84647e-6
# generate a grid of arbitrary argument values where the n-th order error term is computed
# order
n := 4
# grid
N := 10
xmax := π
i := 0 .. N
ε[i] := i*x/N
# 4-th order error term
# try 5-th order error term
E5[i] := ((-1)^n/(n + 1)*(x/(1 + ε[i]))^(n + 1))
n := 5
E6[i] := ((-1)^n/(n + 1)*(x/(1 + ε[i]))^(n + 1))
# 4-th order bound
max(|E5|) = 5.32808e-6
# 5-th order bound
max(|E6|) = 4.27233e-7
# Note how much smaller E6 is compared to E5. This suggest that if one more term is added to the series the approximant will be improved
# an order of magnitude gain: check the grid of values
sum := sum + f5(x)
ff(x) - sum = -1.53529e-7
ε[i] = [0; 0.01; 0.02; 0.03; 0.04; 0.05; 0.06; 0.07; 0.08; 0.09; 0.1]
|E5[i]|*10^6 = [2; 1.90293; 1.81146; 1.72522; 1.64385; 1.56705; 1.49452; 1.42597; 1.36117; 1.29986; 1.24184]
|E6[i]|*10^7 = [1.66667; 1.57008; 1.47995; 1.39581; 1.31719; 1.24369; 1.17493; 1.11057; 1.05028; 0.993779; 0.94079]
# ----------------------------------------------------------------------------------------------------------------------------------------------
