# ----------------------------------------------------------------------------------------------------------------------------------------------
# EXAMPLE  2.7 : Recurrence for the Legendre polynomial
# ----------------------------------------------------------------------------------------------------------------------------------------------
# Legendre polynomial largest order
n := 5
# range
k := 2 .. n
# for argument value
x := 0.5
P[0] := 1.0
P[1] := x
P[k] := (2*k - 1)/k*x*P[k - 1] - (k - 1)/k*P[k - 2]  # recurrence values
# then compare results to exact values
p[0] := 1
p[1] := x
p[2] := 1/2*(3*x^2 - 1)
p[3] := 1/2*(5*x^3 - 3*x)
p[4] := 1/8*(35*x^4 - 30*x^2 + 3)
p[5] := 1/8*(63*x^5 - 70*x^3 + 15*x)
# compare orders
i := 0 .. 5  # exact value  # recurrence value
i = [0; 1; 2; 3; 4; 5]
p[i] = [1; 0.5; -0.125; -0.4375; -0.289062; 0.0898438]
P[i] = [1; 0.5; -0.125; -0.4375; -0.289062; 0.0898438]
# ----------------------------------------------------------------------------------------------------------------------------------------------
