# ----------------------------------------------------------------------------------------------------------------------------------------------
# EXAMPLE  2.8 : Recurrence for the Chebyshev polynomial
# ----------------------------------------------------------------------------------------------------------------------------------------------
# Chebyshev polynomial largest order
n := 5
# range
k := 2 .. n
# for argument value
x := 0.5
T[0] := 1.0
T[1] := x
T[k] := 2*x*T[k - 1] - T[k - 2]  # recurrence values
# then compare results to exact values
t[0] := 1
t[1] := x
t[2] := 2*x^2 - 1
t[3] := 4*x^3 - 3*x
t[4] := 8*x^4 - 8*x^2 + 1
t[5] := 16*x^5 - 20*x^3 + 5*x
# compare orders
i := 0 .. 5  # exact value  # recurrence value
i = [0; 1; 2; 3; 4; 5]
t[i] = [1; 0.5; -0.5; -1; -0.5; 0.5]
T[i] = [1; 0.5; -0.5; -1; -0.5; 0.5]
# ----------------------------------------------------------------------------------------------------------------------------------------------
