# ----------------------------------------------------------------------------------------------------------------------------------------------
# EXAMPLE  2.9 : Evaluation of Legendre polynomials by recurrence and a plot on [-1,+1]
# ----------------------------------------------------------------------------------------------------------------------------------------------
# Legendre polynomial largest order
n := 5
# range
k := 2 .. n
# for argument range
xmin := -1
xmax := 1
# select the number of argument values
N := 30
i := 0 .. N
# set up a grid in argument values
x[i] := xmin + (i - 1)*(xmax - xmin)/(N - 1)
# initial values for polynomial | recurrence at each grid point in argument
P[i, 0] := 1
P[i, 1] := x[i]
P[:, k] := vectorize((2*k - 1)/k*x*P[:, k - 1] - (k - 1)/k*P[:, k - 2])
# [plot: P[i, 1], P[i, 2], P[i, 3], P[i, 4], P[i, 5] vs x[i]]
# ----------------------------------------------------------------------------------------------------------------------------------------------
