# -------------------------------------------------------------------------------------------------------------------------------------------
# EXAMPLE 3.1 Linear and quadratic interpolating polynomials
# -------------------------------------------------------------------------------------------------------------------------------------------
# For a set of data points compute
# the interpolating polynomial
ORIGIN := 1
x := [0; -1; 1]
f := [3; 5; -5]
# solve a 2x2 system of linear equations for coefficients of the linear interpolating polynomial in mononomial form
# (i) 1st stage  for first two data pairs
A := [1, x[1]^1; 1, x[2]^1]
A = [1, 0; 1, -1]
F := [3; 5]
c1 := A^-1*F
c1 = [3; -2]
# (ii) 2nd stage  for first two data pairs
A := [1, x[2]^1; 1, x[3]^1]
A = [1, -1; 1, 1]
F := [5; -5]
c2 := A^-1*F
c2 = [0; -5]
# solve a 3x3 system of linear equations for the coefficients of the quadratics interpolating polynomial in monomial form
A := [1, x[1], x[1]^2; 1, x[2], x[2]^2; 1, x[3], x[3]^2]
F := [3; 5; -5]
A = [1, 0, 0; 1, -1, 1; 1, 1, 1]
c := A^-1*F
c = [3; -5; -3]
# now construct the interpolating polynomials
i := 1 .. 21
t[i] := -1 + 0.1*(i - 1)
# two linear cases
p11[i] := c1[1] + c1[2]*t[i]
p12[i] := c2[1] + c2[2]*t[i]
# one quadratic case
p2[i] := c[1] + c[2]*t[i] + c[3]*t[i]^2
p12[i] := c2[1] + c2[2]*t[i]  # and inspect the plot
# [plot: p11, p12, p2 vs t]
# -------------------------------------------------------------------------------------------------------------------------------------------
