# -------------------------------------------------------------------------------------------------------------------------------------------
# EXAMPLE 3.10 : The divided difference table and the derivative
# -------------------------------------------------------------------------------------------------------------------------------------------
# For a set of data points compute
# the interpolating polynomial
ORIGIN := 1
imax := 4
# label index is
i := 1 .. imax
# minimum and maximum value of argument
xmin := 0.82
xmax := 0.84
# function to interpolate
y(x) := exp(x)
# set tabular values
x[i] := xmin + (i - 1)*(xmax - xmin)/(imax - 1)
F1[i] := 0
F2[i] := 0
F3[i] := 0
f[i] := y(x[i])
i := 1 .. imax - 1  # 1st divided difference column
F1[i] := (f[i + 1] - f[i])/(x[i + 1] - x[i])
i := 1 .. imax - 2  # 2nd divided difference column
F2[i] := (F1[i + 1] - F1[i])/(x[i + 2] - x[i])
F3 := [0; 0; 0; 0]
i := 1 .. imax - 3  # 3rd divided difference column
F3[i] := (F2[i + 1] - F2[i])/(x[i + 3] - x[i])
i := 1 .. imax
# Note that there are imax-1 divided difference columns and that the divided differences decrease as the column index increases.
i = [1; 2; 3; 4]
x = [0.82; 0.826667; 0.833333; 0.84]
f = [2.2705; 2.28569; 2.30098; 2.31637]
F1 = [2.27809; 2.29332; 2.30866; 0]
F2 = [1.14285; 1.15049; 0; 0]
F3 = [0.382222; 0; 0; 0]
# Now construct the Newton Polynomials with argument t (since 'x' is taken) using the uppermost diagonal (first row in this display) of the divided difference table and compute the approximation to the derivative
# n=2
dp1(t) := F1[1]
# n=3
dp2(t) := dp1(t) + F2[1]*(2*t - x[1] - x[2])
# n=4
F4(t) := (t - x[2])*(t - x[3]) + (t - x[1])*(t - x[3]) + (t - x[1])*(t - x[2])
dp3(t) := dp2(t) + F3[1]*F4(t)
# Try interpolating the function with these polynomials
t := 0.826
dp1(t) = 2.27809  # this is the linear interpolant
dp2(t) = 2.28418  # this is the quadratic interpolant
dp3(t) = 2.28416  # this is the cubic interpolant
y(t) = 2.28416  # this is the exact result
y(t) - dp2(t) = -1.64176e-5  # this is the quadratic interpolant error
y(t) - dp3(t) = 6.04197e-8  # this is the cubic interpolant error
# -------------------------------------------------------------------------------------------------------------------------------------------
