# -------------------------------------------------------------------------------------------------------------------------------------------
# EXAMPLE 3.11 : The numerical derivative and Richardson extrapolation
# -------------------------------------------------------------------------------------------------------------------------------------------
# For a set of data points compute
# the derivative of a function
ORIGIN := 1
imax := 5
# label index is
i := 1 .. imax
# minimum and maximum value of argument
xmin := 0.82
xmax := 0.84
# function to interpolate
y(x) := exp(x)
# set tabular values
x[i] := xmin + (i - 1)*(xmax - xmin)/(imax - 1)
f[i] := y(x[i])
# compute the derivative at the interior points
i := 1 .. imax - 1  # linear estimate
df1[i] := (f[i + 1] - f[i])/(x[i + 1] - x[i])
i := 2 .. imax - 1  # quadratic estimate
df2[i] := (f[i + 1] - f[i - 1])/(x[i + 1] - x[i - 1])
# compare linear and quadratic approximations of the derivative.
i = [2; 3; 4]
x = [0.82; 0.825; 0.83; 0.835; 0.84]
f = [2.2705; 2.28188; 2.29332; 2.30481; 2.31637]
df1 = [2.27619; 2.28759; 2.29906; 2.31059]
df2 = [0; 2.28189; 2.29333; 2.30482]
t := 0.826
y(t) - df1[3] = -0.0148978  # this is the linear estimate error
# this is the quadratic estimate error
y(t) - df2[3] = -0.00916451
# now try Richardson's extrapolation for the middle point i=3 and this requires estimates for ϕ(h) and ϕ(h/2)
i := 3
h := x[i + 2] - x[i - 2]
# the estimate for the derivative with step size h/2  is
# the estimate for the derivative with this step size is
ϕ1[i] := (f[i + 2] - f[i - 2])/(x[i + 2] - x[i - 2])
ϕ2[i] := df2[i]
# the first Richardson extrapolation is
df3[i] := (4*ϕ2[i] - ϕ1[i])/3  # so compare results
# for
h = 0.02
ϕ1[i] = 2.29336
ϕ1[i] - f[i] = 3.82222e-5
# for
h/2 = 0.01
ϕ2[i] = 2.29333
ϕ2[i] - f[i] = 9.55551e-6
# Richardson extrapolation
df3[i] = 2.29332
df3[i] - f[i] = -4.776e-11
# exact result
f[i] = 2.29332
# -------------------------------------------------------------------------------------------------------------------------------------------
