# -------------------------------------------------------------------------------------------------------------------------------------------
# EXAMPLE 3.2 Newton form of the interpolating polynomial for three data pairs
# -------------------------------------------------------------------------------------------------------------------------------------------
# For a set of data points compute
# the interpolating polynomial
ORIGIN := 1
imax := 3
# label index is
i := 1 .. imax
# minimum and maximum value of argument
xmin := 0.82
xmax := 0.84
# function to interpolate
y(x) := exp(x)  # set tabular argument values
x[i] := xmin + (i - 1)*(xmax - xmin)/(imax - 1)
f[i] := y(x[i])
i = [1; 2; 3]
x = [0.82; 0.83; 0.84]
f = [2.2705; 2.29332; 2.31637]
# construct the Newton polynomials with argument t
# n=1
p0(t) := f[1]
# solve for the constant c2
c2 := (f[2] - p0(x[2]))/(x[2] - x[1])
# n=2
p1(t) := p0(t) + c2*(t - x[1])  # solve for the constant c3
c3 := (f[3] - p1(x[3]))/((x[3] - x[1])*(x[3] - x[2]))
# n=3
p2(t) := p1(t) + c3*(t - x[1])*(t - x[2])
c2 = 2.28189
# values of the constants are
c3 = 1.14667
# interpolate the function with these polynomials at some t values
t := 0.826
p1(t) = 2.28419  # this is the linear interpolant
p2(t) = 2.28416  # this is the quadratic interpolant
exp(t) = 2.28416  # this is the exact result
t := 0.835
p1(t) = 2.30473  # this is the linear interpolant
p2(t) = 2.30481  # this is the quadratic interpolant
exp(t) = 2.30481  # this is the exact result
# -------------------------------------------------------------------------------------------------------------------------------------------
