# -------------------------------------------------------------------------------------------------------------------------------------------
# EXAMPLE 3.4 : The divided difference table and interpolation: equidistant data
# -------------------------------------------------------------------------------------------------------------------------------------------
# For a set of data points compute
# the interpolating polynomial
ORIGIN := 1
imax := 4
# label index is
i := 1 .. imax
# minimum and maximum value of argument
xmin := 0.82
xmax := 0.84
# function to interpolate
y(x) := exp(x)  # set tabular values
x[i] := xmin + (i - 1)*(xmax - xmin)/(imax - 1)
f[i] := y(x[i])
F1[i] := 0
F2[i] := 0
i := 1 .. imax - 1  # 1st divided difference column
F1[i] := (f[i + 1] - f[i])/(x[i + 1] - x[i])
i := 1 .. imax - 2  # 2nd divided difference column
F2[i] := (F1[i + 1] - F1[i])/(x[i + 2] - x[i])
F3 := [0; 0; 0; 0]
i := 1 .. imax - 3  # 3rd divided difference column
F3[i] := (F2[i + 1] - F2[i])/(x[i + 3] - x[i])
# Note that there are imax-1 divided difference columns and that the divided differences decrease as the column index increases.
i = [1]
x = [0.82; 0.826667; 0.833333; 0.84]
f = [2.2705; 2.28569; 2.30098; 2.31637]
F1 = [2.27809; 2.29332; 2.30866; 0]
F2 = [1.14285; 1.15049; 0; 0]
F3 = [0.382222; 0; 0; 0]
# Now construct the Newton Polynomials with argument t (since 'x' is taken) using the uppermost diagonal (first row in this display) of the divided difference table
# n=1
p0(t) := f[1]
# n=2
p1(t) := p0(t) + F1[1]*(t - x[1])
# n=3
p2(t) := p1(t) + F2[1]*(t - x[1])*(t - x[2])
# n=4
p3(t) := p2(t) + F3[1]*(t - x[1])*(t - x[2])*(t - x[3])
# Try interpolating the function with these polynomials
t := 0.826
p1(t) = 2.28417  # this is the linear interpolant
p2(t) = 2.28416  # this is the quadratic interpolant
p3(t) = 2.28416  # this is the cubic interpolant
y(t) = 2.28416  # this is the exact result
# -------------------------------------------------------------------------------------------------------------------------------------------
