# -------------------------------------------------------------------------------------------------------------------------------------------
# EXAMPLE 3.5 : The divided difference table and interpolation: non-equidistant data
# -------------------------------------------------------------------------------------------------------------------------------------------
# For a set of data points compute
# the interpolating polynomial
ORIGIN := 1
imax := 4
# label index is
i := 1 .. imax
# minimum and maximum value of argument
xmin := 0.82
xmax := 0.84
x[1] := xmin
u := xmax - xmin
# function to interpolate
y(x) := exp(x)  # set tabular values
F1[i] := 0
F2[i] := 0
x[2] := xmin + 0.25*u
x[3] := xmin + 0.7*u
x[4] := xmax
f[i] := y(x[i])
i := 1 .. imax - 1  # 1st divided difference column
F1[i] := (f[i + 1] - f[i])/(x[i + 1] - x[i])
i := 1 .. imax - 2  # 2nd divided difference column
F2[i] := (F1[i + 1] - F1[i])/(x[i + 2] - x[i])
F3 := [0; 0; 0; 0]
i := 1 .. imax - 3  # 3rd divided difference column
F3[i] := (F2[i + 1] - F2[i])/(x[i + 3] - x[i])
# Note that there are imax-1 divided difference columns and that the divided differences decrease as the column index increases.
i = [1]
x = [0.82; 0.825; 0.834; 0.84]
f = [2.2705; 2.28188; 2.30251; 2.31637]
F1 = [2.27619; 2.29218; 2.30943; 0]
F2 = [1.14247; 1.15011; 0; 0]
F3 = [0.382127; 0; 0; 0]
# Now construct the Newton Polynomials with argument t (since 'x' is taken) using the uppermost diagonal (first row in this display) of the divided difference table
# n=1
p0(t) := f[1]
# n=2
p1(t) := p0(t) + F1[1]*(t - x[1])
# n=3
p2(t) := p1(t) + F2[1]*(t - x[1])*(t - x[2])
# n=4
p3(t) := p2(t) + F3[1]*(t - x[1])*(t - x[2])*(t - x[3])
# Try interpolating the function with these polynomials
t := 0.826
p1(t) = 2.28416  # this is the linear interpolant
p2(t) = 2.28416  # this is the quadratic interpolant
p3(t) = 2.28416  # this is the cubic interpolant
y(t) = 2.28416  # this is the exact result
# -------------------------------------------------------------------------------------------------------------------------------------------
