# -------------------------------------------------------------------------------------------------------------------------------------------
# EXAMPLE 3.6 :  The Lagrange form of the interpolating polynomial
# -------------------------------------------------------------------------------------------------------------------------------------------
# For a set of data points compute
# the interpolating polynomial
ORIGIN := 1
imax := 4
# label index is
i := 1 .. imax
# minimum and maximum value of argument
xmin := 0.82
xmax := 0.84
# function to interpolate
y(x) := exp(x)  # set tabular values
x[i] := xmin + (i - 1)*(xmax - xmin)/(imax - 1)
f[i] := y(x[i])
# Now construct the Lagrange Polynomials with argument t (since 'x' is taken)
L11(t) := (t - x[2])/(x[1] - x[2])
L12(t) := (t - x[1])/(x[2] - x[1])
L21(t) := L11(t)*(t - x[3])/(x[1] - x[3])
L22(t) := L12(t)*(t - x[3])/(x[2] - x[3])
L23(t) := (t - x[1])/(x[3] - x[1])*(t - x[2])/(x[3] - x[2])
L31(t) := L21(t)*(t - x[4])/(x[1] - x[4])
L32(t) := L22(t)*(t - x[4])/(x[2] - x[4])
L33(t) := L23(t)*(t - x[4])/(x[3] - x[4])
L34(t) := (t - x[1])/(x[4] - x[1])*(t - x[2])/(x[4] - x[2])*(t - x[3])/(x[4] - x[3])
# n=2
p1(t) := f[1]*L11(t) + f[2]*L12(t)
# n=3
p2(t) := f[1]*L21(t) + f[2]*L22(t) + f[3]*L23(t)
# n=4
p3(t) := f[1]*L31(t) + f[2]*L32(t) + f[3]*L33(t) + f[4]*L34(t)
# Try interpolating the function with these polynomials
t := .826
p1(t) = 2.28417  # this is the linear interpolant
p2(t) = 2.28416  # this is the quadratic interpolant
p3(t) = 2.28416  # this is the cubic interpolant
y(t) = 2.28416  # this is the exact result
t := 0.835
p1(t) = 2.30467  # this is the linear interpolant
p2(t) = 2.30481  # this is the quadratic interpolant
p3(t) = 2.30481  # this is the cubic interpolant
y(t) = 2.30481  # this is the exact result
# -------------------------------------------------------------------------------------------------------------------------------------------
