# -------------------------------------------------------------------------------------------------------------------------------------------
# EXAMPLE 3.8 :  The Lagrange form of the interpolating polynomial with a special set of data pairs
# for the Runge function
# -------------------------------------------------------------------------------------------------------------------------------------------
# For a set of data points compute
# the interpolating polynomial
ORIGIN := 1
imax := 5
# label index is
i := 1 .. imax
# minimum and maximum value of argument
xmin := -5.0
xmax := 5.0
# function to interpolate | set tabular values
y(x) := 1/(1 + x^2)
x[i] := xmax*cos((2*(i - 1) + 1)/(2*(imax - 1) + 2)*π)
f[i] := y(x[i])
# Now construct the Lagrange Polynomials with argument t (since 'x' is taken)
L11(t) := (t - x[2])/(x[1] - x[2])
L12(t) := (t - x[1])/(x[2] - x[1])
L21(t) := L11(t)*(t - x[3])/(x[1] - x[3])
L22(t) := L12(t)*(t - x[3])/(x[2] - x[3])
L23(t) := (t - x[1])/(x[3] - x[1])*(t - x[2])/(x[3] - x[2])
L31(t) := L21(t)*(t - x[4])/(x[1] - x[4])
L32(t) := L22(t)*(t - x[4])/(x[2] - x[4])
L33(t) := L23(t)*(t - x[4])/(x[3] - x[4])
L34(t) := (t - x[1])/(x[4] - x[1])*(t - x[2])/(x[4] - x[2])*(t - x[3])/(x[4] - x[3])
L41(t) := L31(t)*(t - x[5])/(x[1] - x[5])
L42(t) := L32(t)*(t - x[5])/(x[2] - x[5])
L43(t) := L33(t)*(t - x[5])/(x[3] - x[5])
L44(t) := L34(t)*(t - x[5])/(x[4] - x[5])
L45(t) := (t - x[1])/(x[5] - x[1])*(t - x[2])/(x[5] - x[2])*(t - x[3])/(x[5] - x[3])*(t - x[4])/(x[5] - x[4])
# n=2
p1(t) := f[1]*L11(t) + f[2]*L12(t)
# n=3
p2(t) := f[1]*L21(t) + f[2]*L22(t) + f[3]*L23(t)
# n=4
p3(t) := f[1]*L31(t) + f[2]*L32(t) + f[3]*L33(t) + f[4]*L34(t)
# n=5
p4(t) := f[1]*L41(t) + f[2]*L42(t) + f[3]*L43(t) + f[4]*L44(t) + f[5]*L45(t)
# Try interpolating the function with these polynomials
t := .826
p1(t) = 0.175205  # this is the linear interpolant
p2(t) = 0.648594  # this is the quadratic interpolant
p3(t) = 0.791896  # this is the cubic interpolant
p4(t) = 0.905354  # this is the quartic interpolant
y(t) = 0.594433  # this is the exact result
t := 4.0
p1(t) = 0.0678872  # this is the linear interpolant
p2(t) = 0.0221915  # this is the quadratic interpolant
p3(t) = -0.0447955  # this is the cubic interpolant
p4(t) = -0.142543  # this is the quartic interpolant
y(t) = 0.0588235  # this is the exact result
t := -5.0, -4.9 .. 5.0  # plot of the exact result and the highest order approximant (dash-dot line)
# [plot: y(t), p4(t) vs t]
# plot the error curve
# [plot: y(t) - p4(t) vs t]
# Notice that the maximum error has been reduced by a different choice of data pairs.
# The arguments of these data pairs are the zeros of the Chebyshev polynomial of order 5 and they tend to cluster at the end points of the interval. To check these are zeros compute the polynomial values on this argument set.
x[i] := x[i]/5
T5 := vectorize(2*x*(8*x^4 - 8*x^2 + 1) - (4*x^3 - 3*x))
x = [0.951057; 0.587785; 0; -0.587785; -0.951057]
T5 = [-2.33147e-15; 2.22045e-16; 3.06152e-16; -8.88178e-16; 2.33147e-15]
# -------------------------------------------------------------------------------------------------------------------------------------------
