# -------------------------------------------------------------------------------------------------------------------------------------------
# EXAMPLE 3.9 : The divided difference table and interpolation error estimate
# -------------------------------------------------------------------------------------------------------------------------------------------
# For a set of data points compute
# the interpolating polynomial
ORIGIN := 1
imax := 4
# label index is
i := 1 .. imax
# minimum and maximum value of argument
xmin := 0.82
xmax := 0.84
u := xmax - xmin
# function to interpolate
y(x) := exp(x)
# set tabular values
x[1] := xmin
x[4] := xmax
F1[i] := 0
F2[i] := 0
x[2] := xmin + 0.25*u
x[3] := xmin + 0.7*u
f[i] := y(x[i])
i := 1 .. imax - 1  # 1st divided difference column
F1[i] := (f[i + 1] - f[i])/(x[i + 1] - x[i])
i := 1 .. imax - 2  # 2nd divided difference column
F2[i] := (F1[i + 1] - F1[i])/(x[i + 2] - x[i])
F3 := [0; 0; 0; 0]
i := 1 .. imax - 3  # 3rd divided difference column
F3[i] := (F2[i + 1] - F2[i])/(x[i + 3] - x[i])
# Note that there are imax-1 divided difference columns and that the divided differences decrease as the column index increases.
i = [1]
x = [0.82; 0.825; 0.834; 0.84]
f = [2.2705; 2.28188; 2.30251; 2.31637]
F1 = [2.27619; 2.29218; 2.30943; 0]
F2 = [1.14247; 1.15011; 0; 0]
F3 = [0.382127; 0; 0; 0]
# Now construct the Newton Polynomials with argument t (since 'x' is taken) using the uppermost diagonal (first row in this display) of the divided difference table
# estimate the error in p2 using the next tabular point and the 3rd divided difference
# n=1
p0(t) := f[1]
# n=2
p1(t) := p0(t) + F1[1]*(t - x[1])
# n=3
p2(t) := p1(t) + F2[1]*(t - x[1])*(t - x[2])
# n=4
e2(t) := F3[1]*(t - x[1])*(t - x[2])*(t - x[3])
# Try interpolating the function with these polynomials
t := 0.8225
p1(t) = 2.27619  # this is the linear interpolant
p2(t) = 2.27618  # this is the quadratic interpolant
y(t) = 2.27618  # this is the exact result
y(t) - p2(t) = 2.73454e-8  # this is the error
e2(t) = 2.74653e-8  # this is the estimate of the error
# the estimate is reliable at this value of the argument but is it always this good?
# To check compute the scaled error curve
jmax := 11
j := 1 .. jmax
s[j] := xmin + (j - 1)*(xmax - xmin)/(jmax - 1)
# estimate the error curve for p2 | compute the exact the error curve
E2[j] := 10^8*e2(s[j])
EX[j] := 10^8*(exp(s[j]) - p2(s[j]))
# tabulate both the estimated and the exact scaled error curve
s = [0.82; 0.822; 0.824; 0.826; 0.828; 0.83; 0.832; 0.834; 0.836; 0.838; 0.84]
EX = [0; 2.73895; 1.5224; -1.82779; -5.48612; -7.62342; -6.40688; 0; 13.4374; 35.7491; 68.7828]
E2 = [0; 2.75131; 1.52851; -1.83421; -5.50262; -7.64253; -6.41973; 0; 13.4509; 35.767; 68.7828]
EX - E2 = [0; -0.0123617; -0.006107; 0.00641489; 0.016502; 0.0191072; 0.0128452; 0; -0.0134676; -0.017913; -2.07462e-8]
# the agreement for this case is to two significant figures, however, in general this need not always be the case
# -------------------------------------------------------------------------------------------------------------------------------------------
