# -------------------------------------------------------------------------------------------------------------------------------------------
# EXAMPLE 4.1 : The Euclidean metric in an n=2 space
# -------------------------------------------------------------------------------------------------------------------------------------------
imax := 2
i := 1 .. imax
ORIGIN := 1
# Define any two points | Define the metric
ε := [1; 1]
η := [3; 3]
ρ(ε, η) := sqrt((ε[1] - η[1])^2 + (ε[2] - η[2])^2)
a := [ε[1]; η[1]]
b := [ε[2]; η[2]]
# [plot: a vs b]
# show this on a plot
# distance with this metric is
ρ(ε, η) = 2.82843
# -------------------------------------------------------------------------------------------------------------------------------------------
