# -------------------------------------------------------------------------------------------------------------------------------------------
# EXAMPLE 4.10 : The uniform metric in a function space
ORIGIN := 0
# -------------------------------------------------------------------------------------------------------------------------------------------
t_min := 0
t_max := π  # Choose a function
x(t) := t^2
y(t) := t*sin(t)
d(t) := |x(t) - y(t)|
TOL := 0.000001
# Define an inner product
ip_xy := integral(x(t)*y(t), t = t_min .. t_max)
ip_xx := integral(x(t)*x(t), t = t_min .. t_max)
ip_yy := integral(y(t)*y(t), t = t_min .. t_max)
ip_xy = 12.1567
ip_xx = 61.2039
ip_yy = 4.38231
# check the Cauchy inequality
ip_xy^2 = 147.786  # is less than or equal to
ip_xx*ip_yy = 268.215
# -------------------------------------------------------------------------------------------------------------------------------------------
