# -------------------------------------------------------------------------------------------------------------------------------------------
# EXAMPLE 4.11 : The Hilbert space for n=2
# -------------------------------------------------------------------------------------------------------------------------------------------
imax := 2
i := 1 .. imax
ORIGIN := 1
# Define any two points | Define the inner product
ε := [0; 0]
η := [3; 2]
ip(ε, η) := sum(ε[i]*η[i], i)
# the inner products have the values
norm(x) := sqrt(ip(x, x))
ip(ε, η) = 0
ip(ε, ε) = 0
ip(η, η) = 13
# norms are
norm(ε) = 0
norm(η) = 3.60555
u := [ε[1]; η[1]]
v := [ε[2]; η[2]]
# [plot: u vs v]
# show this on a plot
# In this schematic construct the Hilbert space is decomposed into a sum of two subspaces corresponding to
# 1. the horizontal axis and
# 2. the vertical axis
# with respective coordinates
x1 := [0; 1]
x2 := [1; 0]
# the coordinates of η are then given as
a1 := ip(η, x1)
a2 := ip(η, x2)
a1 = 2
a2 = 3
# -------------------------------------------------------------------------------------------------------------------------------------------
