# -------------------------------------------------------------------------------------------------------------------------------------------
# EXAMPLE 4.12 : The Hilbert space of functions for n=2
ORIGIN := 0
# -------------------------------------------------------------------------------------------------------------------------------------------
# Define the element to be approximated and basis elements for the n=2 Hilbert space
x(t) := 1 + t + t^2
P0(t) := 1
P1(t) := t
# the representation of x in an n=2 Hilbert space has coordinates obtainable from the inner product
a0 := integral(x(t)*P0(t), t = -1 .. 1)/integral(P0(t)^2, t = -1 .. 1)
a0 = 1.33333
# note that the basis in this case is the set of Legendre polynomials
a1 := integral(x(t)*P1(t), t = -1 .. 1)/integral(P1(t)^2, t = -1 .. 1)
a1 = 1
# now approximate x(t) in an n=2 Hilbert space
# with an error in the L2 norm
z(t) := a0*P0(t) + a1*P1(t)
enorm := sqrt(integral((x(t) - z(t))^2, t = -1 .. 1))
enorm = 0.421637
# inspect the error curve | and show this on a plot
i := 0 .. 20
t[i] := -1 + 0.1*i
E[i] := x(t[i]) - z(t[i])  # in this case the L2 error norm is not a good bound on the maximum error in the interval
# [plot: E vs t]
max(E) = 0.666667
# the error curve is a polynomial of order 2
# The next term of the Legendre basis is
P2(t) := 3/2*t^2 - 1/2
# and the basis would have a coefficient a2
a2 := integral(x(t)*P2(t), t = -1 .. 1)/integral(P2(t)^2, t = -1 .. 1)
a2 = 0.666667
# this is the same as max(E) above
# -------------------------------------------------------------------------------------------------------------------------------------------
