# -------------------------------------------------------------------------------------------------------------------------------------------
# EXAMPLE 4.13 : The Hilbert space for n=2 and the General Approximation problem
# -------------------------------------------------------------------------------------------------------------------------------------------
imax := 2
i := 1 .. imax
ORIGIN := 1
# Define the inner product
ip(ε, η) := sum(ε[i]*η[i], i)
# and the norm
norm(x) := sqrt(ip(x, x))
x := [3; 2]
# In this schematic construct the Hilbert space is decomposed into a sum of two subspaces corresponding to x1 and x2
x1 := [0; 1]
x2 := [1; 0]
# the coordinates of x are then given as
a1 := ip(x, x1)
a2 := ip(x, x2)
a1 = 2
a2 = 3
# now approximate x in the subspace x1 | the best approximation to x in x1 is
F_star := a1*x1
F_star = [0; 2]
norm(x - F_star) = 3
# any other approximation from x1 has a larger as may been seen by generating a sequence of approximants from
F(λ) := F_star + λ*x1
# for a range of λ values an corresponding norms
j := 1. .. 11
λ[j] := -2 + 0.4*(j - 1)
fλ[j] := norm(x - F(λ[j]))  # define the error of the best approximation
E_star := x - F_star
E_star = [3; 0]
# set up a table
col3[j] := ip(E_star, F(λ[j]))
col4[j] := fλ[j]^2 - norm(E_star)^2
col5[j] := norm(F(λ[j]) - F_star)^2
λ = [-2; -1.6; -1.2; -0.8; -0.4; 0; 0.4; 0.8; 1.2; 1.6; 2]
fλ = [3.60555; 3.4; 3.2311; 3.10483; 3.02655; 3; 3.02655; 3.10483; 3.2311; 3.4; 3.60555]
col3[j] = [0; 0; 0; 0; 0; 0; 0; 0; 0; 0; 0]
col4[j] = [4; 2.56; 1.44; 0.64; 0.16; 0; 0.16; 0.64; 1.44; 2.56; 4]
col5[j] = [4; 2.56; 1.44; 0.64; 0.16; 0; 0.16; 0.64; 1.44; 2.56; 4]
# col4 and col5 should be equal to demonstrate the Euclidean character of Hilbert space
# note minimum value of norm(x-F_star) = 3, when λ =0 | col3 has a zero inner product
# -------------------------------------------------------------------------------------------------------------------------------------------
