# ----------------------------------------------------------------------------------------------------------------------------------------------
# -------------------------------------------------------------------------------------------------------------------------------------------
# EXAMPLE  4.14 : Chebyshev coefficients of exp(zx) from integer order Bessel functions
# -------------------------------------------------------------------------------------------------------------------------------------------
# (See Section 3.1, 3.6 and 5.9 for information on expressions used here for this function)
# Maximum order
n := 36
# index ranges
M := n + 20  # argument range
# note that the recurrence starting values
m := M - 1 .. M
z := 1.0
# set up starting values using the asymptotic expansion for large orders
J[m] := 1/sqrt(2*π*m)*(e*z/(2*m))^m
# do downward recurrence in order at each value of the argument
m := 0 .. M - 2
J[M - m - 2] := (2*M - 2*m - 2)/z*J[M - m - 1] - J[M - m]
m := 1 .. M
# calculate the normalization constant and normalize orders 0 to n at each value of the argument
σ := J[0]^2 + 2.0*sum(J[m]^2, m)
σ := sqrt(σ)
m := 0 .. n
J[m] := J[m]/σ
# Chebyshev coefficients from Eqs.(4.103,4.105) with z=1
k := 0 .. n/2
i := 0 .. n
IT[k] := 2*sum(J[k + i]/i!, i)
m = [
    0; 1; 2; 3; 4; 5; 6; 7; 8; 9
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]
k = [0; 1; 2; 3; 4; 5; 6; 7; 8; 9; 10; 11; 12; 13; 14; 15; 16; 17; 18]
IT[k] = [2.53213; 1.13032; 0.271495; 0.0443368; 0.00547424; 0.000542926; 4.49773e-5; 3.19844e-6; 1.99212e-7; 1.10368e-8; 5.5059e-10; 2.49796e-11; 1.03915e-12; 3.99126e-14; 0; 0; 0; 0; 0]
J[m] = [
    0.765198; 0.440051; 0.114903; 0.0195634; 0.00247664; 0.000249758; 2.09383e-5; 1.50233e-6; 9.42234e-8; 5.24925e-9
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]
PRNPRECISION := 15
PRNCOLWIDTH := 20
# write out Chebyshev coefficients
IT := WRITEPRN("CEXP1X.PRN", IT)
# -------------------------------------------------------------------------------------------------------------------------------------------
