# ----------------------------------------------------------------------------------------------------------------------------------------------
# -------------------------------------------------------------------------------------------------------------------------------------------
# EXAMPLE  4.15 : Recurrence for the Chebyshev series and L2 error for the special case of exp(zx)
# ------------------------------------------------------------------------------------------------------------------------------------------
# (See Section 5.9 for information on expressions used here for this function)
c := READPRN("CEXP1X.PRN")
N := length(c)
N = 19
j := 1 .. N - 1
z := 1
i := 0 .. N - 1
b[i] := c[i]
# Compute the L2 error of the Chebyshev series for exp(zx) , z=1
K := 0 .. N - 3
L2T[N - 2] := b[N - 1]^2
L2T[N - K - 3] := b[N - K - 2]^2 + L2T[N - K - 2]
L2T[K] := sqrt(π/2*L2T[K])
LOGL2T[K] := log(L2T[K])
# [plot: LOGL2T[K] vs K]
LOGL2T = [0.163761; -0.462376; -1.25186; -2.16148; -3.16571; -4.24785; -5.39616; -6.60196; -7.85856; -9.16066; -10.504; -11.8849; -13.3006; -14.7483; -16.2259; -17.7314; -19.2633]
L2T = [1.45801; 0.344845; 0.0559941; 0.00689484; 0.0006828; 5.65136e-5; 4.01644e-6; 2.5006e-7; 1.38498e-8; 6.90773e-10; 3.13344e-11; 1.30335e-12; 5.00549e-14; 0; 0; 0; 0; 0]
# Recurrence for the Chebyshev polynomial of order up to
km := N - 1
k := 2 .. km
N = 19
imax := 21  # label index
i := 1 .. imax
ORIGIN = 0
# Minimum and maximum value of the argument
xmin := -1
xmax := 1
# argument range
x[i] := xmin + (i - 1)*(xmax - xmin)/(imax - 1)
# initial values for the Chebyshev polynomials
# and recurrence
T[i, 0] := 1.0
T[i, 1] := x[i]
T[:, k] := vectorize(2*x*T[:, k - 1] - T[:, k - 2])
# exact function value is | Chebyshev series value is | error is
EA[i] := exp(x[i])
k := 1 .. km
TA[i] := (1/2*b[0] + sum(b[k]*T[i, k], k = 1 .. km))
e[i] := EA[i] - TA[i]
i = [1; 2; 3; 4; 5; 6; 7; 8; 9; 10; 11; 12; 13; 14; 15; 16; 17; 18; 19; 20; 21]
x = [0; -1; -0.9; -0.8; -0.7; -0.6; -0.5; -0.4; -0.3; -0.2; -0.1; 0; 0.1; 0.2; 0.3; 0.4; 0.5; 0.6; 0.7; 0.8; 0.9; 1]
EA = [0; 0.367879; 0.40657; 0.449329; 0.496585; 0.548812; 0.606531; 0.67032; 0.740818; 0.818731; 0.904837; 1; 1.10517; 1.2214; 1.34986; 1.49182; 1.64872; 1.82212; 2.01375; 2.22554; 2.4596; 2.71828]
TA = [0; 0.367879; 0.40657; 0.449329; 0.496585; 0.548812; 0.606531; 0.67032; 0.740818; 0.818731; 0.904837; 1; 1.10517; 1.2214; 1.34986; 1.49182; 1.64872; 1.82212; 2.01375; 2.22554; 2.4596; 2.71828]
e = [0; -1.9984e-15; -1.9984e-15; -1.66533e-15; -1.55431e-15; -1.55431e-15; -1.33227e-15; -1.33227e-15; -1.44329e-15; -1.11022e-15; -1.11022e-15; -1.11022e-15; -1.11022e-15; -1.11022e-15; -1.33227e-15; -1.33227e-15; -1.33227e-15; -1.55431e-15; -1.33227e-15; -1.77636e-15; -1.77636e-15; -2.22045e-15]
# -------------------------------------------------------------------------------------------------------------------------------------------
