# ----------------------------------------------------------------------------------------------------------------------------------------------
# -------------------------------------------------------------------------------------------------------------------------------------------
# EXAMPLE  4.16 : Convolution of two Chebyshev series to form exp(zx)*exp(zx), for z=1
# ------------------------------------------------------------------------------------------------------------------------------------------
# Read in Chebyshev coefficients for the series expansion of exp(zx), z=1, into vector c
c := READPRN("CHEBEXP.PRN")
N := length(c)
N = 19
j := 1 .. N - 1
z := 1
i := 0 .. N - 1
b[i] := c[i]
a[i] := c[i]
# set to zero to minimize truncation error in j summation
a[N + j - 1] := 0
b[N + j - 1] := 0
c[0] := 1/2*a[0]*b[0] + sum(a[j]*b[j], j)
k := 1 .. N - 1
c[k] := 1/2*a[0]*b[k] + 1/2*sum(a[j]*(b[|k - j|] + b[k + j]), j)
# [plot: c[j] vs j]
b = [
    2.53213; 1.13032; 0.271495; 0.0443368; 0.00547424; 0.000542926; 4.49773e-5; 3.19844e-6; 1.99212e-7; 1.10368e-8
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]
c = [4.55917; 3.18127; 1.3779; 0.42548; 0.101457; 0.0196514; 0.00320035; 0.000449278; 5.53987e-5; 6.08837e-6; 6.03393e-7; 5.4444e-8; 4.50826e-9; 3.44903e-10; 2.45197e-11; 1.62789e-12; 1.01371e-13; 0; 0]
length(b) = 37
length(c) = 19
# check error on a grid in argument
# Recurrence for the Chebyshev polynomial of order up to
km := N - 1
k := 2 .. km
N = 19
imax := 21  # label index
i := 1 .. imax
ORIGIN = 0
# Minimum and maximum value of the argument
xmin := -1
xmax := 1
# argument range
x[i] := xmin + (i - 1)*(xmax - xmin)/(imax - 1)
# initial values for the Chebyshev polynomials
# and recurrence
T[i, 0] := 1.0
T[i, 1] := x[i]
T[:, k] := vectorize(2*x*T[:, k - 1] - T[:, k - 2])
# exact function value is | Chebyshev series value is | error is
EA[i] := exp(x[i])*exp(x[i])
k := 1 .. km
TA[i] := (1/2*c[0] + sum(c[k]*T[i, k], k = 1 .. km))
e[i] := EA[i] - TA[i]
i = [1; 2; 3; 4; 5; 6; 7; 8; 9; 10; 11; 12; 13; 14; 15; 16; 17; 18; 19; 20; 21]
x = [0; -1; -0.9; -0.8; -0.7; -0.6; -0.5; -0.4; -0.3; -0.2; -0.1; 0; 0.1; 0.2; 0.3; 0.4; 0.5; 0.6; 0.7; 0.8; 0.9; 1]
EA = [0; 0.135335; 0.165299; 0.201897; 0.246597; 0.301194; 0.367879; 0.449329; 0.548812; 0.67032; 0.818731; 1; 1.2214; 1.49182; 1.82212; 2.22554; 2.71828; 3.32012; 4.0552; 4.95303; 6.04965; 7.38906]
TA = [0; 0.135335; 0.165299; 0.201897; 0.246597; 0.301194; 0.367879; 0.449329; 0.548812; 0.67032; 0.818731; 1; 1.2214; 1.49182; 1.82212; 2.22554; 2.71828; 3.32012; 4.0552; 4.95303; 6.04965; 7.38906]
e = [0; -1.88738e-15; -1.69309e-15; -1.63758e-15; -2.08167e-15; -1.55431e-15; -2.44249e-15; -2.16493e-15; -2.22045e-15; -1.66533e-15; -2.44249e-15; -2.88658e-15; -2.88658e-15; -3.33067e-15; -3.9968e-15; -4.44089e-15; -4.44089e-15; -5.32907e-15; -5.32907e-15; -6.21725e-15; -1.06581e-14; -1.15463e-14]
# write Chebyshev coefficients of exp(2*x) obtained from exp(2*x)=exp(x)*exp(x)
PRNPRECISION := 15
PRNCOLWIDTH := 20
c := WRITEPRN("CHEB2EXP.PRN", c)
# -------------------------------------------------------------------------------------------------------------------------------------------
