# ----------------------------------------------------------------------------------------------------------------------------------------------
# -------------------------------------------------------------------------------------------------------------------------------------------
# EXAMPLE  4.17 : Recurrence for the Chebyshev series and L2 error for the special case of exp(zx)
# ------------------------------------------------------------------------------------------------------------------------------------------
# (See Section 5.9 for information on expressions used here for this function)
c := READPRN("CHEB2EXP.PRN")
N := length(c)
N = 19
j := 1 .. N - 1
z := 2
i := 0 .. N - 1
b[i] := c[i]
# Compute the L2 error of the Chebyshev series for exp(zx) , z=2
K := 0 .. N - 3
L2T[N - 2] := b[N - 1]^2
L2T[N - K - 3] := b[N - K - 2]^2 + L2T[N - K - 2]
L2T[K] := sqrt(π/2*L2T[K])
LOGL2T[K] := log(L2T[K])
# [plot: LOGL2T[K] vs K]
LOGL2T = [0.641432; 0.258167; -0.260603; -0.887448; -1.60275; -2.39244; -3.24611; -4.15581; -5.1153; -6.11957; -7.1645; -8.24666; -9.36314; -10.5115; -11.6895; -12.8953; -14.1272]
L2T = [4.37958; 1.81204; 0.548779; 0.129584; 0.0249602; 0.00405097; 0.000567403; 6.98542e-5; 7.66833e-6; 7.59334e-7; 6.84704e-8; 5.66686e-9; 4.33368e-10; 3.07988e-11; 2.04422e-12; 1.27269e-13; 0; 0]
# Recurrence for the Chebyshev polynomial of order up to
km := N - 1
k := 2 .. km
N = 19
imax := 21  # label index
i := 1 .. imax
ORIGIN = 0
# Minimum and maximum value of the argument
xmin := -1
xmax := 1
# argument range
x[i] := xmin + (i - 1)*(xmax - xmin)/(imax - 1)
# initial values for the Chebyshev polynomials
# and recurrence
T[i, 0] := 1.0
T[i, 1] := x[i]
T[:, k] := vectorize(2*x*T[:, k - 1] - T[:, k - 2])
# exact function value is | Chebyshev series value is | error is
EA[i] := exp(2*x[i])
k := 1 .. km
TA[i] := (1/2*b[0] + sum(b[k]*T[i, k], k = 1 .. km))
e[i] := EA[i] - TA[i]
i = [1; 2; 3; 4; 5; 6; 7; 8; 9; 10; 11; 12; 13; 14; 15; 16; 17; 18; 19; 20; 21]
x = [0; -1; -0.9; -0.8; -0.7; -0.6; -0.5; -0.4; -0.3; -0.2; -0.1; 0; 0.1; 0.2; 0.3; 0.4; 0.5; 0.6; 0.7; 0.8; 0.9; 1]
EA = [0; 0.135335; 0.165299; 0.201897; 0.246597; 0.301194; 0.367879; 0.449329; 0.548812; 0.67032; 0.818731; 1; 1.2214; 1.49182; 1.82212; 2.22554; 2.71828; 3.32012; 4.0552; 4.95303; 6.04965; 7.38906]
TA = [0; 0.135335; 0.165299; 0.201897; 0.246597; 0.301194; 0.367879; 0.449329; 0.548812; 0.67032; 0.818731; 1; 1.2214; 1.49182; 1.82212; 2.22554; 2.71828; 3.32012; 4.0552; 4.95303; 6.04965; 7.38906]
e = [0; -4.10783e-15; -3.02536e-15; -1.63758e-15; -1.19349e-15; -7.21645e-16; -6.66134e-16; 1.11022e-16; 0; 2.22045e-16; 6.66134e-16; 2.22045e-16; 6.66134e-16; 0; 0; -4.44089e-16; -8.88178e-16; -1.33227e-15; -2.66454e-15; -3.55271e-15; -7.10543e-15; -9.76996e-15]
# -------------------------------------------------------------------------------------------------------------------------------------------
