# ----------------------------------------------------------------------------------------------------------------------------------------------
# -------------------------------------------------------------------------------------------------------------------------------------------
# EXAMPLE  4.18 : Convolution of two Chebyshev series to form exp(zx)*exp(zx), for z=2
# ------------------------------------------------------------------------------------------------------------------------------------------
# Read in Chebyshev coefficients for the series expansion of exp(zx), z=2, into vector c
c := READPRN("CHEB2EXP.PRN")
N := length(c)
N = 19
j := 1 .. N - 1
z := 2
i := 0 .. N - 1
b[i] := c[i]
a[i] := c[i]
# set to zero to minimize truncation error in j summation
a[N + j - 1] := 0
b[N + j - 1] := 0
c[0] := 1/2*a[0]*b[0] + sum(a[j]*b[j], j)
k := 1 .. N - 1
c[k] := 1/2*a[0]*b[k] + 1/2*sum(a[j]*(b[|k - j|] + b[k + j]), j)
# [plot: c[j] vs j]
b = [
    4.55917; 3.18127; 1.3779; 0.42548; 0.101457; 0.0196514; 0.00320035; 0.000449278; 5.53987e-5; 6.08837e-6
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]
c = [22.6038; 19.5189; 12.8444; 6.67455; 2.83255; 1.00945; 0.30893; 0.0826599; 0.0196199; 0.00418051; 0.000807578; 0.000142616; 2.31874e-5; 3.49196e-6; 4.89675e-7; 6.42347e-8; 7.91444e-9; 9.19232e-10; 1.00968e-10]
length(b) = 37
length(c) = 19
# check error on a grid in argument
# Recurrence for the Chebyshev polynomial of order up to
km := N - 1
k := 2 .. km
N = 19
imax := 21  # label index
i := 1 .. imax
ORIGIN = 0
# Minimum and maximum value of the argument
xmin := -1
xmax := 1
# argument range
x[i] := xmin + (i - 1)*(xmax - xmin)/(imax - 1)
# initial values for the Chebyshev polynomials
# and recurrence
T[i, 0] := 1.0
T[i, 1] := x[i]
T[:, k] := vectorize(2*x*T[:, k - 1] - T[:, k - 2])
# exact function value is | Chebyshev series value is | error is
EA[i] := exp(2*x[i])*exp(2*x[i])
k := 1 .. km
TA[i] := (1/2*c[0] + sum(c[k]*T[i, k], k = 1 .. km))
e[i] := EA[i] - TA[i]
i = [1; 2; 3; 4; 5; 6; 7; 8; 9; 10; 11; 12; 13; 14; 15; 16; 17; 18; 19; 20; 21]
x = [0; -1; -0.9; -0.8; -0.7; -0.6; -0.5; -0.4; -0.3; -0.2; -0.1; 0; 0.1; 0.2; 0.3; 0.4; 0.5; 0.6; 0.7; 0.8; 0.9; 1]
EA = [0; 0.0183156; 0.0273237; 0.0407622; 0.0608101; 0.090718; 0.135335; 0.201897; 0.301194; 0.449329; 0.67032; 1; 1.49182; 2.22554; 3.32012; 4.95303; 7.38906; 11.0232; 16.4446; 24.5325; 36.5982; 54.5982]
TA = [0; 0.0183156; 0.0273237; 0.0407622; 0.0608101; 0.090718; 0.135335; 0.201897; 0.301194; 0.449329; 0.67032; 1; 1.49182; 2.22554; 3.32012; 4.95303; 7.38906; 11.0232; 16.4446; 24.5325; 36.5982; 54.5982]
e = [0; -9.56661e-12; 6.03109e-12; -8.98433e-12; 7.73696e-12; -2.58897e-12; -5.68401e-12; 1.00638e-11; -3.98259e-12; -7.21861e-12; 9.43057e-12; 1.03917e-12; -1.02862e-11; 5.90816e-12; 6.01741e-12; -1.08153e-11; 4.63274e-12; 4.57234e-12; -9.80549e-12; 1.09175e-11; -8.05045e-12; 1.15321e-11]
# write Chebyshev coefficients of exp(2*x) obtained from exp(2*x)=exp(x)*exp(x)
PRNPRECISION := 15
PRNCOLWIDTH := 20
c := WRITEPRN("CHEB4EXP.PRN", c)
# -------------------------------------------------------------------------------------------------------------------------------------------
