# ----------------------------------------------------------------------------------------------------------------------------------------------
# -------------------------------------------------------------------------------------------------------------------------------------------
# EXAMPLE  4.19 : Recurrence for the Chebyshev series and L2 error for the special case of exp(zx)
# ------------------------------------------------------------------------------------------------------------------------------------------
# (See Section 5.9 for information on expressions used here for this function)
c := READPRN("CHEB4EXP.PRN")
N := length(c)
N = 19
j := 1 .. N - 1
z := 4
i := 0 .. N - 1
b[i] := c[i]
# Compute the L2 error of the Chebyshev series for exp(zx) , z=4
K := 0 .. N - 3
L2T[N - 2] := b[N - 1]^2
L2T[N - K - 3] := b[N - K - 2]^2 + L2T[N - K - 2]
L2T[K] := sqrt(π/2*L2T[K])
LOGL2T[K] := log(L2T[K])
# [plot: LOGL2T[K] vs K]
LOGL2T = [1.48701; 1.26796; 0.963025; 0.578652; 0.122991; -0.396211; -0.972198; -1.59924; -2.27251; -2.98791; -3.74198; -4.53172; -5.35457; -6.20827; -7.09085; -8.00058; -8.93591]
L2T = [30.6911; 18.5335; 9.18386; 3.79011; 1.32737; 0.401595; 0.106611; 0.0251629; 0.00533943; 0.00102823; 0.000181144; 2.93953e-5; 4.42009e-6; 6.19055e-7; 8.11234e-8; 9.98676e-9; 1.15902e-9; 0]
# Recurrence for the Chebyshev polynomial of order up to
km := N - 1
k := 2 .. km
N = 19
imax := 21  # label index
i := 1 .. imax
ORIGIN = 0
# Minimum and maximum value of the argument
xmin := -1
xmax := 1
# argument range
x[i] := xmin + (i - 1)*(xmax - xmin)/(imax - 1)
# initial values for the Chebyshev polynomials
# and recurrence
T[i, 0] := 1.0
T[i, 1] := x[i]
T[:, k] := vectorize(2*x*T[:, k - 1] - T[:, k - 2])
# exact function value is | Chebyshev series value is | error is
EA[i] := exp(4*x[i])
k := 1 .. km
TA[i] := (1/2*b[0] + sum(b[k]*T[i, k], k = 1 .. km))
e[i] := EA[i] - TA[i]
i = [1; 2; 3; 4; 5; 6; 7; 8; 9; 10; 11; 12; 13; 14; 15; 16; 17; 18; 19; 20; 21]
x = [0; -1; -0.9; -0.8; -0.7; -0.6; -0.5; -0.4; -0.3; -0.2; -0.1; 0; 0.1; 0.2; 0.3; 0.4; 0.5; 0.6; 0.7; 0.8; 0.9; 1]
EA = [0; 0.0183156; 0.0273237; 0.0407622; 0.0608101; 0.090718; 0.135335; 0.201897; 0.301194; 0.449329; 0.67032; 1; 1.49182; 2.22554; 3.32012; 4.95303; 7.38906; 11.0232; 16.4446; 24.5325; 36.5982; 54.5982]
TA = [0; 0.0183156; 0.0273237; 0.0407622; 0.0608101; 0.090718; 0.135335; 0.201897; 0.301194; 0.449329; 0.67032; 1; 1.49182; 2.22554; 3.32012; 4.95303; 7.38906; 11.0232; 16.4446; 24.5325; 36.5982; 54.5982]
e = [0; -9.55595e-12; 6.02576e-12; -9.00208e-12; 7.71387e-12; -2.62096e-12; -5.71954e-12; 1.00246e-11; -4.02522e-12; -7.26297e-12; 9.38605e-12; 9.9476e-13; -1.03273e-11; 5.87441e-12; 5.98988e-12; -1.08313e-11; 4.63274e-12; 4.58478e-12; -9.76996e-12; 1.09708e-11; -7.97229e-12; 1.16103e-11]
# -------------------------------------------------------------------------------------------------------------------------------------------
