# -------------------------------------------------------------------------------------------------------------------------------------------
# EXAMPLE 4.2 : Another metric in an n=2 space
# -------------------------------------------------------------------------------------------------------------------------------------------
jmax := 20
j := 1. .. jmax + 1  # Define the metric as an arc length
ORIGIN := 1
# Define any two points
ε := [1; 1]
η := [3; 3]  # r is the radius a circle and θ is the angle subtended by the two points at the center
ρ(r, θ) := r*θ
# Prepare a plot
R := 2.828427/2
σ[j] := 2*π*(j - 1)/jmax
R = 1.41421
x[j] := R*cos(σ[j]) + 2
y[j] := R*sin(σ[j]) + 2
# [plot: x vs y]
# show this on a plot
# the angle is this simple case is π and the radius is R, so the distance is
ρ(R, π) = 4.44288
# -------------------------------------------------------------------------------------------------------------------------------------------
