# ----------------------------------------------------------------------------------------------------------------------------------------------
# -------------------------------------------------------------------------------------------------------------------------------------------
# EXAMPLE  4.20 : Comparing L2 error for Chebyshev series for the special cases of exp(zx), z=1, 2, 4
# ------------------------------------------------------------------------------------------------------------------------------------------
# Read in and store  Chebyshev coefficients for z=1, 2, 4 cases
i := 1 .. 3
c := READPRN("CHEBEXP.PRN")
b[:, 1] := c
N := length(c)
N = 19
j := 1 .. N - 1
z := 1
c := READPRN("CHEB2EXP.PRN")
b[:, 2] := c
N := length(c)
N = 19
j := 1 .. N - 1
z := 2
c := READPRN("CHEB4EXP.PRN")
b[:, 3] := c
N := length(c)
N = 19
j := 1 .. N - 1
z := 4
# Compute the L2 error of the Chebyshev series for exp(zx) , z=1, 2, 4
K := 0 .. N - 3
L2T[N - 2, i] := b[N - 1, i]^2
L2T[N - K - 3, i] := b[N - K - 2, i]^2 + L2T[N - K - 2, i]
L2T[:, i] := vectorize(sqrt(π/2*L2T[:, i]))
LOGL2T[:, i] := vectorize(log(L2T[:, i]))
# compare Log L2 error of Chebyshev series for exp(zx), z=1, 2, 4
exp1 := LOGL2T[:, 1]
exp2 := LOGL2T[:, 2]
exp4 := LOGL2T[:, 3]
# [plot: exp1[K], exp2[K], exp4[K] vs K]
# Compute the exponential index of convergence in each case and compare values of the last one
I := N - 1
s1 := ln(|b[:, 1][I]|)
r1 := ln(|s1|)/ln(I)
r1 = 1.34054
# compare the slopes of the L2 error curves and the corresponding values of the exponential index of convergence: notice that the L2 error curve of the smallest slope also has the smallest numerical value for the exponential index of convergence
s2 := ln(|b[:, 2][I]|)
r2 := ln(|s2|)/ln(I)
r2 = 1.23643
s4 := ln(|b[:, 3][I]|)
r4 := ln(|s4|)/ln(I)
r4 = 1.08505
# write Chebyshev series coefficients for exp(zx) for z=1, 2, 4
b[:, 1] = [2.53213; 1.13032; 0.271495; 0.0443368; 0.00547424; 0.000542926; 4.49773e-5; 3.19844e-6; 1.99212e-7; 1.10368e-8; 5.5059e-10; 2.49796e-11; 1.03915e-12; 3.99126e-14; 0; 0; 0; 0; 0]
b[:, 2] = [4.55917; 3.18127; 1.3779; 0.42548; 0.101457; 0.0196514; 0.00320035; 0.000449278; 5.53987e-5; 6.08837e-6; 6.03393e-7; 5.4444e-8; 4.50826e-9; 3.44903e-10; 2.45197e-11; 1.62789e-12; 1.01371e-13; 0; 0]
b[:, 3] = [22.6038; 19.5189; 12.8444; 6.67455; 2.83255; 1.00945; 0.30893; 0.0826599; 0.0196199; 0.00418051; 0.000807578; 0.000142616; 2.31874e-5; 3.49196e-6; 4.89675e-7; 6.42347e-8; 7.91444e-9; 9.19232e-10; 1.00968e-10]
exp1 = [0.163761; -0.462376; -1.25186; -2.16148; -3.16571; -4.24785; -5.39616; -6.60196; -7.85856; -9.16066; -10.504; -11.8849; -13.3006; -14.7483; -16.2259; -17.7314; -19.2633; -20.8201]
exp2 = [0.641432; 0.258167; -0.260603; -0.887448; -1.60275; -2.39244; -3.24611; -4.15581; -5.1153; -6.11957; -7.1645; -8.24666; -9.36314; -10.5115; -11.6895; -12.8953; -14.1272; -15.3844]
exp4 = [1.48701; 1.26796; 0.963025; 0.578652; 0.122991; -0.396211; -0.972198; -1.59924; -2.27251; -2.98791; -3.74198; -4.53172; -5.35457; -6.20827; -7.09085; -8.00058; -8.93591; -9.89776]
# -------------------------------------------------------------------------------------------------------------------------------------------
