# -------------------------------------------------------------------------------------------------------------------------------------------
# EXAMPLE 4.3 : Convergence to the limit in an n=1 space
# -------------------------------------------------------------------------------------------------------------------------------------------
nmax := 10
n := 1 .. nmax
ORIGIN := 1
# Define the sequence with a limit x0
# Define the metric
ρ(x, y) := |x - y|
x[n] := 1/n
x0 := 0
# show this on a plot
# [plot: 1*x[n] vs n]
# and compute the distance
d[n] := ρ(x[n], x0)
# convergence is monotonic but the limit point is not a member of the set X
d = [1; 0.5; 0.333333; 0.25; 0.2; 0.166667; 0.142857; 0.125; 0.111111; 0.1]
# -------------------------------------------------------------------------------------------------------------------------------------------
