# -------------------------------------------------------------------------------------------------------------------------------------------
# EXAMPLE 4.4 : The uniform metric in a function space
# -------------------------------------------------------------------------------------------------------------------------------------------
t_max := 3
nmax := 10
n := 1 .. nmax + 1
ORIGIN := 1
# Choose a function
x(t) := t^2
y(t) := t*sin(t)
# distance
d(t) := |x(t) - y(t)|
# apply the uniform metric
# generate a grid of points
t[n] := t_max*(n - 1)/nmax
v[n] := d(t[n])
ρ_∞ := max(v)
ρ_∞ = 8.57664
# compute the distance and tabulate it on the grid
# [plot: v[n] vs n]
t = [0; 0.3; 0.6; 0.9; 1.2; 1.5; 1.8; 2.1; 2.4; 2.7; 3]
v = [0; 0.00134394; 0.0212145; 0.105006; 0.321553; 0.753758; 1.48707; 2.59726; 4.13889; 6.13607; 8.57664]
# -------------------------------------------------------------------------------------------------------------------------------------------
