# -------------------------------------------------------------------------------------------------------------------------------------------
# EXAMPLE 4.5 : The simplest norm
# -------------------------------------------------------------------------------------------------------------------------------------------
nmax := 10
n := 1 .. nmax  # define a norm
norm(c) := |c|
ORIGIN := 1
# Define the sequence with a limit x0 | Define a simple metric and find the distance
x[n] := 1/n
x0 := 0
ρ(x, y) := norm(x - y)
norm(x0) = 0
# check the triangle inequality
# the norm of the sequence converges to the norm of the limit x0
# this column is  less than this one  plus this
# vvvvvvvvvvv  .LE.  vvvvvvvvvv  + vvvvvvvv
ρ(x[n], x0) = [1; 0.5; 0.333333; 0.25; 0.2; 0.166667; 0.142857; 0.125; 0.111111; 0.1]
ρ(x[n], 2) = [1; 1.5; 1.66667; 1.75; 1.8; 1.83333; 1.85714; 1.875; 1.88889; 1.9]
ρ(2, x0) = 2
norm(x[n]) = [1; 0.5; 0.333333; 0.25; 0.2; 0.166667; 0.142857; 0.125; 0.111111; 0.1]
# -------------------------------------------------------------------------------------------------------------------------------------------
