# -------------------------------------------------------------------------------------------------------------------------------------------
# EXAMPLE 4.6 : Examples of norms for discrete finite dimensional sets
# -------------------------------------------------------------------------------------------------------------------------------------------
jmax := 20
j := 1. .. jmax + 1
ORIGIN := 1
imax := 5
i := 1. .. imax
a := [1; 0; -1; 0; 1]
b := [0; 1; 0; -1; 0]
# Prepare a plot
σ[j] := 2*π*(j - 1)/jmax
x[j] := cos(σ[j])
y[j] := sin(σ[j])  # show this on a plot
# [plot: x, a vs y, b]
# if the dimension of the discrete space is 2 then
#
# for p=1 the norm of all elements is inside the diamond
#
# for p=2 the norm of all elements is inside the circle
#
# for p=∞ the norm of all elements is inside the unit square
# -------------------------------------------------------------------------------------------------------------------------------------------
