# -------------------------------------------------------------------------------------------------------------------------------------------
# EXAMPLE 4.7 : The uniform metric in a function space K
# -------------------------------------------------------------------------------------------------------------------------------------------
t_max := 3
nmax := 10
n := 1 .. nmax + 1
ORIGIN := 1
# Choose a function
x(t) := t^2
y(t) := t*sin(t)
# distance
d(t) := |x(t) - y(t)|
# generate a grid of points
t[n] := t_max*(n - 1)/nmax
v1[n] := d(t[n])
norm_1 := sum(v1[n], n)
norm_1 = 24.1388
v2[n] := d(t[n])^2
norm_2 := sum(v2[n], n)^(1/2)
norm_2 = 11.7465
v4[n] := d(t[n])^4
norm_4 := sum(v4[n], n)^(1/4)
norm_4 = 9.20281
v8[n] := d(t[n])^8
norm_8 := sum(v8[n], n)^(1/8)
norm_8 = 8.65115
v16[n] := d(t[n])^16
norm_16 := sum(v16[n], n)^(1/16)
norm_4 = 9.20281
# Observe that the maximum value of the distance between x and y on t = [ 0,3 ] is magnified as p increases. As it approached ∞ the Lp norm approaches the uniform norm that sees only the point t corresponding to the maximum value of the distance between x and y.
v1 = [0; 0.00134394; 0.0212145; 0.105006; 0.321553; 0.753758; 1.48707; 2.59726; 4.13889; 6.13607; 8.57664]
v2 = [0; 1.80617e-6; 0.000450056; 0.0110262; 0.103396; 0.56815; 2.21139; 6.74576; 17.1304; 37.6514; 73.5588]
v4 = [0; 0; 2.0255e-7; 0.000121577; 0.0106908; 0.322795; 4.89025; 45.5053; 293.45; 1417.63; 5410.89]
v8 = [0; 0; 0; 0; 0.000114294; 0.104197; 23.9145; 2070.73; 86113.2; 2009671; 29277733]
v16 = [0; 0; 0; 0; 0; 0; 571.903; 4287930; 7.41548e9; 4.03878e12; 8.57186e14]
# -------------------------------------------------------------------------------------------------------------------------------------------
