# -------------------------------------------------------------------------------------------------------------------------------------------
# EXAMPLE 4.8 : The uniform metric in a function space C
ORIGIN := 0
# -------------------------------------------------------------------------------------------------------------------------------------------
t_min := 0
t_max := 3  # Choose a function
x(t) := t^2
y(t) := t*sin(t)
d(t) := |x(t) - y(t)|
TOL := 0.000001
norm_1 := integral(d(t), t = t_min .. t_max)
norm_2 := integral(d(t)^2, t = t_min .. t_max)^(1/2)
norm_4 := integral(d(t)^4, t = t_min .. t_max)^(1/4)
norm_1 = 5.8889
norm_8 := integral(d(t)^8, t = t_min .. t_max)^(1/8)
norm_16 := integral(d(t)^16, t = t_min .. t_max)^(1/16)
norm_2 = 5.40617
norm_4 = 5.85569
norm_8 = 6.54086
norm_16 = 7.18515
# compute the distance and tabulate it on the grid
j := 0 .. 30
s[j] := 0.1*j
D[j] := d(s[j])
# [plot: D vs s]
# Observe that the value of the sequence of Lp norms (with increasing p) approaches the value of the uniform norm in EXAMPLE 4.4
# -------------------------------------------------------------------------------------------------------------------------------------------
