# -------------------------------------------------------------------------------------------------------------------------------------------
# EXAMPLE 4.9 : The inner product in an n=2 space
# -------------------------------------------------------------------------------------------------------------------------------------------
imax := 2
i := 1 .. imax
ORIGIN := 1
# Define any two points | Define the inner product
ε := [1; 1]
η := [3; 3]
ip(ε, η) := sum(ε[i]*η[i], i)
a := [ε[1]; η[1]]
b := [ε[2]; η[2]]
# [plot: a vs b]
# show this on a plot
# the inner product has the value
ip(ε, η) = 6
ip(ε, ε) = 2
# also two other inner products
ip(η, η) = 18
# check the Cauchy inequality
ip(ε, η)^2 = 36  # is less than or equal to
ip(ε, ε)*ip(η, η) = 36
# -------------------------------------------------------------------------------------------------------------------------------------------
