# -------------------------------------------------------------------------------------------------------------------------------------------
# EXAMPLE 5.1 : The operator equation for a quantum particle in an infinitely deep well
ORIGIN := 1
# -------------------------------------------------------------------------------------------------------------------------------------------
# Solutions of v"(x)+k^2v(x) = 0 are eigenfunctions of the infinite square well n=1, 2, 3, ...
# Minimum and maximum value of the well sides
xmin := -1
xmax := 1
# for plots set argument range
imax := 50
i := 1 .. imax
x[i] := xmin + (i - 1)*(xmax - xmin)/(imax - 1)
# first eigenvalue
n := 1
k[n] := π/2*n  # note how these two terms must cancel or be equal to zero
u1[i] := cos(k[n]*x[i])
t := 0
v(t) := cos(k[n]*t)
d/dt(d/dt(v(t))) = -2.4674
k[n]^2*v(t) = 2.4674
# second eigenvalue
n := 2
k[n] := π/2*n
u2[i] := sin(k[n]*x[i])
t := 0
v(t) := sin(k[n]*t)
d/dt(d/dt(v(t))) = 3.94296e-15
k[n]^2*v(t) = 0
# third eigenvalue
n := 3
k[n] := π/2*n
u3[i] := cos(k[n]*x[i])
t := 0
v(t) := cos(k[n]*t)
d/dt(d/dt(v(t))) = -22.2066
k[n]^2*v(t) = 22.2066
# fourth eigenvalue
n := 4
k[n] := π/2*n
u4[i] := sin(k[n]*x[i])
t := 0
v(t) := sin(k[n]*t)
d/dt(d/dt(v(t))) = -2.1292e-13
k[n]^2*v(t) = 0
# [plot: u1, u2, u3, u4 vs x]
# note that the eigenvalues scale with n and the eigenenergy scales as the square of k
# note that the eigenfunctions are either symmetric, (positive parity, n odd) or antisymmetric (negative parity, n even) with respect to reflection at the origin.
# the boundary conditions require that the eigenfunctions are zero at each boundary (no particle escapes the well when it is infinitely deep)
# -------------------------------------------------------------------------------------------------------------------------------------------
