# -------------------------------------------------------------------------------------------------------------------------------------------
# EXAMPLE 5.10 : Gaussian elimination without partial pivoting for order
n := 3
ORIGIN := 1
# -------------------------------------------------------------------------------------------------------------------------------------------
# store input as
# For the system Ax=y define
A := [0.000000000729, 0.81, 0.9; 1, 1, 1; 1.331, 1.21, 1.1]
y := [0.6867; 0.8338; 1.0]
Ain := A
yin := y
# ELIMINATION
i := 2 .. 3
j := 2 .. 3
# define multipliers
m[i, 1] := A[i, 1]/A[1, 1]  # perform elimination in equations 2 and 3
i := 2 .. 3
j := 1 .. 3
y[i] := y[i] - m[i, 1]*y[1]
A[i, j] := A[i, j] - m[i, 1]*A[1, j]
i := 3 .. 3
A = [7.29e-10, 0.81, 0.9; 0, -1.11111e9, -1.23457e9; 0, -1.47889e9, -1.64321e9]
y = [0.6867; -941975308; -1.25377e9]
# define multiplier and note how large they are
m[i, 2] := A[i, 2]/A[2, 2]
m[2, 1] = 1.37174e9
m[3, 1] = 1.82579e9
# and note the large difference in magnitude between smallest and largest matrix elements of the intermediate  matrix after the first elimination step
# perform elimination in equation 3
y[i] := y[i] - m[i, 2]*y[2]
A[i, j] := A[i, j] - m[i, 2]*A[2, j]
A = [7.29e-10, 0.81, 0.9; 0, -1.11111e9, -1.23457e9; 0, 0, -0.0965557]
y = [0.6867; -941975308; -0.00720668]
# BACK SUBSTITUTION
x[3] := y[3]/A[3, 3]
x[2] := (y[2] - A[2, 3]*x[3])/A[2, 2]
x[1] := (y[1] - A[1, 2]*x[2] - A[1, 3]*x[3])/A[1, 1]
x = [-0.00568481; 0.764847; 0.0746375]
# check that this is the solution of the linear system note the loss in numerical precision
Ain*x - yin = [0; -8.98009e-8; -9.75119e-8]
# -------------------------------------------------------------------------------------------------------------------------------------------
