# -------------------------------------------------------------------------------------------------------------------------------------------
# EXAMPLE 5.11 : Gaussian elimination with partial pivoting again for order
n := 3
ORIGIN := 1
# -------------------------------------------------------------------------------------------------------------------------------------------
# store input as
# For the system Ax=y define
A := [1.331, 1.21, 1.1; 1, 1, 1; 0.000000000729, 0.81, 0.9]
y := [1.0; 0.8338; 0.6867]
Ain := A
yin := y
# ELIMINATION
i := 2 .. 3
j := 2 .. 3
# define multipliers
m[i, 1] := A[i, 1]/A[1, 1]  # perform elimination in equations 2 and 3
i := 2 .. 3
j := 1 .. 3
y[i] := y[i] - m[i, 1]*y[1]
A[i, j] := A[i, j] - m[i, 1]*A[1, j]
i := 3 .. 3
A = [1.331, 1.21, 1.1; 0, 0.0909091, 0.173554; 0, 0.81, 0.9]
y = [1; 0.0824852; 0.6867]
# define multipliers and note how different they are
m[i, 2] := A[i, 2]/A[2, 2]
m[2, 1] = 0.751315
m[3, 1] = 5.47708e-10
# and elimination of the large difference in magnitude between smallest and largest matrix elements of the intermediate  matrix after the first elimination step
# perform elimination in equation 3
y[i] := y[i] - m[i, 2]*y[2]
A[i, j] := A[i, j] - m[i, 2]*A[2, j]
A = [1.331, 1.21, 1.1; 0, 0.0909091, 0.173554; 0, 0, -0.646364]
y = [1; 0.0824852; -0.0482431]
# BACK SUBSTITUTION
x[3] := y[3]/A[3, 3]
x[2] := (y[2] - A[2, 3]*x[3])/A[2, 2]
x[1] := (y[1] - A[1, 2]*x[2] - A[1, 3]*x[3])/A[1, 1]
x = [-0.0056847; 0.764847; 0.0746377]
# check that this is the solution of the linear system note the gain in numerical precision
Ain*x - yin = [0; 0; 0]
# -------------------------------------------------------------------------------------------------------------------------------------------
