# -------------------------------------------------------------------------------------------------------------------------------------------
# EXAMPLE 5.12 : The inverse by Gaussian elimination for linear equations of order
n := 3
ORIGIN := 1
# -------------------------------------------------------------------------------------------------------------------------------------------
# For the system AX=I define
A := [1, 1, -1; 1, 2, -2; -2, 1, 1]
e := [1, 0, 0; 0, 1, 0; 0, 0, 1]
# store input as
Ain := A
# Perform elimination and back substitution 3 times for Ax=y, with y set to columns 1, 2, 3 of e
# ELIMINATION I
i := 2 .. 3
j := 2 .. 3
# define multipliers
m[i, 1] := A[i, 1]/A[1, 1]  # perform elimination in equations 2 and 3
j := 1 .. 3
y := e[:, 1]
i := 2 .. 3
y[i] := y[i] - m[i, 1]*y[1]
A[i, j] := A[i, j] - m[i, 1]*A[1, j]
i := 3 .. 3
# perform elimination in equation 3
# define multiplier
m[i, 2] := A[i, 2]/A[2, 2]
y[i] := y[i] - m[i, 2]*y[2]
A[i, j] := A[i, j] - m[i, 2]*A[2, j]
# BACK SUBSTITUTION I
x[3] := y[3]/A[3, 3]
x[2] := (y[2] - A[2, 3]*x[3])/A[2, 2]
x[1] := (y[1] - A[1, 2]*x[2] - A[1, 3]*x[3])/A[1, 1]
X[:, 1] := x
# ELIMINATION II
y := e[:, 2]
i := 2 .. 3
y[i] := y[i] - m[i, 1]*y[1]
i := 3 .. 3
y[i] := y[i] - m[i, 2]*y[2]
# BACK SUBSTITUTION II
x[3] := y[3]/A[3, 3]
x[2] := (y[2] - A[2, 3]*x[3])/A[2, 2]
x[1] := (y[1] - A[1, 2]*x[2] - A[1, 3]*x[3])/A[1, 1]
X[:, 2] := x
# ELIMINATION III
y := e[:, 3]
i := 2 .. 3
y[i] := y[i] - m[i, 1]*y[1]
i := 3 .. 3
y[i] := y[i] - m[i, 2]*y[2]
# BACK SUBSTITUTION III
x[3] := y[3]/A[3, 3]
x[2] := (y[2] - A[2, 3]*x[3])/A[2, 2]
x[1] := (y[1] - A[1, 2]*x[2] - A[1, 3]*x[3])/A[1, 1]
X[:, 3] := x
# check the product of the inverse with the matrix A
# the inverse of matrix A is
X = [2, -1, 0; 1.5, -0.5, 0.5; 2.5, -1.5, 0.5]
X*Ain = [1, 0, 0; 0, 1, 0; 0, 0, 1]
# -------------------------------------------------------------------------------------------------------------------------------------------
