# -------------------------------------------------------------------------------------------------------------------------------------------
# EXAMPLE 5.14 : Dolittle's method for linear equations of order
n := 3
ORIGIN := 1
# -------------------------------------------------------------------------------------------------------------------------------------------
# For the system Ax=y define
A := [1, 2, 1; 2, 2, 3; -1, -3, 0]
y := [0; 3; 2]
# store input as
Ain := A
yin := y
# form the matrices U and L by alternatively constructing rows of U and columns of L as follows
i := 1 .. 3
j := 1 .. 3
# STEP 1 first row of U
U[1, j] := A[1, j]
# first column of L
L[i, 1] := A[i, 1]/U[1, 1]
# STEP 2 second row of U
i := 2 .. 3
j := 2 .. 3  # second column of L
x[j] := A[2, j] - L[2, 1]*U[1, j]
U[2, j] := x[j]
L[3, 2] := (A[3, 2] - L[3, 1]*U[1, 2])/U[2, 2]
# STEP 3 third row of U
x[1] := A[3, 3] - L[3, 1]*U[1, 3] - L[3, 2]*U[2, 3]
i := 1 .. 3
L[i, i] := 1
U[3, 3] := x[1]
# this gives matrices
L = [1, 0, 0; 2, 1, 0; -1, 0.5, 1]
U = [1, 2, 1; 0, -2, 1; 0, 0, 0.5]
# FORWARD SUBSTITUTION for z in Lz=y  (note diagonal entries in L are 1)
z[1] := y[1]
z[2] := y[2] - L[2, 1]*z[1]
z[3] := y[3] - L[3, 2]*z[2] - L[3, 1]*z[1]
# BACK SUBSTITUTION for x in Ux=g
x[3] := z[3]/U[3, 3]
x[2] := (z[2] - U[2, 3]*x[3])/U[2, 2]
x[1] := (z[1] - U[1, 2]*x[2] - U[1, 3]*x[3])/U[1, 1]
# check that this is the solution of the linear system
# solution
x = [1; -1; 1]
Ain*x - y = [0; 0; 0]
# -------------------------------------------------------------------------------------------------------------------------------------------
