# -------------------------------------------------------------------------------------------------------------------------------------------
# EXAMPLE 5.15 : Crout factorization for linear equations of order
n := 3
ORIGIN := 1
# -------------------------------------------------------------------------------------------------------------------------------------------
# For the system Ax=y define
A := [1, 2, 1; 2, 2, 3; -1, -3, 0]
y := [0; 3; 2]
# store input as
Ain := A
yin := y
# form the matrices L and U by alternatively constructing columns of L and rows of U as follows
i := 1 .. 3
j := 2 .. 3
# STEP 1 first column of L
L[i, 1] := A[i, 1]
# first row of U
U[1, j] := A[1, j]/L[1, 1]
# STEP 2 second column of L
j := 2 .. 3  # second row of U
w[j] := A[j, 2] - L[j, 1]*U[1, 2]
L[j, 2] := w[j]
w[1] := (A[2, 3] - L[2, 1]*U[1, 3])/L[2, 2]
U[2, 3] := w[1]
# STEP 3 third column of L
x[1] := A[3, 3] - L[3, 1]*U[1, 3] - L[3, 2]*U[2, 3]
i := 1 .. 3
U[i, i] := 1
L[3, 3] := x[1]
# this gives matrices
L = [1, 0, 0; 2, -2, 0; -1, -1, 0.5]
U = [1, 2, 1; 0, 1, -0.5; 0, 0, 1]
# FORWARD SUBSTITUTION for z in Lz=y
z[1] := y[1]/L[1, 1]
z[2] := (y[2] - L[2, 1]*z[1])/L[2, 2]
z[3] := (y[3] - L[3, 2]*z[2] - L[3, 1]*z[1])/L[3, 3]
# BACK SUBSTITUTION for x in Ux=z (note diagonal entries in U are 1)
x[3] := z[3]
x[2] := z[2] - U[2, 3]*x[3]
x[1] := z[1] - U[1, 2]*x[2] - U[1, 3]*x[3]
# check that this is the solution of the linear system
# solution
x = [1; -1; 1]
Ain*x - y = [0; 0; 0]
# -------------------------------------------------------------------------------------------------------------------------------------------
