# -------------------------------------------------------------------------------------------------------------------------------------------
# EXAMPLE 5.16 : Cholesky factorization for linear equations of order
n := 3
ORIGIN := 1
# -------------------------------------------------------------------------------------------------------------------------------------------
# For the system Ax=y define
A := [4, 1, 1; 1, 3, 2; 1, 2, 2]
y := [0; 3; 2]
# store input as
Ain := A
yin := y
# check if A is positive definite | which is positive so A is positive definite
x := [1; 1; 1]
transpose(x) = [1, 1, 1]
transpose(x)*A*x = 17
# form the matrix L by constructing columns as follows
i := 2 .. 3
# STEP 1 first column of L
L[1, 1] := sqrt(A[1, 1])
L[i, 1] := A[i, 1]/L[1, 1]
# STEP 2 second column of L
j := 2
w[j] := A[j, j] - L[j, 1]^2
L[j, j] := sqrt(w[j])
w[3] := (A[3, j] - L[3, 1]*L[j, 1])/L[j, j]
L[3, 2] := w[3]
# STEP 3 third column of L
w[3] := A[3, 3] - L[3, 1]^2 - L[3, 2]^2
L[3, 3] := sqrt(w[3])
# this yields matrix
L = [2, 0, 0; 0.5, 1.65831, 0; 0.5, 1.05529, 0.797724]
# this gives matrix
U := transpose(L)
L*U - Ain = [0, 0, 0; 0, 0, 0; 0, 0, 0]
# FORWARD SUBSTITUTION for z in Lz=y
z[1] := y[1]/L[1, 1]
z[2] := (y[2] - L[2, 1]*z[1])/L[2, 2]
z[3] := (y[3] - L[3, 2]*z[2] - L[3, 1]*z[1])/L[3, 3]
# BACK SUBSTITUTION for x in Ux=z
x[3] := z[3]/U[3, 3]
x[2] := (z[2] - U[2, 3]*x[3])/U[2, 2]
x[1] := (z[1] - U[1, 2]*x[2] - U[1, 3]*x[3])/U[1, 1]
# check that this is the solution of the linear system
# solution
x = [-0.285714; 1; 0.142857]
Ain*x - y = [-8.32667e-17; 8.88178e-16; 0]
# -------------------------------------------------------------------------------------------------------------------------------------------
