# -------------------------------------------------------------------------------------------------------------------------------------------
# EXAMPLE 5.17 : Dolittle's method #1 for a triangular linear system of order
n := 5
ORIGIN := 1
# -------------------------------------------------------------------------------------------------------------------------------------------
# for the system Ax=y  define
i := 1 .. n
j := 2 .. n
A[i, i] := 2
A[j, j - 1] := 1
i := 1 .. n - 1
A[i, i + 1] := 1
# upper triangular matrix U
A = [2, 1, 0, 0, 0; 1, 2, 1, 0, 0; 0, 1, 2, 1, 0; 0, 0, 1, 2, 1; 0, 0, 0, 1, 2]
y := [1; 0; 0; 0; 0]
Ain := A
U := A
U[j, j - 1] := 0
U = [2, 1, 0, 0, 0; 0, 2, 1, 0, 0; 0, 0, 2, 1, 0; 0, 0, 0, 2, 1; 0, 0, 0, 0, 2]
yin := y  # lower triangular matrix L
i := 2
L[i, i - 1] := A[i, i - 1]/U[i - 1, i - 1]
U[i, i] := A[i, i] - L[i, i - 1]*U[i - 1, i]
i := 3
L[i, i - 1] := A[i, i - 1]/U[i - 1, i - 1]
U[i, i] := A[i, i] - L[i, i - 1]*U[i - 1, i]
i := 4
L[i, i - 1] := A[i, i - 1]/U[i - 1, i - 1]
U[i, i] := A[i, i] - L[i, i - 1]*U[i - 1, i]
i := 5
L[i, i - 1] := A[i, i - 1]/U[i - 1, i - 1]
U[i, i] := A[i, i] - L[i, i - 1]*U[i - 1, i]
L[i, i] := 0
L = [0, 0, 0, 0, 0; 0.5, 0, 0, 0, 0; 0, 0.666667, 0, 0, 0; 0, 0, 0.75, 0, 0; 0, 0, 0, 0.8, 0]
U = [2, 1, 0, 0, 0; 0, 1.5, 1, 0, 0; 0, 0, 1.33333, 1, 0; 0, 0, 0, 1.25, 1; 0, 0, 0, 0, 1.2]
i := 2 .. n  # FORWARD SUBSTITUTION Lz=y  # BACK SUBSTITUTION Ux=z
z[1] := y[1]
z[i] := y[i] - L[i, i - 1]*z[i - 1]
x[n] := z[n]/U[n, n]
x[n - i + 1] := (z[n - i + 1] - U[n - i + 1, n - i + 2]*x[n - i + 2])/U[n - i + 1, n - i + 1]
z = [1; -0.5; 0.333333; -0.25; 0.2]
# check that this is the solution of the linear system
# solution
x = [0.833333; -0.666667; 0.5; -0.333333; 0.166667]
Ain*x - y = [0; 5.55112e-17; -1.11022e-16; -5.55112e-17; 0]
# -------------------------------------------------------------------------------------------------------------------------------------------
