# -------------------------------------------------------------------------------------------------------------------------------------------
# EXAMPLE 5.18 : Dolittle's method #2 for a triangular linear system again for order
n := 5
ORIGIN := 1
# -------------------------------------------------------------------------------------------------------------------------------------------
# for the system Ax=y  define
i := 1 .. n
j := 2 .. n
A[i, i] := 2
A[j, j - 1] := 1
k := 1 .. n - 1
A[i, i + 1] := 1
# lower diagonal vector
α[j] := A[j, j - 1]
A = [2, 1, 0, 0, 0, 0; 1, 2, 1, 0, 0, 0; 0, 1, 2, 1, 0, 0; 0, 0, 1, 2, 1, 0; 0, 0, 0, 1, 2, 1]
y := [1; 0; 0; 0; 0]
# main diagonal vector
β[i] := A[i, i]
# upper diagonal vector
Γ[k] := A[k, k + 1]
# solve for L by calculating λ and  U by calculating μ
μ[1] := β[1]
j := 2
λ[j] := α[j]/μ[j - 1]
μ[j] := β[j] - λ[j]*Γ[j - 1]
Ain := A
j := 3
λ[j] := α[j]/μ[j - 1]
μ[j] := β[j] - λ[j]*Γ[j - 1]
yin := y
j := 4
λ[j] := α[j]/μ[j - 1]
μ[j] := β[j] - λ[j]*Γ[j - 1]
j := 5
λ[j] := α[j]/μ[j - 1]
μ[j] := β[j] - λ[j]*Γ[j - 1]
# the lower diagonal of L is
transpose(λ) = [0, 0.5, 0.666667, 0.75, 0.8]
# the main diagonal of U is
transpose(μ) = [2, 1.5, 1.33333, 1.25, 1.2]
i := 2 .. n  # FORWARD SUBSTITUTION Lz=y  # BACK SUBSTITUTION Ux=z
z[1] := y[1]
z[i] := y[i] - λ[i]*z[i - 1]
x[n] := z[n]/μ[n]
z = [1; -0.5; 0.333333; -0.25; 0.2]
x[n - i + 1] := (z[n - i + 1] - Γ[n - i + 1]*x[n - i + 2])/μ[n - i + 1]
j := 1 .. n
sum(A[1, j]*x[j], j) - y[1] = 0
# solution | check that this is the solution of the linear system
sum(A[4, j]*x[j], j) - y[4] = -5.55112e-17
sum(A[2, j]*x[j], j) - y[2] = 5.55112e-17
x = [0.833333; -0.666667; 0.5; -0.333333; 0.166667]
sum(A[5, j]*x[j], j) - y[5] = 0
sum(A[3, j]*x[j], j) - y[3] = -1.11022e-16
# -------------------------------------------------------------------------------------------------------------------------------------------
