# -------------------------------------------------------------------------------------------------------------------------------------------
# EXAMPLE 5.19 : Condition number for a matrix and its inverse for order
n := 4
# case 1
ORIGIN ≡ 1
# -------------------------------------------------------------------------------------------------------------------------------------------
# Matrix A
i := 1 .. n
j := 1 .. n
# Inverse matrix of A
# form uniform norm of each matrix
A := [
    21, 10.5, 7.175, 5.5125;
    10.5, 7.175, 5.5125, 4.51666;
    7.175, 5.5125, 4.51666, 3.85416;
    5.5125, 4.51666, 3.85416, 3.38212
]
B := A^-1
a[i] := sum(|A[i, j]|, j)
b[i] := sum(|B[i, j]|, j)
norm_A := max(a)
norm_B := max(b)
norm_A = 44.1875
norm_B = 498.577
# condition number of matrix A is the product
cond_A := norm_A*norm_B
a = [44.1875; 27.7042; 21.0583; 17.2654]
b = [16.6486; 204.79; 498.577; 322.106]
cond_A = 22030.9
# -------------------------------------------------------------------------------------------------------------------------------------------
