# -------------------------------------------------------------------------------------------------------------------------------------------
# EXAMPLE 5.2 : Vector dot product
ORIGIN := 1
# -------------------------------------------------------------------------------------------------------------------------------------------
# Minimum and maximum value of the argument
xmin := -1
xmax := 1
# argument range stored as a vector
imax := 10
i := 1 .. imax
x[i] := xmin + (i - 1)*(xmax - xmin)/(imax - 1)
y[i] := x[i]  # dot product of vector with itself
dot := sum(x[i]*y[i], i)
dot = 4.07407
# scalar product
u := 10*x
x = [-1; -0.777778; -0.555556; -0.333333; -0.111111; 0.111111; 0.333333; 0.555556; 0.777778; 1]
x - y = [0; 0; 0; 0; 0; 0; 0; 0; 0; 0]
dot := sum(x[i]*u[i], i)
dot = 40.7407
# -------------------------------------------------------------------------------------------------------------------------------------------
