# -------------------------------------------------------------------------------------------------------------------------------------------
# EXAMPLE 5.20 : Condition number for a matrix and its inverse for order
n := 4
# case 2
ORIGIN ≡ 1
# -------------------------------------------------------------------------------------------------------------------------------------------
# Matrix A
i := 1 .. n
j := 1 .. n
# Inverse matrix of A
# form uniform norm of each matrix
A := [21, 0, -5.6, 0; 0, 7.7, 0, -2.8336; -5.6, 0, 10.4664, 0; 0, -2.8336, 0, 11.01056]
B := A^-1
a[i] := sum(|A[i, j]|, j)
b[i] := sum(|B[i, j]|, j)
norm_A := max(a)
norm_B := max(b)
norm_A = 26.6
norm_B = 0.180375
# condition number of matrix A is the product
cond_A := norm_A*norm_B
a = [26.6; 10.5336; 16.0664; 13.8442]
b = [0.0852626; 0.180375; 0.141163; 0.137242]
cond_A = 4.79798
# -------------------------------------------------------------------------------------------------------------------------------------------
