# -------------------------------------------------------------------------------------------------------------------------------------------
# EXAMPLE 5.21 : Condition number for a matrix and its inverse for order
n := 4
# case 3
ORIGIN ≡ 1
# -------------------------------------------------------------------------------------------------------------------------------------------
# Matrix A - the Hilbert matrix
i := 1 .. n
j := 1 .. n
# Inverse matrix of A
# form uniform norm of each matrix
A := [1, 1/2, 1/3, 1/4; 1/2, 1/3, 1/4, 1/5; 1/3, 1/4, 1/5, 1/6; 1/4, 1/5, 1/6, 1/7]
B := A^-1
a[i] := sum(|A[i, j]|, j)
b[i] := sum(|B[i, j]|, j)
norm_A := max(a)
norm_B := max(b)
norm_A = 2.08333
norm_B = 13620
# condition number of matrix A is the product
cond_A := norm_A*norm_B
a = [2.08333; 1.28333; 0.95; 0.759524]
b = [516; 5700; 13620; 8820]
cond_A = 28375
# -------------------------------------------------------------------------------------------------------------------------------------------
