# -------------------------------------------------------------------------------------------------------------------------------------------
# EXAMPLE 5.22 : Jacobi iteration #I for a system of order
n := 4
ORIGIN ≡ 1
# -------------------------------------------------------------------------------------------------------------------------------------------
# For the tridiagonal system Ax = y investigate the Jacobi iteration
i := 1 .. n
j := 1 .. n
# Inverse matrix of A
A := [10, -1, 2, 0; -1, 11, -1, 3; 2, -1, 10, -1; 0, 3, -1, 8]
y := [6; 25; -11; 15]
Ain := A
yin := y
B := A^-1
# form uniform norm of each matrix
a[i] := sum(|A[i, j]|, j)
b[i] := sum(|B[i, j]|, j)
# check the condition number of matrix A as the product
norm_A := max(a)
norm_B := max(b)
norm_A = 16
norm_B = 0.196078
cond_A := norm_A*norm_B
cond_A = 3.13725
# prepare the iteration matrices and maximum number of iterates
D[i, i] := A[i, i]
LU := A - D
mx := 9
m := 1 .. mx
U[i, j] := (i < j)*A[i, j]
D = [10, 0, 0, 0; 0, 11, 0, 0; 0, 0, 10, 0; 0, 0, 0, 8]
LU = [0, -1, 2, 0; -1, 0, -1, 3; 2, -1, 0, -1; 0, 3, -1, 0]
x1 := [0; 0; 0; 0]
U = [0, -1, 2, 0; 0, 0, -1, 3; 0, 0, 0, -1; 0, 0, 0, 0]
t := D^-1*y
T := -D^-1*LU
# initial iterate
z[:, 1] := x1  # start the iteration
z[:, m + 1] := T*z[:, m] + t
# inspect the last five iterates
x1 := z[:, mx - 4]
x2 := z[:, mx - 3]
x3 := z[:, mx - 2]
x4 := z[:, mx - 1]
x5 := z[:, mx]
x1[i] = [1.0152; 1.9537; -0.968109; 0.973843]
x2[i] = [0.988991; 2.01141; -1.01029; 1.02135]
x3[i] = [1.0032; 1.99224; -0.994522; 0.994434]
x4[i] = [0.998128; 2.00231; -1.00197; 1.00359]
x5[i] = [1.00063; 1.99867; -0.999036; 0.998888]
# seems to be converging so inspect norms of the resultant vector
abs_x1[i] := |x1[i]|
norm_x1 := max(abs_x1)
norm_x1 = 1.9537
abs_x2[i] := |x2[i]|
norm_x2 := max(abs_x2)
norm_x2 = 2.01141
abs_x3[i] := |x3[i]|
norm_x3 := max(abs_x3)
norm_x3 = 1.99224
abs_x4[i] := |x4[i]|
norm_x4 := max(abs_x4)
norm_x4 = 2.00231
abs_x5[i] := |x5[i]|
norm_x5 := max(abs_x5)
norm_x5 = 1.99867
# seems to be converging so inspect norms of the difference of iterates in the norm
abs_x21[i] := |x2[i] - x1[i]|
norm_x21 := max(abs_x21)
norm_x21 = 0.057719
abs_x32[i] := |x3[i] - x2[i]|
norm_x32 := max(abs_x32)
norm_x32 = 0.0269168
abs_x43[i] := |x4[i] - x3[i]|
norm_x43 := max(abs_x43)
norm_x43 = 0.0100656
abs_x54[i] := |x5[i] - x4[i]|
norm_x54 := max(abs_x54)
norm_x54 = 0.00470592
# also look at some ratios of norms of the difference in iterates
norm_x21/norm_x2 = 0.0286957
norm_x32/norm_x3 = 0.0135108
norm_x43/norm_x4 = 0.00502701
norm_x54/norm_x5 = 0.00235453
k := 1 .. n
a[k] := sum(|T[k, i]|, i)
# sequence is converging with norm(T)=0.5
T = [0, 0.1, -0.2, 0; 0.0909091, 0, 0.0909091, -0.272727; -0.2, 0.1, 0, 0.1; 0, -0.375, 0.125, 0]
norm_T := max(a)
norm_T = 0.5
# so norm(T) < 1, then what is the bound on the convergence in Eq.(5.229) ?
i := 1 .. 4
bound[i] := norm_T^(i - 1)/(1 - norm_T)*norm_x21
i = [1; 2; 3; 4]
bound[i] = [0.115438; 0.057719; 0.0288595; 0.0144297]
# using i=m on setting the bound to ε and taking logarithms of both sides
ε := 10^-3
m := (log(1 - norm_T) + log(norm_T) + log(ε) - log(norm_x21))/log(norm_T)
m = 7.85097
# for a bound of  10**(-3) require ~8 iterations
# check residual vector Ax-y for last three iterates
mx - 2 = 7
mx - 1 = 8
mx = 9
Ain*x3 - yin = [0.0507018; -0.110722; 0.0745049; -0.0732846]
Ain*x4 - yin = [-0.0249666; 0.0400024; -0.0293666; 0.0376474]
Ain*x5 - yin = [0.00950989; -0.0195511; 0.0133358; -0.0138464]
# this suggests the above is an underestimate for m
# -------------------------------------------------------------------------------------------------------------------------------------------
