# -------------------------------------------------------------------------------------------------------------------------------------------
# EXAMPLE 5.23 : Jacobi iteration #I for a tridiagonal system of order
n := 5
ORIGIN ≡ 1
# -------------------------------------------------------------------------------------------------------------------------------------------
# For the tridiagonal system Ax = y investigate the Jacobi iteration
i := 1 .. n
j := 1 .. n
# Inverse matrix of A
A := [2, 1, 0, 0, 0; 1, 2, 1, 0, 0; 0, 1, 2, 1, 0; 0, 0, 1, 2, 1; 0, 0, 0, 1, 2]
y := [1; 0; 0; 0; 0]
Ain := A
yin := y
B := A^-1
# form uniform norm of each matrix
a[i] := sum(|A[i, j]|, j)
b[i] := sum(|B[i, j]|, j)
# check the condition number of matrix A as the product
norm_A := max(a)
norm_B := max(b)
norm_A = 4
norm_B = 4.5
cond_A := norm_A*norm_B
cond_A = 18
# prepare the iteration matrices and maximum number of iterates
D[i, i] := A[i, i]
LU := A - D
mx := 10
m := 1 .. mx
U[i, j] := (i < j)*A[i, j]
D = [2, 0, 0, 0, 0; 0, 2, 0, 0, 0; 0, 0, 2, 0, 0; 0, 0, 0, 2, 0; 0, 0, 0, 0, 2]
LU = [0, 1, 0, 0, 0; 1, 0, 1, 0, 0; 0, 1, 0, 1, 0; 0, 0, 1, 0, 1; 0, 0, 0, 1, 0]
x1 := [0; 0; 0; 0; 0]
U = [0, 1, 0, 0, 0; 0, 0, 1, 0, 0; 0, 0, 0, 1, 0; 0, 0, 0, 0, 1; 0, 0, 0, 0, 0]
t := D^-1*y
T := -D^-1*LU
# initial iterate
z[:, 1] := x1  # start the iteration
z[:, m + 1] := T*z[:, m] + t
# inspect the last f iterates
x1 := z[:, mx - 4]
x2 := z[:, mx - 3]
x3 := z[:, mx - 2]
x4 := z[:, mx - 1]
x5 := z[:, mx]
x1[i] = [0.6875; -0.375; 0.21875; -0.0625; 0.03125]
x2[i] = [0.6875; -0.453125; 0.21875; -0.125; 0.03125]
x3[i] = [0.726562; -0.453125; 0.289062; -0.125; 0.0625]
x4[i] = [0.726562; -0.507812; 0.289062; -0.175781; 0.0625]
x5[i] = [0.753906; -0.507812; 0.341797; -0.175781; 0.0878906]
# seems to be converging so inspect norms of the resultant vector
abs_x1[i] := |x1[i]|
norm_x1 := max(abs_x1)
norm_x1 = 0.6875
abs_x2[i] := |x2[i]|
norm_x2 := max(abs_x2)
norm_x2 = 0.6875
abs_x3[i] := |x3[i]|
norm_x3 := max(abs_x3)
norm_x3 = 0.726562
abs_x4[i] := |x4[i]|
norm_x4 := max(abs_x4)
norm_x4 = 0.726562
abs_x5[i] := |x5[i]|
norm_x5 := max(abs_x5)
norm_x5 = 0.753906
# seems to be converging so inspect norms of the difference of iterates in the norm
abs_x21[i] := |x2[i] - x1[i]|
norm_x21 := max(abs_x21)
norm_x21 = 0.078125
abs_x32[i] := |x3[i] - x2[i]|
norm_x32 := max(abs_x32)
norm_x32 = 0.0703125
abs_x43[i] := |x4[i] - x3[i]|
norm_x43 := max(abs_x43)
norm_x43 = 0.0546875
abs_x54[i] := |x5[i] - x4[i]|
norm_x54 := max(abs_x54)
norm_x54 = 0.0527344
# also look at some ratios of norms of the difference in iterates
norm_x21/norm_x2 = 0.113636
norm_x32/norm_x3 = 0.0967742
norm_x43/norm_x4 = 0.0752688
norm_x54/norm_x5 = 0.0699482
k := 1 .. n
a[k] := sum(|T[k, i]|, i)
# sequence is converging slowly because norm(T)=1
T = [0, -0.5, 0, 0, 0; -0.5, 0, -0.5, 0, 0; 0, -0.5, 0, -0.5, 0; 0, 0, -0.5, 0, -0.5; 0, 0, 0, -0.5, 0]
norm_T := max(a)
norm_T = 1
# check residual vector Ax-y for last three iterates
mx - 2 = 8
mx - 1 = 9
mx = 10
Ain*x3 - yin = [0; 0.109375; 0; 0.101562; 0]
Ain*x4 - yin = [-0.0546875; 0; -0.105469; 0; -0.0507812]
Ain*x5 - yin = [0; 0.0800781; 0; 0.078125; 0]
# -------------------------------------------------------------------------------------------------------------------------------------------
