# -------------------------------------------------------------------------------------------------------------------------------------------
# EXAMPLE 5.24 : Jacobi iteration #2 for a tridiagonal system of order
n := 5
ORIGIN ≡ 1
# -------------------------------------------------------------------------------------------------------------------------------------------
# For the tridiagonal system Ax = y investigate the Jacobi iteration
i := 1 .. n
j := 1 .. n
# Inverse matrix of A
A := [2, 1, 0, 0, 0; 1, 2, 1, 0, 0; 0, 1, 2, 1, 0; 0, 0, 1, 2, 1; 0, 0, 0, 1, 2]
y := [1; 0; 0; 0; 0]
Ain := A
yin := y
B := A^-1
# form uniform norm of each matrix
a[i] := sum(|A[i, j]|, j)
b[i] := sum(|B[i, j]|, j)
# check the condition number of matrix A as the product
norm_A := max(a)
norm_B := max(b)
norm_A = 4
norm_B = 4.5
cond_A := norm_A*norm_B
cond_A = 18
# prepare the iteration matrices and maximum number of iterates
D[i, i] := A[i, i]
LU := A - D
mx := 29
m := 1 .. mx
D = [2, 0, 0, 0, 0; 0, 2, 0, 0, 0; 0, 0, 2, 0, 0; 0, 0, 0, 2, 0; 0, 0, 0, 0, 2]
LU = [0, 1, 0, 0, 0; 1, 0, 1, 0, 0; 0, 1, 0, 1, 0; 0, 0, 1, 0, 1; 0, 0, 0, 1, 0]
x1 := [1; 1; 1; 1; 1]
t := D^-1*y
T := -D^-1*LU
# initial iterate
z[:, 1] := x1
# start the iteration
z[:, m + 1] := T*z[:, m] + t
# inspect the last few iterates
x1 := z[:, mx - 4]
x2 := z[:, mx - 3]
x3 := z[:, mx - 2]
x4 := z[:, mx - 1]
x5 := z[:, mx]
x1[i] = [0.843892; -0.619152; 0.521118; -0.285819; 0.177225]
x2[i] = [0.809576; -0.682505; 0.452485; -0.349172; 0.142909]
x3[i] = [0.841252; -0.631031; 0.515838; -0.297697; 0.174586]
x4[i] = [0.815515; -0.678545; 0.464364; -0.345212; 0.148849]
x5[i] = [0.839273; -0.63994; 0.511879; -0.306606; 0.172606]
# seems to be converging so inspect norms of the resultant vector
abs_x1[i] := |x1[i]|
norm_x1 := max(abs_x1)
norm_x1 = 0.843892
abs_x2[i] := |x2[i]|
norm_x2 := max(abs_x2)
norm_x2 = 0.809576
abs_x3[i] := |x3[i]|
norm_x3 := max(abs_x3)
norm_x3 = 0.841252
abs_x4[i] := |x4[i]|
norm_x4 := max(abs_x4)
norm_x4 = 0.815515
abs_x5[i] := |x5[i]|
norm_x5 := max(abs_x5)
norm_x5 = 0.839273
# seems to be converging so inspect norms of the difference of iterates in the norm
abs_x21[i] := |x2[i] - x1[i]|
norm_x21 := max(abs_x21)
norm_x21 = 0.0686321
abs_x32[i] := |x3[i] - x2[i]|
norm_x32 := max(abs_x32)
norm_x32 = 0.0633527
abs_x43[i] := |x4[i] - x3[i]|
norm_x43 := max(abs_x43)
norm_x43 = 0.0514741
abs_x54[i] := |x5[i] - x4[i]|
norm_x54 := max(abs_x54)
norm_x54 = 0.0475145
# also look at some ratios of norms of the difference in iterates
norm_x21/norm_x2 = 0.0847754
norm_x32/norm_x3 = 0.0753076
norm_x43/norm_x4 = 0.0631185
norm_x54/norm_x5 = 0.0566139
k := 1 .. n
a[k] := sum(|T[k, i]|, i)
# sequence is converging slowly because norm(T)=1
T = [0, -0.5, 0, 0, 0; -0.5, 0, -0.5, 0, 0; 0, -0.5, 0, -0.5, 0; 0, 0, -0.5, 0, -0.5; 0, 0, 0, -0.5, 0]
norm_T := max(a)
norm_T = 1
# check residual vector Ax-y for last three iterates
mx - 2 = 27
mx - 1 = 28
mx = 29
Ain*x3 - yin = [0.0514741; 0.0950291; 0.102948; 0.0950291; 0.0514741]
Ain*x4 - yin = [-0.0475145; -0.0772111; -0.0950291; -0.0772111; -0.0475145]
Ain*x5 - yin = [0.0386056; 0.0712718; 0.0772111; 0.0712718; 0.0386056]
# -------------------------------------------------------------------------------------------------------------------------------------------
