# -------------------------------------------------------------------------------------------------------------------------------------------
# EXAMPLE 5.25 : Gauss-Seidel iteration for a tridiagonal system of order
n := 5
ORIGIN ≡ 1
# -------------------------------------------------------------------------------------------------------------------------------------------
# For the tridiagonal system Ax = y investigate the Gauss-Seidel iteration
i := 1 .. n
j := 1 .. n
# Inverse matrix of A
A := [2, 1, 0, 0, 0; 1, 2, 1, 0, 0; 0, 1, 2, 1, 0; 0, 0, 1, 2, 1; 0, 0, 0, 1, 2]
y := [1; 0; 0; 0; 0]
Ain := A
yin := y
B := A^-1
# form uniform norm of each matrix
a[i] := sum(|A[i, j]|, j)
b[i] := sum(|B[i, j]|, j)
# check the condition number of matrix A as the product
norm_A := max(a)
norm_B := max(b)
norm_A = 4
norm_B = 4.5
cond_A := norm_A*norm_B
cond_A = 18
# prepare the iteration matrices and maximum number of iterates
D[i, i] := A[i, i]
LU := A - D
mx := 9
m := 1 .. mx
U[i, j] := (i < j)*A[i, j]
D = [2, 0, 0, 0, 0; 0, 2, 0, 0, 0; 0, 0, 2, 0, 0; 0, 0, 0, 2, 0; 0, 0, 0, 0, 2]
LD := A - U
x1 := [0; 0; 0; 0; 0]
LD = [2, 0, 0, 0, 0; 1, 2, 0, 0, 0; 0, 1, 2, 0, 0; 0, 0, 1, 2, 0; 0, 0, 0, 1, 2]
U = [0, 1, 0, 0, 0; 0, 0, 1, 0, 0; 0, 0, 0, 1, 0; 0, 0, 0, 0, 1; 0, 0, 0, 0, 0]
t := LD^-1*y
T := -LD^-1*U
# initial iterate
z[:, 1] := x1  # start the iteration
z[:, m + 1] := T*z[:, m] + t
# inspect the last five iterates
x1 := z[:, mx - 4]
x2 := z[:, mx - 3]
x3 := z[:, mx - 2]
x4 := z[:, mx - 1]
x5 := z[:, mx]
x1[i] = [0.726562; -0.507812; 0.341797; -0.214844; 0.107422]
x2[i] = [0.753906; -0.547852; 0.381348; -0.244385; 0.122192]
x3[i] = [0.773926; -0.577637; 0.411011; -0.266602; 0.133301]
x4[i] = [0.788818; -0.599915; 0.433258; -0.283279; 0.14164]
x5[i] = [0.799957; -0.616608; 0.449944; -0.295792; 0.147896]
# seems to be converging so inspect norms of the resultant vector
abs_x1[i] := |x1[i]|
norm_x1 := max(abs_x1)
norm_x1 = 0.726562
abs_x2[i] := |x2[i]|
norm_x2 := max(abs_x2)
norm_x2 = 0.753906
abs_x3[i] := |x3[i]|
norm_x3 := max(abs_x3)
norm_x3 = 0.773926
abs_x4[i] := |x4[i]|
norm_x4 := max(abs_x4)
norm_x4 = 0.788818
abs_x5[i] := |x5[i]|
norm_x5 := max(abs_x5)
norm_x5 = 0.799957
# seems to be converging so inspect norms of the difference of iterates in the norm
abs_x21[i] := |x2[i] - x1[i]|
norm_x21 := max(abs_x21)
norm_x21 = 0.0400391
abs_x32[i] := |x3[i] - x2[i]|
norm_x32 := max(abs_x32)
norm_x32 = 0.0297852
abs_x43[i] := |x4[i] - x3[i]|
norm_x43 := max(abs_x43)
norm_x43 = 0.0222778
abs_x54[i] := |x5[i] - x4[i]|
norm_x54 := max(abs_x54)
norm_x54 = 0.0166931
# also look at some ratios of norms of the difference in iterates
norm_x21/norm_x2 = 0.0531088
norm_x32/norm_x3 = 0.0384858
norm_x43/norm_x4 = 0.028242
norm_x54/norm_x5 = 0.0208675
k := 1 .. n
a[k] := sum(|T[k, i]|, i)
# sequence is converging
T = [
    0, -0.5, 0, 0, 0;
    0, 0.25, -0.5, 0, 0;
    0, -0.125, 0.25, -0.5, 0;
    0, 0.0625, -0.125, 0.25, -0.5;
    0, -0.03125, 0.0625, -0.125, 0.25
]
norm_T := max(a)
norm_T = 0.9375
# so norm(T) < 1, then what is the bound on the convergence in Eq.(5.229) ?
i := 1 .. 5
bound[i] := norm_T^(i - 1)/(1 - norm_T)*norm_x21
i = [1; 2; 3; 4; 5]
bound[i] = [0.640625; 0.600586; 0.563049; 0.527859; 0.494868]
# using i=m on setting the bound to ε and taking logarithms of both sides
ε := 10^-3
m := (log(1 - norm_T) + log(norm_T) + log(ε) - log(norm_x21))/log(norm_T)
m = 101.133
# for a bound of  10**(-3) require ~101 iterations
# check residual vector Ax-y for last three iterates
mx - 2 = 7
mx - 1 = 8
mx = 9
Ain*x3 - yin = [-0.0297852; 0.0296631; -0.0222168; 0.0111084; 0]
Ain*x4 - yin = [-0.0222778; 0.0222473; -0.0166779; 0.00833893; 0]
Ain*x5 - yin = [-0.0166931; 0.0166855; -0.0125122; 0.0062561; 0]
# -------------------------------------------------------------------------------------------------------------------------------------------
