# -------------------------------------------------------------------------------------------------------------------------------------------
# EXAMPLE 5.26 : Powers of the iteration matrix T for systems of rank
n := 4
ORIGIN ≡ 1
# -------------------------------------------------------------------------------------------------------------------------------------------
# For the system Ax = y investigate the norms of T
k := 1 .. n
i := 1 .. n
j := 1 .. n
# Inverse matrix of A | form uniform norm of each matrix
A := [10, -1, 2, 0; -1, 11, -1, 3; 2, -1, 10, -1; 0, 3, -1, 8]
y := [6; 25; -11; 15]
Ain := A
yin := y
B := A^-1
a[i] := sum(|A[i, j]|, j)
b[i] := sum(|B[i, j]|, j)
# check the condition number of matrix A as the product
norm_A := max(a)
norm_B := max(b)
norm_A = 16
norm_B = 0.196078
cond_A := norm_A*norm_B
cond_A = 3.13725
# iteration method
# Jacobi
D[i, i] := A[i, i]
LU := A - D
TJ := -D^-1*LU
# Gauss Seidel
U[i, k] := (i < k)*A[i, k]
LD := A - U
TS := -LD^-1*U
# General
S[i, k] := (|k - i| < 2)*A[i, k]
AS := A - S
TG := -S^-1*AS
# absolute value
aJ1[k] := sum(|TJ[k, i]|, i)
aS1[k] := sum(|TS[k, i]|, i)
aG1[k] := sum(|TG[k, i]|, i)
# form matrix powers
norm_¥(x) := max(vectorize(|x|))
# 1
TJ2 := TJ^2
TS2 := TS^2
TG2 := TG^2
# 2
aJ2[k] := sum(|TJ2[k, i]|, i)
aS2[k] := sum(|TS2[k, i]|, i)
aG2[k] := sum(|TG2[k, i]|, i)
# 3
TJ3 := TJ^3
TS3 := TS^3
TG3 := TG^3
aJ3[k] := sum(|TJ3[k, i]|, i)
aS3[k] := sum(|TS3[k, i]|, i)
aG3[k] := sum(|TG3[k, i]|, i)
# 4
TJ4 := TJ^4
TS4 := TS^4
TG4 := TG^4
aJ4[k] := sum(|TJ4[k, i]|, i)
aS4[k] := sum(|TS4[k, i]|, i)
aG4[k] := sum(|TG4[k, i]|, i)
# comparison of norms
# Jacobi | Gauss Seidel | General
# 1
norm_¥(aJ1) = 0.5
norm_¥(aS1) = 0.354545
norm_¥(aG1) = 0.409096
# 2
norm_¥(aJ2) = 0.220455
norm_¥(aS2) = 0.0487273
norm_¥(aG2) = 0.12843
# 3
norm_¥(aJ3) = 0.0944318
norm_¥(aS3) = 0.00756599
norm_¥(aG3) = 0.0493393
# 4
norm_¥(aJ4) = 0.040515
norm_¥(aS4) = 0.000911089
norm_¥(aG4) = 0.0153411
# -------------------------------------------------------------------------------------------------------------------------------------------
