# -------------------------------------------------------------------------------------------------------------------------------------------
# EXAMPLE 5.27 : Norms of the inverse  (1-T)^-1  for systems of rank
n := 4
ORIGIN ≡ 1
# -------------------------------------------------------------------------------------------------------------------------------------------
# For the system Ax = y investigate norms of the inverse of (1-T)
k := 1 .. n
i := 1 .. n
j := 1 .. n
# Inverse matrix of A | form uniform norm of each matrix
A := [10, -1, 2, 0; -1, 11, -1, 3; 2, -1, 10, -1; 0, 3, -1, 8]
y := [6; 25; -11; 15]
Ain := A
yin := y
B := A^-1
a[i] := sum(|A[i, j]|, j)
b[i] := sum(|B[i, j]|, j)
# check the condition number of matrix A as the product
norm_A := max(a)
norm_B := max(b)
norm_A = 16
norm_B = 0.196078
cond_A := norm_A*norm_B
cond_A = 3.13725
# iteration method
norm_¥(x) := max(vectorize(|x|))
# Jacobi
D[i, i] := A[i, i]
LU := A - D
TJ := -D^-1*LU
# Gauss Seidel
U[i, k] := (i < k)*A[i, k]
LD := A - U
TS := -LD^-1*U
# General
S[i, k] := (|k - i| < 2)*A[i, k]
AS := A - S
TG := -S^-1*AS
# ____compare the norms of  (1-T)^-1  with the sum of norms of powers of  T_____
# Jacobi | Gauss Seidel | General
# ___________________ | ___________________ | ___________________
J_norms := [0.5; 0.22045; 0.09443; 0.04051]
S_norms := [0.35455; 0.04873; 0.00757; 0.00091]
G_norms := [0.4091; 0.12843; 0.04934; 0.01534]
IJ := (identity(n) - TJ)^-1
IS := (identity(n) - TS)^-1
IG := (identity(n) - TG)^-1
aJ[k] := sum(|IJ[k, i]|, i)
aS[k] := sum(|IS[k, i]|, i)
aG[k] := sum(|IG[k, i]|, i)
norm_¥(aJ) = 1.71738
norm_¥(aS) = 1.39608
norm_¥(aG) = 1.57066
sum(J_norms) = 0.85539
sum(S_norms) = 0.41176
sum(G_norms) = 0.60221
τ_J := J_norms[1]
τ_S := S_norms[1]
τ_G := G_norms[1]
1/(1 - τ_J) = 2
1/(1 - τ_S) = 1.54931
1/(1 - τ_G) = 1.69233
# which verifies the bound of Eq.(5.221)
# -------------------------------------------------------------------------------------------------------------------------------------------
