# -------------------------------------------------------------------------------------------------------------------------------------------
# EXAMPLE 5.28 : The bound on the iterate for systems of rank
n := 4
# case 2
ORIGIN ≡ 1
# -------------------------------------------------------------------------------------------------------------------------------------------
# For the system Ax = y investigate norms of the inverse of (1-T)
k := 1 .. n
i := 1 .. n
j := 1 .. n
# Inverse matrix of A | form uniform norm of each matrix
A := [10, -1, 2, 0; -1, 11, -1, 3; 2, -1, 10, -1; 0, 3, -1, 8]
y := [6; 25; -11; 15]
Ain := A
yin := y
B := A^-1
a[i] := sum(|A[i, j]|, j)
b[i] := sum(|B[i, j]|, j)
# check the condition number of matrix A as the product
norm_A := max(a)
norm_B := max(b)
norm_A = 16
norm_B = 0.196078
cond_A := norm_A*norm_B
cond_A = 3.13725
mx := 5
norm_¥(x) := max(vectorize(|x|))
z1 := [0; 0; 0; 0]
z0 := [-1; -2; 1; -1]
m := 2 .. mx
M := 1 .. mx
# ____iteration method_____
# Jacobi | Gauss Seidel | General
# ___________________ | _____________________ | _______________________
D[i, i] := A[i, i]
U[i, k] := (i < k)*A[i, k]
S[i, k] := (|k - i| < 2)*A[i, k]
LU := A - D
LD := A - U
AS := A - S
TJ := -D^-1*LU
TS := -LD^-1*U
TG := -S^-1*AS
tj := -D^-1*y
ts := -LD^-1*y
tg := -S^-1*y
zj[:, 1] := z1
zs[:, 1] := z1
zg[:, 1] := z1
zj[:, m] := TJ*zj[:, m - 1] + tj
zs[:, m] := TS*zs[:, m - 1] + ts
zg[:, m] := TG*zg[:, m - 1] + tg
J_norms := [0.5; 0.22045; 0.09443; 0.04051]
S_norms := [0.35455; 0.04873; 0.00757; 0.00091]
G_norms := [0.4091; 0.12843; 0.04934; 0.01534]
# norms of distances from the exact solution for successive iterates
dj[M] := norm_¥(z0 - zj[:, M])
ds[M] := norm_¥(z0 - zs[:, M])
dg[M] := norm_¥(z0 - zg[:, M])
dj[m] = [0.875; 0.284091; 0.130881; 0.0463042]
ds[m] = [0.4; 0.036938; 0.00658504; 0.000860979]
dg[m] = [0.788419; 0.222509; 0.0870215; 0.0248733]
# bounds of  Eq.(5.226)  as the number  norm( T^m-1 ) * norm( z0 - z1 )
J_b[m] := J_norms[m - 1]*dj[1]
S_b[m] := S_norms[m - 1]*ds[1]
G_b[m] := G_norms[m - 1]*dg[1]
# distance  bound | distance  bound | distance  bound
J_b[m] = [1; 0.4409; 0.18886; 0.08102]
S_b[m] = [0.7091; 0.09746; 0.01514; 0.00182]
G_b[m] = [0.8182; 0.25686; 0.09868; 0.03068]
# -------------------------------------------------------------------------------------------------------------------------------------------
