# -------------------------------------------------------------------------------------------------------------------------------------------
# EXAMPLE 5.29 : The bound on the iterate for systems of rank
n := 4
# case 3
ORIGIN ≡ 1
# -------------------------------------------------------------------------------------------------------------------------------------------
# For the system Ax = y investigate norms of the inverse of (1-T)
k := 1 .. n
i := 1 .. n
j := 1 .. n
# Inverse matrix of A | form uniform norm of each matrix
A := [10, -1, 2, 0; -1, 11, -1, 3; 2, -1, 10, -1; 0, 3, -1, 8]
y := [6; 25; -11; 15]
Ain := A
yin := y
B := A^-1
a[i] := sum(|A[i, j]|, j)
b[i] := sum(|B[i, j]|, j)
# check the condition number of matrix A as the product
norm_A := max(a)
norm_B := max(b)
norm_A = 16
norm_B = 0.196078
cond_A := norm_A*norm_B
cond_A = 3.13725
mx := 5
norm_¥(x) := max(vectorize(|x|))
z1 := [0; 0; 0; 0]
z0 := [-1; -2; 1; -1]
m := 2 .. mx
M := 1 .. mx
# ____iteration method_____
# Jacobi | Gauss Seidel | General
# ___________________ | _____________________ | _______________________
D[i, i] := A[i, i]
U[i, k] := (i < k)*A[i, k]
S[i, k] := (|k - i| < 2)*A[i, k]
LU := A - D
LD := A - U
AS := A - S
TJ := -D^-1*LU
TS := -LD^-1*U
TG := -S^-1*AS
tj := -D^-1*y
ts := -LD^-1*y
tg := -S^-1*y
zj[:, 1] := z1
zs[:, 1] := z1
zg[:, 1] := z1
zj[:, m] := TJ*zj[:, m - 1] + tj
zs[:, m] := TS*zs[:, m - 1] + ts
zg[:, m] := TG*zg[:, m - 1] + tg
# ___________________ | _____________________ | _______________________
# norms of distances from the exact solution for successive iterates
dj[M] := norm_¥(z0 - zj[:, M])
ds[M] := norm_¥(z0 - zs[:, M])
dg[M] := norm_¥(z0 - zg[:, M])
# norms of distances from the exact solution for successive iterates
δ := norm_¥(zj[:, 2] - zj[:, 1])
σ := norm_¥(zs[:, 2] - zs[:, 1])
Γ := norm_¥(zg[:, 2] - zg[:, 1])
# bounds of  Eq.(5.229)  as the number  t^m-1 /  ( 1 - t ) * norm( z^2 - z^1 )
τ_J := 0.5
τ_S := 0.35455
τ_G := 0.4091
J_b[m] := τ_J^(m - 1)/(1 - τ_J)*δ
S_b[m] := τ_S^(m - 1)/(1 - τ_S)*σ
G_b[m] := τ_G^(m - 1)/(1 - τ_G)*Γ
dj[m] = [0.875; 0.284091; 0.130881; 0.0463042]
ds[m] = [0.4; 0.036938; 0.00658504; 0.000860979]
dg[m] = [0.788419; 0.222509; 0.0870215; 0.0248733]
J_b[m] = [2.27273; 1.13636; 0.568182; 0.284091]
S_b[m] = [1.27839; 0.453252; 0.1607; 0.0569764]
G_b[m] = [1.58204; 0.647211; 0.264774; 0.108319]
# -------------------------------------------------------------------------------------------------------------------------------------------
