# -------------------------------------------------------------------------------------------------------------------------------------------
# EXAMPLE 5.3 : Some matrix operations
ORIGIN := 1
# -------------------------------------------------------------------------------------------------------------------------------------------
# Define a matrix and perform a few operations on it
i := 1 .. 3
j := 1 .. 3  # product with its own inverse is the identity matrix
k := 1 .. 3
# transpose
A := [1, 2, 1; 2, 2, 3; -1, -2, 0]
AT[i, j] := A[j, i]
AT = [1, 2, -1; 2, 2, -2; 1, 3, 0]
A^-1 = [-3, 1, -2; 1.5, -0.5, 0.5; 1, 0, 1]
A*A^-1 = [1, 0, 0; 0, 1, 0; 0, 0, 1]
# trace of a matrix | define a vector
# form the matrix vector product | is matrix A positive definite ?
sum(A[i, i], i) = 3
x := [1; 1; 1]
Ax[i] := sum(A[i, j]*x[j], j)
Ax = [4; 7; -3]
sum(x[i]*sum(A[i, j]*x[j], j), i) = 8
# form the matrix-matrix product | form the matrix element product
AB[i, k] := sum(A[i, j]*AT[j, k], j)
AB = [6, 9, -5; 9, 17, -6; -5, -6, 5]
AxB[i, j] := A[i, j]*AT[i, j]
AxB = [1, 4, -1; 4, 4, -6; -1, -6, 0]
# -------------------------------------------------------------------------------------------------------------------------------------------
