# -------------------------------------------------------------------------------------------------------------------------------------------
# EXAMPLE 5.30 : Jacobi iteration and SOR for a linear system of order
n := 4
# case 1
ORIGIN ≡ 1
# -------------------------------------------------------------------------------------------------------------------------------------------
# For the tridiagonal system Ax = y investigate the Jacobi iteration
i := 1 .. n
j := 1 .. n
# Inverse matrix of A
A := [10, -1, 2, 0; -1, 11, -1, 3; 2, -1, 10, -1; 0, 3, -1, 8]
y := [6; 25; -11; 15]
Ain := A
yin := y
B := A^-1
# form uniform norm of each matrix
a[i] := sum(|A[i, j]|, j)
b[i] := sum(|B[i, j]|, j)
# check the condition number of matrix A as the product
norm_A := max(a)
norm_B := max(b)
norm_A = 16
norm_B = 0.196078
cond_A := norm_A*norm_B
cond_A = 3.13725
# prepare the iteration matrices and maximum number of iterates
D[i, i] := A[i, i]
LU := A - D
mx := 9
m := 3 .. mx
U[i, j] := (i < j)*A[i, j]
# initial iterate
z[:, 1] := [0; 0; 0; 0]
D = [10, 0, 0, 0; 0, 11, 0, 0; 0, 0, 10, 0; 0, 0, 0, 8]
LU = [0, -1, 2, 0; -1, 0, -1, 3; 2, -1, 0, -1; 0, 3, -1, 0]
U = [0, -1, 2, 0; 0, 0, -1, 3; 0, 0, 0, -1; 0, 0, 0, 0]
t := D^-1*y
T := -D^-1*LU
# start m=2 iteration
z[:, 2] := T*z[:, 1] + t
# next iterate
μ := 0.95
z[:, m] := T*(z[:, m - 2] + μ*(z[:, m - 1] - z[:, m - 2])) + t
# inspect the last five iterates
x1 := z[:, mx - 4]
x2 := z[:, mx - 3]
x3 := z[:, mx - 2]
x4 := z[:, mx - 1]
x5 := z[:, mx]
x1[i] = [1.00371; 1.96706; -0.979084; 0.995626]
x2[i] = [0.993254; 2.00143; -1.00305; 1.01368]
x3[i] = [1.00034; 1.99578; -0.997507; 0.999876]
x4[i] = [0.999163; 2.00005; -1.00033; 1.00175]
x5[i] = [1.00002; 1.99946; -0.999695; 1.00004]
# seems to be converging so inspect norms of the resultant vector
abs_x1[i] := |x1[i]|
norm_x1 := max(abs_x1)
norm_x1 = 1.96706
abs_x2[i] := |x2[i]|
norm_x2 := max(abs_x2)
norm_x2 = 2.00143
abs_x3[i] := |x3[i]|
norm_x3 := max(abs_x3)
norm_x3 = 1.99578
abs_x4[i] := |x4[i]|
norm_x4 := max(abs_x4)
norm_x4 = 2.00005
abs_x5[i] := |x5[i]|
norm_x5 := max(abs_x5)
norm_x5 = 1.99946
# seems to be converging so inspect norms of the difference of iterates in the norm
abs_x21[i] := |x2[i] - x1[i]|
norm_x21 := max(abs_x21)
norm_x21 = 0.0343712
abs_x32[i] := |x3[i] - x2[i]|
norm_x32 := max(abs_x32)
norm_x32 = 0.0138002
abs_x43[i] := |x4[i] - x3[i]|
norm_x43 := max(abs_x43)
norm_x43 = 0.00426385
abs_x54[i] := |x5[i] - x4[i]|
norm_x54 := max(abs_x54)
norm_x54 = 0.00171421
# also look at some ratios of norms of the difference in iterates
norm_x21/norm_x2 = 0.0171733
norm_x32/norm_x3 = 0.00691467
norm_x43/norm_x4 = 0.00213188
norm_x54/norm_x5 = 0.000857339
# iteration is convergent at a faster rate but this is sensitive to the choice of m
k := 1 .. n
a[k] := sum(|T[k, i]|, i)
# sequence is converging with norm(T)=0.5
T = [0, 0.1, -0.2, 0; 0.0909091, 0, 0.0909091, -0.272727; -0.2, 0.1, 0, 0.1; 0, -0.375, 0.125, 0]
norm_T := max(a)
norm_T = 0.5
# so norm(T) < 1, then what is the bound on the convergence in Eq.(5.229) ?
i := 1 .. 4
bound[i] := norm_T^(i - 1)/(1 - norm_T)*norm_x21
i = [1; 2; 3; 4]
bound[i] = [0.0687425; 0.0343712; 0.0171856; 0.00859281]
# using i=m on setting the bound to ε and taking logarithms of both sides
ε := 10^-3
m := (log(1 - norm_T) + log(norm_T) + log(ε) - log(norm_x21))/log(norm_T)
m = 7.10313
# for a bound of  10**(-3) require ~7 iterations
# check residual vector Ax-y for last three iterates (compare to EXAMPLE 5.22 without SOR
mx - 2 = 7
mx - 1 = 8
mx = 9
Ain*x3 - yin = [0.012622; -0.049604; 0.0299574; -0.0161357]
Ain*x4 - yin = [-0.00908221; 0.00693369; -0.00681608; 0.0144947]
Ain*x5 - yin = [0.00136883; -0.00615863; 0.00359314; -0.00161778]
# this suggests the above is an underestimate for m by a small margin
# -------------------------------------------------------------------------------------------------------------------------------------------
