# -------------------------------------------------------------------------------------------------------------------------------------------
# EXAMPLE 5.31 : Jacobi iteration with SOR for a linear system of order
n := 4
# case 2
ORIGIN ≡ 1
# -------------------------------------------------------------------------------------------------------------------------------------------
# For the tridiagonal system Ax = y investigate the Jacobi iteration
i := 1 .. n
j := 1 .. n
# Inverse matrix of A
A := [10, -1, 2, 0; -1, 11, -1, 3; 2, -1, 10, -1; 0, 3, -1, 8]
y := [6; 25; -11; 15]
Ain := A
yin := y
B := A^-1
# form uniform norm of each matrix
a[i] := sum(|A[i, j]|, j)
b[i] := sum(|B[i, j]|, j)
# check the condition number of matrix A as the product
norm_A := max(a)
norm_B := max(b)
norm_A = 16
norm_B = 0.196078
cond_A := norm_A*norm_B
cond_A = 3.13725
# prepare the iteration matrices and maximum number of iterates
D[i, i] := A[i, i]
mx := 6
m := 3 .. mx
U[i, j] := (i < j)*A[i, j]
# initial iterate
D = [10, 0, 0, 0; 0, 11, 0, 0; 0, 0, 10, 0; 0, 0, 0, 8]
LD := A - U
LD = [10, 0, 0, 0; -1, 11, 0, 0; 2, -1, 10, 0; 0, 3, -1, 8]
z[:, 1] := [0; 0; 0; 0]
U = [0, -1, 2, 0; 0, 0, -1, 3; 0, 0, 0, -1; 0, 0, 0, 0]
t := LD^-1*y
T := -LD^-1*U
# start m=2 iteration
z[:, 2] := T*z[:, 1] + t
# next iterate
μ := 1.05
# with SOR
z[:, m] := T*(z[:, m - 2] + μ*(z[:, m - 1] - z[:, m - 2])) + t
# inspect the last five iterates
x1 := z[:, mx - 4]
x2 := z[:, mx - 3]
x3 := z[:, mx - 2]
x4 := z[:, mx - 1]
x5 := z[:, mx]
x1[i] = [0.6; 2.32727; -0.987273; 0.878864]
x2[i] = [1.05169; 2.02242; -1.01582; 0.989615]
x3[i] = [1.00417; 2.00013; -1.0013; 0.999787]
x4[i] = [1.00002; 1.99987; -0.999987; 1.00005]
x5[i] = [0.99997; 1.99999; -0.999989; 1.00001]
# seems to be converging so inspect norms of the resultant vector
abs_x1[i] := |x1[i]|
norm_x1 := max(abs_x1)
norm_x1 = 2.32727
abs_x2[i] := |x2[i]|
norm_x2 := max(abs_x2)
norm_x2 = 2.02242
abs_x3[i] := |x3[i]|
norm_x3 := max(abs_x3)
norm_x3 = 2.00013
abs_x4[i] := |x4[i]|
norm_x4 := max(abs_x4)
norm_x4 = 1.99987
abs_x5[i] := |x5[i]|
norm_x5 := max(abs_x5)
norm_x5 = 1.99999
# seems to be converging so inspect norms of the difference of iterates in the norm
abs_x21[i] := |x2[i] - x1[i]|
norm_x21 := max(abs_x21)
norm_x21 = 0.451691
abs_x32[i] := |x3[i] - x2[i]|
norm_x32 := max(abs_x32)
norm_x32 = 0.0475245
abs_x43[i] := |x4[i] - x3[i]|
norm_x43 := max(abs_x43)
norm_x43 = 0.00414866
abs_x54[i] := |x5[i] - x4[i]|
norm_x54 := max(abs_x54)
norm_x54 = 0.000118546
# also look at some ratios of norms of the difference in iterates
norm_x21/norm_x2 = 0.223342
norm_x32/norm_x3 = 0.0237607
norm_x43/norm_x4 = 0.00207446
norm_x54/norm_x5 = 5.92735e-5
# iteration is convergent at a faster rate but this is sensitive to the choice of m
k := 1 .. n
a[k] := sum(|T[k, i]|, i)
# sequence is converging with norm(T)=0.5
T = [
    0, 0.1, -0.2, 0;
    0, 0.00909091, 0.0727273, -0.272727;
    0, -0.0190909, 0.0472727, 0.0727273;
    0, -0.00579545, -0.0213636, 0.111364
]
norm_T := max(a)
norm_T = 0.354545
# so norm(T) < 1, then what is the bound on the convergence in Eq.(5.229) ?
i := 1 .. 4
bound[i] := norm_T^(i - 1)/(1 - norm_T)*norm_x21
i = [1; 2; 3; 4]
bound[i] = [0.699803; 0.248112; 0.0879669; 0.0311883]
# using i=m on setting the bound to ε and taking logarithms of both sides
ε := 10^-3
m := (log(1 - norm_T) + log(norm_T) + log(ε) - log(norm_x21))/log(norm_T)
m = 7.31756
# for a bound of  10**(-3) require ~10 iterations
mx - 2 = 4
mx - 1 = 5
mx = 6
Ain*x3 - yin = [0.0389211; -0.00203501; -0.00463427; 0]
Ain*x4 - yin = [0.000334484; -0.00132569; 0.000244564; 1.77636e-15]
Ain*x5 - yin = [-0.000266928; -0.000106035; 5.78678e-5; 1.77636e-15]
# this suggests the above estimate for m may be correct - compare this to EXAMPLE 5.32 without SOR
# -------------------------------------------------------------------------------------------------------------------------------------------
