# -------------------------------------------------------------------------------------------------------------------------------------------
# EXAMPLE 5.4 : Sparse matrix storage schemes
ORIGIN := 1
# -------------------------------------------------------------------------------------------------------------------------------------------
# Define a sparse matrix and study storage schemes
N := 4
j := [1; 2; 3; 4]
A := [4.5, 0, 3.2, 0; 3.1, 2.9, 0, 0.9; 0, 1.7, 3.0, 0; 3.5, 0.4, 0, 1.0]
# From Timothy A. Davis, 2006 (Chapter 2)
NZ := 10
k := 1 .. NZ
# column index is not used
# TS: Triplet storage | CC: Compressed Column storage
# length = NZ | length = NZ
# length = N+1
TS_value*[4.5; 3.2; 3.1; 2.9; 0.9; 1.7; 3.0; 3.5; 0.4; 1.0]
TS_row*[1; 1; 2; 2; 2; 3; 3; 4; 4; 4]
TS_col*[1; 3; 1; 2; 4; 2; 3; 1; 2; 4]
value := [4.5; 3.1; 3.5; 2.9; 1.7; 0.4; 3.2; 3.0; 0.9; 1.0]
i := [1; 2; 4; 2; 3; 4; 1; 3; 2; 4]
p := [1; 4; 7; 9; 10]
col := [1; 1; 1; 2; 2; 2; 3; 3; 4; 4]
# retrieve row index and value of non zero entries
# value of j | range in values of p(j) to p(j+1) -1
j[1] = 1
p[j[1]] = 1
p[j[1]] + 1 = 2
p[j[1]] + 2 = 3
i[1] = 1
i[2] = 2
i[3] = 4
j[2] = 2
p[j[2]] = 4
p[j[2]] + 1 = 5
p[j[2]] + 2 = 6
i[4] = 2
i[5] = 3
i[6] = 4
j[3] = 3
p[j[3]] = 7
p[j[3]] + 1 = 8
i[7] = 1
i[8] = 3
j[4] = 4
p[j[4]] = 9
p[j[4]] + 1 = 10
i[9] = 2
i[10] = 4
# -------------------------------------------------------------------------------------------------------------------------------------------
