# -------------------------------------------------------------------------------------------------------------------------------------------
# EXAMPLE 5.5 : Some determinant operations
ORIGIN := 1
# -------------------------------------------------------------------------------------------------------------------------------------------
# square matrix | upper triangular matrix
a := [1, 2, 1; 2, 2, 3; -1, -2, 1]
b := [1, 2, 1; 0, 2, 3; 0, 0, 1]
# Minors
M[1, 1] := a[2, 2]*a[3, 3] - a[2, 3]*a[3, 2]
M[1, 2] := a[2, 1]*a[3, 3] - a[2, 3]*a[3, 1]
M[1, 3] := a[2, 1]*a[3, 2] - a[2, 2]*a[3, 1]
Determinant_a := a[1, 1]*M[1, 1] + a[1, 2]*M[1, 2] + a[1, 3]*M[1, 3]
Determinant_a = 16
Determinant_b := b[1, 1]*b[2, 2]*b[3, 3]
Determinant_b = 2
# -------------------------------------------------------------------------------------------------------------------------------------------
