# -------------------------------------------------------------------------------------------------------------------------------------------
# EXAMPLE 5.6 : Some permanents of (0,1) matrices
ORIGIN := 1
# -------------------------------------------------------------------------------------------------------------------------------------------
# square matrix
# upper triangular matrix
i := 1 .. 6
a := [1, 1, 1; 1, 1, 1; 1, 1, 1]
b := [0, 1, 1; 1, 0, 1; 1, 1, 0]
# permutations for matrix a
nset[1] := a[1, 1]*a[2, 2]*a[3, 3]
nset[3] := a[1, 3]*a[2, 1]*a[3, 2]
nset[5] := a[1, 2]*a[2, 1]*a[3, 3]
3! = 6
nset[2] := a[1, 2]*a[2, 3]*a[3, 1]
nset[4] := a[1, 3]*a[2, 2]*a[3, 1]
nset[6] := a[1, 1]*a[2, 3]*a[3, 2]
per_a := sum(nset[i], i)
per_a = 6
# permutations for matrix b (avoiding diagonal elements and duplicate permutations
nset[1] := b[1, 1]*b[2, 2]*b[3, 3]
nset[3] := b[1, 3]*b[2, 1]*b[3, 2]
nset[5] := b[1, 2]*b[2, 1]*b[3, 3]
3!*(1/2! - 1/3!) = 2
nset[2] := b[1, 2]*b[2, 3]*b[3, 1]
nset[4] := b[1, 3]*b[2, 2]*b[3, 1]
nset[6] := b[1, 1]*b[2, 3]*b[3, 2]
per_b := sum(nset[i], i)
per_b = 2
# -------------------------------------------------------------------------------------------------------------------------------------------
