# -------------------------------------------------------------------------------------------------------------------------------------------
# EXAMPLE 5.7 : The operator equation for a quantum particle in an infinitely deep well
ORIGIN := 1
# -------------------------------------------------------------------------------------------------------------------------------------------
# Solutions of v"(x)+k^2v(x) = 0 are eigenfunctions of the infinite square well n=1, 2, 3, ...
# Substitution of the Fourier series (see Section 2.5) for v(x) into the operator equation and application of the orthogonality relations yields a system of linear equations with this matrix on the left hand side.
# since the matrix is diagonal  it contains the eigenvalues on that diagonal
#
# the eigenvalue k=0 is ignored since this  contradicts the normalization condition on |v(x)|^2
A := [0, 0, 0, 0, 0; 0, (1*π)^2, 0, 0, 0; 0, 0, (2*π)^2, 0, 0; 0, 0, 0, (3*π)^2, 0; 0, 0, 0, 0, (4*π)^2]
k := eigenvals(A)
157.91/9.87 = 15.999
k[1] = 157.914
(4*π)^2 = 157.914  # note that the eigenvalues scale with n and are multiples of the lowest one
k[2] = 88.8264
(3*π)^2 = 88.8264
88.82/9.87 = 8.99899
k[3] = 39.4784
(2*π)^2 = 39.4784
39.48/9.87 = 4
k[4] = 9.8696
(1*π)^2 = 9.8696
# -------------------------------------------------------------------------------------------------------------------------------------------
