# -------------------------------------------------------------------------------------------------------------------------------------------
# EXAMPLE 5.8 : Gaussian elimination #1 for linear equations of order
n := 3
ORIGIN := 1
# -------------------------------------------------------------------------------------------------------------------------------------------
# For the system Ax=y define
A := [1, 2, 1; 2, 2, 3; -1, -3, 0]
y := [0; 3; 2]
# store input as
Ain := A
yin := y
# ELIMINATION
i := 2 .. 3
j := 2 .. 3
# define multipliers
m[i, 1] := A[i, 1]/A[1, 1]  # perform elimination in equations 2 and 3
i := 2 .. 3
j := 1 .. 3
y[i] := y[i] - m[i, 1]*y[1]
A[i, j] := A[i, j] - m[i, 1]*A[1, j]
A = [1, 2, 1; 0, -2, 1; 0, -1, 1]
y = [0; 3; 2]
i := 3 .. 3
# define multiplier
m[i, 2] := A[i, 2]/A[2, 2]  # perform elimination in equation 3
y[i] := y[i] - m[i, 2]*y[2]
A[i, j] := A[i, j] - m[i, 2]*A[2, j]
A = [1, 2, 1; 0, -2, 1; 0, 0, 0.5]
y = [0; 3; 0.5]
# BACK SUBSTITUTION
x[3] := y[3]/A[3, 3]
x[2] := (y[2] - A[2, 3]*x[3])/A[2, 2]
x[1] := (y[1] - A[1, 2]*x[2] - A[1, 3]*x[3])/A[1, 1]
x = [1; -1; 1]
# check that this is the solution of the linear system
Ain*x - yin = [0; 0; 0]
# -------------------------------------------------------------------------------------------------------------------------------------------
