# -------------------------------------------------------------------------------------------------------------------------------------------
# EXAMPLE 5.9 : Gaussian elimination #2 for linear equations of order
n := 3
ORIGIN := 1
# -------------------------------------------------------------------------------------------------------------------------------------------
# For the system Ax=y define
A := [0.729, 0.81, 0.9; 1, 1, 1; 1.331, 1.21, 1.1]
y := [0.6867; 0.8338; 1.0]  # store input as
Ain := A
yin := y
# ELIMINATION
i := 2 .. 3
j := 2 .. 3
# define multipliers
m[i, 1] := A[i, 1]/A[1, 1]  # perform elimination in equations 2 and 3
i := 2 .. 3
j := 1 .. 3
y[i] := y[i] - m[i, 1]*y[1]
A[i, j] := A[i, j] - m[i, 1]*A[1, j]
i := 3 .. 3
A = [0.729, 0.81, 0.9; 0, -0.111111, -0.234568; 0, -0.268889, -0.54321]
y = [0.6867; -0.108175; -0.253769]
# define multiplier
m[i, 2] := A[i, 2]/A[2, 2]  # perform elimination in equation 3
y[i] := y[i] - m[i, 2]*y[2]
A[i, j] := A[i, j] - m[i, 2]*A[2, j]
A = [0.729, 0.81, 0.9; 0, -0.111111, -0.234568; 0, 0, 0.0244444]
y = [0.6867; -0.108175; 0.00801511]
# BACK SUBSTITUTION
x[3] := y[3]/A[3, 3]
x[2] := (y[2] - A[2, 3]*x[3])/A[2, 2]
x[1] := (y[1] - A[1, 2]*x[2] - A[1, 3]*x[3])/A[1, 1]
x = [0.224545; 0.281364; 0.327891]
# check that this is the solution of the linear system
Ain*x - yin = [0; -1.11022e-16; 0]
# -------------------------------------------------------------------------------------------------------------------------------------------
