# ----------------------------------------------------------------------------------------------------------------------------------------------
# EXAMPLE  6.1 : Evaluation of Legendre polynomial of order 2 by recurrence and a plot on [-1,+1]
# ----------------------------------------------------------------------------------------------------------------------------------------------
# Legendre polynomial largest order
n := 2
# range
k := 2 .. n
# for argument range
xmin := -1
xmax := 1
# select the number of argument values
N := 30
i := 0 .. N
# set up a grid in argument values for a Legendre polynomial plot
x[i] := xmin + (i - 1)*(xmax - xmin)/(N - 1)
# initial values for polynomial | recurrence at each grid point in argument
P[i, 0] := 1
P[i, 1] := x[i]
P[:, k] := vectorize((2*k - 1)/k*x*P[:, k - 1] - (k - 1)/k*P[:, k - 2])
# [plot: P[i, 1], P[i, 2] vs x[i]]
# confirm the root by evaluating the Legendre polynomial of order 2 at the root
root := 1/sqrt(3)
k := 2
P0 := 1
P1 := root
P2 := (2*k - 1)/k*root*P1 - (k - 1)/k*P0
# the value is zero
P2 = 1.11022e-16
# ----------------------------------------------------------------------------------------------------------------------------------------------
