# -------------------------------------------------------------------------------------------------------------------------------------------
# EXAMPLE 6.10 : Roots of a function by Newton's method: second root
# -------------------------------------------------------------------------------------------------------------------------------------------
# Consider for simplicity a
# Legendre polynomial function with coefficients
j := 0 .. 6
α[j] := 0
α[0] := -5
α[2] := 105
α[4] := -315
α[6] := 231
α[j] := α[j]/16
# defined by
p(x) := sum(α[j]*x^j, j)
# with range of argument
x := -1, -.98 .. 1
# [plot: p(x) vs x]
# Newton's Method
# Note that Newton's method works well if the initial iterate is chosen well and not close to extrema of the function where the derivative can approach a zero value.
imax := 4
i := 0 .. imax  # is the iteration range
# Define the derivative
x[0] := 0.78  # is the initial iterate
pp(y) := d/dy(p(y))
# c and d must be nearly equal close to the root
x[i + 1] := x[i] - (p(x[i])/pp(x[i]))
c[i + 1] := x[i + 1] - x[i]
d[i + 1] := x[imax + 1] - x[i]
i = [0; 1; 2; 3; 4]
x[i] = [0.78; 0.612388; 0.666961; 0.661244; 0.661209]
p(x[i]) = [-0.355895; 0.141196; -0.0181685; -0.000108442; -4.39871e-9]
c[i] = [0; -0.167612; 0.0545736; -0.00571735; -3.4549e-5]
d[i] = [0; -0.118791; 0.0488217; -0.0057519; -3.45504e-5]
# C should be constant
# and 1/C should be a bound
i := 1 .. imax  # check iterate correction
C[i] := d[i + 1]/d[i]^2
CI[i] := 1/C[i]
C[i] = [3.45978; -2.41316; -1.04431; -1.17407]
CI[i] = [0.289036; -0.414395; -0.957568; -0.851741]
pp(x[i]) = [-2.58726; -3.17778; -3.13879; -3.13854]
p(x[i])/pp(x[i]) = [-0.0545736; 0.00571735; 3.4549e-5; 1.40152e-9]
# Compare the convergence in function and argument to the bisection method
# -------------------------------------------------------------------------------------------------------------------------------------------
