# -------------------------------------------------------------------------------------------------------------------------------------------
# EXAMPLE 6.11 : Roots of a function by Newton's method: third root
# -------------------------------------------------------------------------------------------------------------------------------------------
# Consider for simplicity a
# Legendre polynomial function with coefficients
j := 0 .. 6
α[j] := 0
α[0] := -5
α[2] := 105
α[4] := -315
α[6] := 231
α[j] := α[j]/16
# defined by
p(x) := sum(α[j]*x^j, j)
# with range of argument
x := -1, -.98 .. 1
# [plot: p(x) vs x]
# Newton's Method
# Note that Newton's method works well if the initial iterate is chosen well and not close to extrema of the function where the derivative can approach a zero value.
imax := 4
i := 0 .. imax  # is the iteration range
# Define the derivative
x[0] := 0.4  # is the initial iterate
pp(y) := d/dy(p(y))
# c and d must be nearly equal close to the root
x[i + 1] := x[i] - (p(x[i])/pp(x[i]))
c[i + 1] := x[i + 1] - x[i]
d[i + 1] := x[imax + 1] - x[i]
i = [0; 1; 2; 3; 4]
x[i] = [0.4; 0.133249; 0.26229; 0.238573; 0.238619]
p(x[i]) = [0.292636; -0.202106; 0.0504954; -9.88497e-5; 1.16436e-9]
c[i] = [0; -0.266751; 0.12904; -0.0237169; 4.64326e-5]
d[i] = [0; -0.161381; 0.10537; -0.0236705; 4.64321e-5]
# C should be constant
# and 1/C should be a bound
i := 1 .. imax  # check iterate correction
C[i] := d[i + 1]/d[i]^2
CI[i] := 1/C[i]
C[i] = [4.04587; -2.13194; 0.0828712; -0.253681]
CI[i] = [0.247166; -0.469056; 12.0669; -3.94196]
pp(x[i]) = [1.56622; 2.12909; 2.12888; 2.12893]
p(x[i])/pp(x[i]) = [-0.12904; 0.0237169; -4.64326e-5; 5.4692e-10]
# Compare the convergence in function and argument to the bisection method
# -------------------------------------------------------------------------------------------------------------------------------------------
