# -------------------------------------------------------------------------------------------------------------------------------------------
# EXAMPLE 6.12 : Roots of a function by Newton's method
# -------------------------------------------------------------------------------------------------------------------------------------------
# Consider for simplicity a function defined by
f(y) := sin(y)/y - cos(y)  # with range of argument
x := -4.8, -4.6 .. 4.8
# [plot: f(x) vs x]
# Newton's Method
imax := 3
i := 0 .. imax  # is the iteration range
# Define the derivative
x[0] := 3.5  # is the initial iterate
pp(y) := d/dy(f(y))
# c and d must be nearly equal close to the root
x[i + 1] := x[i] - (f(x[i])/pp(x[i]))
c[i + 1] := x[i + 1] - x[i]
d[i + 1] := x[imax + 1] - x[i]
i = [0; 1; 2; 3]
x[i] = [3.5; 4.91805; 4.46845; 4.49341]
f(x[i]) = [0.836233; -0.40326; 0.0243633; -4.55613e-6]
c[i] = [0; 1.41805; -0.449601; 0.0249663]
d[i] = [0; 0.993409; -0.424639; 0.0249616]
# C should be constant
# and 1/C should be a bound
i := 1 .. imax  # check iterate correction
C[i] := d[i + 1]/d[i]^2
CI[i] := 1/C[i]
C[i] = [-0.430292; 0.138431; -0.00749112]
CI[i] = [-2.324; 7.22381; -133.491]
pp(x[i]) = [-0.896931; -0.975846; -0.97612]
f(x[i])/pp(x[i]) = [0.449601; -0.0249663; 4.6676e-6]
# Note that Newton's method works well if the initial iterate is chosen well and not close to extrema of the function where the derivative can approach a zero value.
# Compare the convergence in function and argument to the bisection method
# -------------------------------------------------------------------------------------------------------------------------------------------
