# -------------------------------------------------------------------------------------------------------------------------------------------
# EXAMPLE 6.13 : Roots of a function by Newton's method with a starting value close to the extremum
# -------------------------------------------------------------------------------------------------------------------------------------------
# Consider for simplicity a function defined by
f(y) := sin(y)/y - cos(y)  # with range of argument
x := -4.8, -4.6 .. 4.8
# [plot: f(x) vs x]
# Newton's Method
imax := 3
i := 0 .. imax  # is the iteration range
# Define the derivative
x[0] := 3.0  # is a different initial iterate close to the extremum
pp(y) := d/dy(f(y))
# c and d must be nearly equal close to the root
x[i + 1] := x[i] - (f(x[i])/pp(x[i]))
c[i + 1] := x[i + 1] - x[i]
d[i + 1] := x[imax + 1] - x[i]
i = [0; 1; 2; 3]
x[i] = [3; 8.06964; 7.71143; 7.72525]
f(x[i]) = [1.03703; 0.33504; -0.0137083; 8.43875e-7]
c[i] = [0; 5.06964; -0.35821; 0.013824]
d[i] = [0; 4.72525; -0.344386; 0.0138231]
# C should be constant
# and 1/C should be a bound
i := 1 .. imax  # check iterate correction
C[i] := d[i + 1]/d[i]^2
CI[i] := 1/C[i]
C[i] = [-0.015424; 0.116551; -0.00445321]
CI[i] = [-64.8341; 8.57996; -224.557]
pp(x[i]) = [0.935318; 0.991634; 0.991726]
f(x[i])/pp(x[i]) = [0.35821; -0.013824; 8.50916e-7]
# Note that Newton's method missed the root found in the previous example because the  initial iterate is chosen close to extrema of the function where the derivative can approach a small value.
# Compare the convergence in function and argument to the previous example
# -------------------------------------------------------------------------------------------------------------------------------------------
