# -------------------------------------------------------------------------------------------------------------------------------------------
# EXAMPLE 6.14 : Roots of a function by the secant method: first root
# -------------------------------------------------------------------------------------------------------------------------------------------
# Consider for simplicity a
# Legendre polynomial function with coefficients
j := 0 .. 6
α[j] := 0
α[0] := -5
α[2] := 105
α[4] := -315
α[6] := 231
α[j] := α[j]/16
# defined by
p(x) := sum(α[j]*x^j, j)
# with range of argument
x := -1, -.98 .. 1
# [plot: p(x) vs x]
# Note that the Secant method works well if the initial iterate is chosen well and not close to extrema of the function where the derivative can approach a zero value.
imax := 5
i := 1 .. imax  # is the iteration range  # Note that imax  must be one greater than in the Newton method
x[0] := 1.0  # is the initial iterate
x[1] := x[0]*0.95  # is the next iterate
x[i + 1] := x[i] - p(x[i])*((x[i] - x[i - 1])/(p(x[i]) - p(x[i - 1])))
d[1] := x[imax + 1] - x[0]
c[i + 1] := x[i + 1] - x[i]
d[i + 1] := x[imax + 1] - x[i]
i = [1; 2; 3; 4; 5]
x[i] = [0.95; 0.938465; 0.933145; 0.932498; 0.93247]
p(x[i]) = [0.187454; 0.0591699; 0.00641625; 0.000265151; 1.27457e-6]
c[i] = [0; -0.0115349; -0.0053204; -0.000647103; -2.78942e-5]
d[i] = [-0.0675305; -0.0175305; -0.00599554; -0.000675132; -2.8029e-5]
# C should be constant
# and 1/C should be a bound
i := 1 .. imax  # check iterate correction
C[i] := d[i + 1]/|d[i]|^1.62
CI[i] := 1/C[i]
C[i] = [-1.3804; -4.19645; -2.68724; -3.83705; -3.19414]
CI[i] = [-0.724429; -0.238297; -0.372128; -0.260617; -0.313073]
# Compare the convergence in function and argument to the Newton method
# -------------------------------------------------------------------------------------------------------------------------------------------
