# -------------------------------------------------------------------------------------------------------------------------------------------
# EXAMPLE 6.15 : Roots of a function by the secant method: second root
# -------------------------------------------------------------------------------------------------------------------------------------------
# Consider for simplicity a
# Legendre polynomial function with coefficients
j := 0 .. 6
α[j] := 0
α[0] := -5
α[2] := 105
α[4] := -315
α[6] := 231
α[j] := α[j]/16
# defined by
p(x) := sum(α[j]*x^j, j)
# with range of argument
x := -1, -.98 .. 1
# [plot: p(x) vs x]
# Note that the Secant method works well if the initial iterate is chosen well and not close to extrema of the function where the derivative can approach a zero value.
imax := 5
i := 1 .. imax  # is the iteration range  # Note that imax  must be one greater than in the Newton method
x[0] := 0.78  # is the initial iterate
x[1] := x[0]*0.95  # is the next iterate
x[i + 1] := x[i] - p(x[i])*((x[i] - x[i - 1])/(p(x[i]) - p(x[i - 1])))
d[1] := x[imax + 1] - x[0]
c[i + 1] := x[i + 1] - x[i]
d[i + 1] := x[imax + 1] - x[i]
i = [1; 2; 3; 4; 5]
x[i] = [0.741; 0.642812; 0.660587; 0.661225; 0.661209]
p(x[i]) = [-0.254721; 0.0563066; 0.00195146; -5.00385e-5; 3.67939e-8]
c[i] = [0; -0.0981883; 0.0177754; 0.000638175; -1.59547e-5]
d[i] = [-0.118791; -0.0797906; 0.0183977; 0.000622232; -1.5943e-5]
# C should be constant
# and 1/C should be a bound
i := 1 .. imax  # check iterate correction
C[i] := d[i + 1]/|d[i]|^1.62
CI[i] := 1/C[i]
C[i] = [-2.51655; 1.10561; 0.402751; -2.49095; 0.693233]
CI[i] = [-0.39737; 0.90448; 2.48292; -0.401453; 1.44252]
# Compare the convergence in function and argument to the Newton method
# -------------------------------------------------------------------------------------------------------------------------------------------
