# -------------------------------------------------------------------------------------------------------------------------------------------
# EXAMPLE 6.16 : Roots of a function by the secant method: third root
# -------------------------------------------------------------------------------------------------------------------------------------------
# Consider for simplicity a
# Legendre polynomial function with coefficients
j := 0 .. 6
α[j] := 0
α[0] := -5
α[2] := 105
α[4] := -315
α[6] := 231
α[j] := α[j]/16
# defined by
p(x) := sum(α[j]*x^j, j)
# with range of argument
x := -1, -.98 .. 1
# [plot: p(x) vs x]
# Note that the Secant method works well if the initial iterate is chosen well and not close to extrema of the function where the derivative can approach a zero value.
imax := 5
i := 1 .. imax  # is the iteration range  # Note that imax  must be one greater than in the Newton method
x[0] := 0.4  # is the initial iterate
x[1] := x[0]*0.95  # is the next iterate
x[i + 1] := x[i] - p(x[i])*((x[i] - x[i - 1])/(p(x[i]) - p(x[i - 1])))
d[1] := x[imax + 1] - x[0]
c[i + 1] := x[i + 1] - x[i]
d[i + 1] := x[imax + 1] - x[i]
i = [1; 2; 3; 4; 5]
x[i] = [0.38; 0.161617; 0.241381; 0.238451; 0.238619]
p(x[i]) = [0.268084; -0.154262; 0.00588425; -0.000358973; -2.32771e-7]
c[i] = [0; -0.218383; 0.0797643; -0.00293078; 0.000168514]
d[i] = [-0.161381; -0.141381; 0.0770021; -0.00276216; 0.000168624]
# C should be constant
# and 1/C should be a bound
i := 1 .. imax  # check iterate correction
C[i] := d[i + 1]/|d[i]|^1.62
CI[i] := 1/C[i]
C[i] = [-2.71438; 1.83177; -0.175839; 2.35557; 0.141637]
CI[i] = [-0.368408; 0.545921; -5.68704; 0.424525; 7.0603]
# Compare the convergence in function and argument to the Newton method
# -------------------------------------------------------------------------------------------------------------------------------------------
