# -------------------------------------------------------------------------------------------------------------------------------------------
# EXAMPLE 6.17 : Roots of a function by the secant method
# -------------------------------------------------------------------------------------------------------------------------------------------
# Consider for simplicity a function defined by
f(y) := sin(y)/y - cos(y)  # with range of argument
x := -4.8, -4.6 .. 4.8
# [plot: f(x) vs x]
# Note that the Secant method works well if the initial iterate is chosen well and not close to extrema of the function where the derivative can approach a zero value.
imax := 5
i := 1 .. imax  # is the iteration range  # Note that imax  must be one greater than in the Newton method
x[0] := 3.5  # is the initial iterate
x[1] := x[0]*0.95  # is the next iterate
x[i + 1] := x[i] - f(x[i])*((x[i] - x[i - 1])/(f(x[i]) - f(x[i - 1])))
d[1] := x[imax + 1] - x[0]
c[i + 1] := x[i + 1] - x[i]
d[i + 1] := x[imax + 1] - x[i]
i = [1; 2; 3; 4; 5]
x[i] = [3.325; 5.08818; 4.43235; 4.49646; 4.49341]
f(x[i]) = [0.928377; -0.549828; 0.0595644; -0.00297454; 1.5801e-6]
c[i] = [0; 1.76318; -0.655826; 0.0641031; -0.00304894]
d[i] = [0.993409; 1.16841; -0.594771; 0.0610558; -0.00304732]
# C should be constant
# and 1/C should be a bound
i := 1 .. imax  # check iterate correction
C[i] := d[i + 1]/|d[i]|^1.62
CI[i] := 1/C[i]
C[i] = [1.18099; -0.462217; 0.141671; -0.282514; 0.0192857]
CI[i] = [0.846745; -2.16349; 7.05861; -3.53965; 51.8518]
# Compare the convergence in function and argument to the Newton method
# -------------------------------------------------------------------------------------------------------------------------------------------
