# -------------------------------------------------------------------------------------------------------------------------------------------
# EXAMPLE 6.18 : Roots of a function by Newton's method for root of multiplicity 1
# -------------------------------------------------------------------------------------------------------------------------------------------
# Consider for simplicity a polynomial defined by
α0 := -1
α1 := 1
p(y) := (α0 + α1*y)^1  # with range of argument
x := -2, -1.9 .. 2
# [plot: p(x) vs x]
# Newton's Method
imax := 2
i := 0 .. imax  # is the iteration range
# Define the derivative
x[0] := 0  # is the initial iterate
pp(y) := d/dy(p(y))
# c and d must be nearly equal close to the root
x[i + 1] := x[i] - (p(x[i])/pp(x[i]))
c[i + 1] := x[i + 1] - x[i]
d[i + 1] := x[imax + 1] - x[i]
i = [0; 1; 2]
x[i] = [0; 1; 1]
p(x[i]) = [-1; 0; 0]
c[i] = [0; 1; 0]
d[i] = [0; 1; 0]
# C should be constant
# and 1/C should be a bound
i := 1 .. imax  # check iterate correction
C[i] := d[i + 1]/d[i]^2
C[i] = [8.88178e-15; 0]
pp(x[i]) = [1; 1]
p(x[i])/pp(x[i]) = [-8.88178e-15; 0]
# Note singularity for CI: division by zero
C = [0; 8.88178e-15; 0]
# -------------------------------------------------------------------------------------------------------------------------------------------
