# -------------------------------------------------------------------------------------------------------------------------------------------
# EXAMPLE 6.19 : Roots of a function by Newton's method for root of multiplicity 2
# -------------------------------------------------------------------------------------------------------------------------------------------
# Consider for simplicity a polynomial defined by
α0 := -1
α1 := 1
p(y) := (α0 + α1*y)^2  # with range of argument
x := -2, -1.9 .. 2
# [plot: p(x) vs x]
# Newton's Method
imax := 6
i := 0 .. imax  # is the iteration range
# Define the derivative
x[0] := 0  # is the initial iterate
pp(y) := d/dy(p(y))
# c and d must be nearly equal close to the root
x[i + 1] := x[i] - (p(x[i])/pp(x[i]))
c[i + 1] := x[i + 1] - x[i]
d[i + 1] := x[imax + 1] - x[i]
i = [0; 1; 2; 3; 4; 5; 6]
x[i] = [0; 0.5; 0.75; 0.875; 0.9375; 0.96875; 0.984375]
p(x[i]) = [1; 0.25; 0.0625; 0.015625; 0.00390625; 0.000976563; 0.000244141]
c[i] = [0; 0.5; 0.25; 0.125; 0.0625; 0.03125; 0.015625]
d[i] = [0; 0.992188; 0.492188; 0.242188; 0.117188; 0.0546875; 0.0234375]
# C should be constant
# and 1/C should be a bound
i := 1 .. imax  # check iterate correction
C[i] := d[i + 1]/d[i]^2
CI[i] := 1/C[i]
C[i] = [0.499969; 0.999748; 1.99792; 3.98222; 7.83673; 14.2222]
CI[i] = [2.00012; 1.00025; 0.500521; 0.251116; 0.127604; 0.0703125]
pp(x[i]) = [-1; -0.5; -0.25; -0.125; -0.0625; -0.03125]
p(x[i])/pp(x[i]) = [-0.25; -0.125; -0.0625; -0.03125; -0.015625; -0.0078125]
# -------------------------------------------------------------------------------------------------------------------------------------------
