# ----------------------------------------------------------------------------------------------------------------------------------------------
# EXAMPLE  6.2 : Evaluation of Chebyshev polynomials by recurrence and a plot on [-1,+1]
# ----------------------------------------------------------------------------------------------------------------------------------------------
# Chebyshev polynomial largest order
n := 2
# range
k := 2 .. n
# for argument range
xmin := -1
xmax := 1
# select the number of argument values
N := 50
i := 0 .. N
# set up a grid in argument values for Chebyshev polynomial plot
x[i] := xmin + (i - 1)*(xmax - xmin)/(N - 1)
# initial values for polynomial | recurrence at each grid point in argument
T[i, 0] := 1
T[i, 1] := x[i]
T[:, k] := vectorize(2*x*T[:, k - 1] - T[:, k - 2])
# [plot: T[i, 1], T[i, 2] vs x[i]]
# confirm the root by evaluating the Chebyshev polynomial of order 2 at the root
root := 1/sqrt(2)
k := 2
T0 := 1
T1 := root
T2 := 2*root*T1 - T0
# the value is zero
T2 = -2.22045e-16
# ----------------------------------------------------------------------------------------------------------------------------------------------
