# -------------------------------------------------------------------------------------------------------------------------------------------
# EXAMPLE 6.20 : Roots of a function by Newton's method for root of multiplicity 3
# -------------------------------------------------------------------------------------------------------------------------------------------
# Consider for simplicity a polynomial defined by
α0 := -1
α1 := 1
p(y) := (α0 + α1*y)^3  # with range of argument
x := -2, -1.9 .. 2
# [plot: p(x) vs x]
# Newton's Method
imax := 6
i := 0 .. imax  # is the iteration range
# Define the derivative
x[0] := 0  # is the initial iterate
pp(y) := d/dy(p(y))
# c and d must be nearly equal close to the root
x[i + 1] := x[i] - (p(x[i])/pp(x[i]))
c[i + 1] := x[i + 1] - x[i]
d[i + 1] := x[imax + 1] - x[i]
i = [0; 1; 2; 3; 4; 5; 6]
x[i] = [0; 0.333333; 0.555556; 0.703704; 0.802469; 0.868313; 0.912209]
p(x[i]) = [-1; -0.296296; -0.0877915; -0.0260123; -0.00770735; -0.00228366; -0.000676639]
c[i] = [0; 0.333333; 0.222222; 0.148148; 0.0987654; 0.0658436; 0.0438957]
d[i] = [0; 0.941472; 0.608139; 0.385917; 0.237769; 0.139003; 0.0731596]
# C should be constant
# and 1/C should be a bound
i := 1 .. imax  # check iterate correction
C[i] := d[i + 1]/d[i]^2
CI[i] := 1/C[i]
C[i] = [0.6861; 1.04349; 1.59649; 2.45876; 3.78636; 5.4675]
CI[i] = [1.45751; 0.958323; 0.626373; 0.40671; 0.264106; 0.182899]
pp(x[i]) = [1.33333; 0.592593; 0.263374; 0.117055; 0.0520246; 0.023122]
p(x[i])/pp(x[i]) = [-0.222222; -0.148148; -0.0987654; -0.0658436; -0.0438957; -0.0292638]
# note that as the multiplicity increases above 1 the convergence slows and the estimate of the root is poorer
# -------------------------------------------------------------------------------------------------------------------------------------------
