# -------------------------------------------------------------------------------------------------------------------------------------------
# EXAMPLE 6.21 : Roots of the spherical Bessel of order 0 by Newton's method
# -------------------------------------------------------------------------------------------------------------------------------------------
# The spherical Bessel function of order 0 is defined by
p(x) := sin(x)/x
# with range of argument
x := 0, 0.1 .. 20
# [plot: p(x) vs x]
# Newton's Method
imax := 3
i := 0 .. imax  # is the iteration range
# Define the derivative
x[0] := 2  # is the initial iterate
pp(y) := d/dy(p(y))
# c and d must be nearly equal close to the root
x[i + 1] := x[i] - (p(x[i])/pp(x[i]))
c[i + 1] := x[i + 1] - x[i]
d[i + 1] := x[imax + 1] - x[i]
i = [0; 1; 2; 3]
x[i] = [2; 3.04421; 3.13886; 3.14159]
p(x[i]) = [0.454649; 0.0319374; 0.000869194; 7.52039e-7]
c[i] = [0; 1.04421; 0.0946498; 0.00272592]
d[i] = [0; 1.14159; 0.0973781; 0.00272829]
π = 3.14159  # <-- note that the first root is π
# subsequent roots are multiples of π
p(2*x[3]) = -7.52039e-7
p(3*x[3]) = 7.52039e-7
p(4*x[3]) = -7.52039e-7
p(5*x[3]) = 7.52039e-7
# -------------------------------------------------------------------------------------------------------------------------------------------
