# -------------------------------------------------------------------------------------------------------------------------------------------
# EXAMPLE 6.24 : Roots of the spherical Bessel of order 1 by the bisection method: third root
# -------------------------------------------------------------------------------------------------------------------------------------------
# The spherical Bessel function of order 1 is defined by | with range of argument
p(x) := 1/x*(sin(x)/x - cos(x))
x := 0, 0.1 .. 20
# the roots of the spherical Bessel function interlace so use the roots of the zero order Bessel function as bounds on those for the order one Bessel function and apply bisection to find the roots
# [plot: p(x) vs x]
# use the conditional branching operator: if (CONDITION, x, y), return x if CONDITION is true, return y otherwise
# Apply Bisection
# For the interval
a[0] := 3*π
b[0] := 4*π
x[:, 0] := [a[0]; b[0]]
# using case 3 with the assumption f(a) < .  and  f(b) >
# number of iterates
imax := 9
i := 0 .. imax
# define a function to move the end points at each iterate
III(x, p) := if((p(0.5*(x[0] + x[1]))*p(x[1])) < 0, [0.5*(x[0] + x[1]); x[1]], [x[0]; 0.5*(x[0] + x[1])])
# iterate | store all intervals and function values at midpoints
x[:, i + 1] := III(x[:, i], p)
[a[i]; b[i]] := [x[0, i]; x[1, i]]
d := b - a
c[i] := 0.5*(a[i] + b[i])
fc[i] := p(c[i])
# inspect the results
i := 1 .. imax
# function value at iterate
fc := vectorize(p(c))  # size of interval
d := b - a
i := 1 .. imax - 1
a = [9.42478; 9.42478; 10.2102; 10.6029; 10.7992; 10.8974; 10.8974; 10.8974; 10.8974; 10.9035]
b = [12.5664; 10.9956; 10.9956; 10.9956; 10.9956; 10.9956; 10.9465; 10.9219; 10.9097; 10.9097]
d = [3.14159; 1.5708; 0.785398; 0.392699; 0.19635; 0.0981748; 0.0490874; 0.0245437; 0.0122718; 0.00613592]
c = [10.9956; 10.2102; 10.6029; 10.7992; 10.8974; 10.9465; 10.9219; 10.9097; 10.9035; 10.9066]
fc = [-0.00827112; 0.0624722; 0.0278744; 0.00965536; 0.000614275; -0.00385291; -0.00162482; -0.000506567; 5.35395e-5; -0.000226594]
# Look at the last values of d=b-a compared to the function value. If b-a is small this does not also mean that the function value at c is small
# The convergence factor for bisection between iterates should not exceed 0.5.
e[i] := (|c[imax] - c[i]|/d[i - 1])
e[i] = [0.22168; 0.193359; 0.136719; 0.0234375; 0.203125; 0.15625; 0.0625; 0.125]
# The distance between the last iterate and the root is
c[imax] - c[imax - 1] = 0.00306796
# Define
n := 9
# and this must be less than or equal to
ε := d[0]/2^(n + 1)
ε = 0.00306796
# which gives the value
# To estimate n for this error use the integer part of
n := ((log(d[0]) - log(2*ε))/log(2))
n = 9
# -------------------------------------------------------------------------------------------------------------------------------------------
