# -------------------------------------------------------------------------------------------------------------------------------------------
# EXAMPLE 6.3 : Bounds on the roots of a function by graphical methods
# -------------------------------------------------------------------------------------------------------------------------------------------
# Consider for simplicity a
# mononomial function with coefficients
j := 0 .. 4
α[0] := 80
α[1] := 4
α[2] := -24
α[3] := -1
α[4] := 1
# defined by
p(x) := sum(α[j]*x^j, j)
# with range of argument
x := -6, -5.9 .. 6
# [plot: p(x) vs x]
# How many roots are there?
# There are four roots since this is the most to be expected for a quartic polynomial
# Which subintervals are they in? | root(1) is in  x e (-4.5 ,-3.75 )
# root(2) is in  x e (-2.25,-1.5 )
# Continued subdivision of the interval in x around each root will produce more refined bounds for the roots.
# root(3) is in  x e ( 1.5 , 2.25)
# root(4) is in  x e ( 4.5 , 5.25)
# -------------------------------------------------------------------------------------------------------------------------------------------
