# -------------------------------------------------------------------------------------------------------------------------------------------
# EXAMPLE 6.4 : Roots of a function by a simple bisection method: CASE I
# -------------------------------------------------------------------------------------------------------------------------------------------
# Consider for simplicity a
# Legendre polynomial function with coefficients
j := 0 .. 6
α[j] := 0
α[0] := -5
α[2] := 105
α[4] := -315
α[6] := 231
α[j] := α[j]/16
# defined by
p(x) := sum(α[j]*x^j, j)
# with range of argument
x := -1, -.95 .. 1
# Apply Bisection for iterate
# with the starting interval
a[0] := 0.8
b[0] := 1.0
# use the conditional branching operator: if (condition, x, y), return x condition is true, return y otherwise
i := 1
c[i] := 0.5*(a[i - 1] + b[i - 1])
b[i] := if((p(c[i])*p(a[i - 1])) < 0, c[i], b[i - 1])
a[i] := if((p(c[i])*p(b[i - 1])) < 0, c[i], a[i - 1])
i := 2
c[i] := 0.5*(a[i - 1] + b[i - 1])
b[i] := if((p(c[i])*p(a[i - 1])) < 0, c[i], b[i - 1])
a[i] := if((p(c[i])*p(b[i - 1])) < 0, c[i], a[i - 1])
i := 3
c[i] := 0.5*(a[i - 1] + b[i - 1])
b[i] := if((p(c[i])*p(a[i - 1])) < 0, c[i], b[i - 1])
a[i] := if((p(c[i])*p(b[i - 1])) < 0, c[i], a[i - 1])
i := 4
c[i] := 0.5*(a[i - 1] + b[i - 1])
b[i] := if((p(c[i])*p(a[i - 1])) < 0, c[i], b[i - 1])
a[i] := if((p(c[i])*p(b[i - 1])) < 0, c[i], a[i - 1])
i := 5
c[i] := 0.5*(a[i - 1] + b[i - 1])
b[i] := if((p(c[i])*p(a[i - 1])) < 0, c[i], b[i - 1])
a[i] := if((p(c[i])*p(b[i - 1])) < 0, c[i], a[i - 1])
i := 6
c[i] := 0.5*(a[i - 1] + b[i - 1])
b[i] := if((p(c[i])*p(a[i - 1])) < 0, c[i], b[i - 1])
a[i] := if((p(c[i])*p(b[i - 1])) < 0, c[i], a[i - 1])
i := 7
c[i] := 0.5*(a[i - 1] + b[i - 1])
b[i] := if((p(c[i])*p(a[i - 1])) < 0, c[i], b[i - 1])
a[i] := if((p(c[i])*p(b[i - 1])) < 0, c[i], a[i - 1])
i := 8
c[i] := 0.5*(a[i - 1] + b[i - 1])
b[i] := if((p(c[i])*p(a[i - 1])) < 0, c[i], b[i - 1])
a[i] := if((p(c[i])*p(b[i - 1])) < 0, c[i], a[i - 1])
i := 9
c[i] := 0.5*(a[i - 1] + b[i - 1])
b[i] := if((p(c[i])*p(a[i - 1])) < 0, c[i], b[i - 1])
a[i] := if((p(c[i])*p(b[i - 1])) < 0, c[i], a[i - 1])
i := 10
c[i] := 0.5*(a[i - 1] + b[i - 1])
b[i] := if((p(c[i])*p(a[i - 1])) < 0, c[i], b[i - 1])
a[i] := if((p(c[i])*p(b[i - 1])) < 0, c[i], a[i - 1])
# inspect the results
i := 1 .. 10
# function value at iterate
f := vectorize(p(c))
# size of interval
d := b - a
i := 1 .. 9
a[i] = [0.9; 0.9; 0.925; 0.925; 0.93125; 0.93125; 0.93125; 0.932031; 0.932422]
b[i] = [1; 0.95; 0.95; 0.9375; 0.9375; 0.934375; 0.932813; 0.932813; 0.932813]
d[i] = [0.1; 0.05; 0.025; 0.0125; 0.00625; 0.003125; 0.0015625; 0.00078125; 0.000390625]
c[i + 1] = [0.95; 0.925; 0.9375; 0.93125; 0.934375; 0.932813; 0.932031; 0.932422; 0.932617]
f[i + 1] = [0.187454; -0.0669425; 0.049309; -0.0114339; 0.0182686; 0.00325191; -0.00413213; -0.000450418; 0.00139817]
# Look at the last values of d=b-a compared to the function value. If b-a is small this does not also mean that the function value at c is small
# The convergence factor for bisection between iterates should not exceed 0.5.
e[i] := (|c[10] - c[i]|/d[i - 1])
e[i] = [0.163086; 0.173828; 0.152344; 0.195313; 0.109375; 0.28125; 0.0625; 0.375; 0.25]
# The distance between the last iterate and the root is
c[10] - c[9] = 0.000195312  # Define
n := 9
# and this must be less than or equal to
ε := d[0]/2^(n + 1)
ε = 0.000195312
# which gives the value
# To estimate n for this error use the integer part of
n := ((log(d[0]) - log(2*ε))/log(2))
n = 9
# -------------------------------------------------------------------------------------------------------------------------------------------
