# -------------------------------------------------------------------------------------------------------------------------------------------
# EXAMPLE 6.5 : Roots of a function by a simple bisection method CASE 3: first root
# -------------------------------------------------------------------------------------------------------------------------------------------
# Consider for simplicity a
# Legendre polynomial function with coefficients
j := 0 .. 6
α[j] := 0
α[0] := -5
α[2] := 105
α[4] := -315
α[6] := 231
α[j] := α[j]/16
# defined by
p(x) := sum(α[j]*x^j, j)
# with range of argument
x := -1, -.98 .. 1
# Apply Bisection for iterate
# with the starting interval
a[0] := 0.8
b[0] := 1.0
# use the conditional branching operator: if (CONDITION, x, y), return x if CONDITION is true, return y otherwise
# [plot: p(x) vs x]
# Apply Bisection
# For the interval
a[0] = 0.8
b[0] = 1
x[:, 0] := [a[0]; b[0]]
# using case 3 with the assumption f(a) < 0.  and  f(b) > 0
# number of iterates
imax := 10
i := 0 .. imax
# define a function to move the end points at each iterate
III(x, p) := if((p(0.5*(x[0] + x[1]))*p(x[1])) < 0, [0.5*(x[0] + x[1]); x[1]], [x[0]; 0.5*(x[0] + x[1])])
# iterate | store all intervals and function values at midpoints
x[:, i + 1] := III(x[:, i], p)
[a[i]; b[i]] := [x[0, i]; x[1, i]]
d := b - a
c[i] := 0.5*(a[i] + b[i])
fc[i] := p(c[i])
# inspect the results
i := 1 .. imax
# function value at iterate
fc := vectorize(p(c))
# size of interval
d := b - a
i := 1 .. imax - 1
a[i] = [0.9; 0.9; 0.925; 0.925; 0.93125; 0.93125; 0.93125; 0.932031; 0.932422]
b[i] = [1; 0.95; 0.95; 0.9375; 0.9375; 0.934375; 0.932813; 0.932813; 0.932813]
d[i] = [0.1; 0.05; 0.025; 0.0125; 0.00625; 0.003125; 0.0015625; 0.00078125; 0.000390625]
c[i] = [0.95; 0.925; 0.9375; 0.93125; 0.934375; 0.932813; 0.932031; 0.932422; 0.932617]
fc = [-0.241164; 0.187454; -0.0669425; 0.049309; -0.0114339; 0.0182686; 0.00325191; -0.00413213; -0.000450418; 0.00139817; 0.00047323]
# Look at the last values of d=b-a compared to the function value. If b-a is small this does not also mean that the function value at c is small
# The convergence factor for bisection between iterates should not exceed 0.5.
e[i] := (|c[imax] - c[i]|/d[i - 1])
e[i] = [0.0874023; 0.0751953; 0.0996094; 0.0507813; 0.148437; 0.046875; 0.15625; 0.0625; 0.125]
# The distance between the last iterate and the root is
c[imax] - c[imax - 1] = -9.76562e-5  # Define
n := 9
# and this must be less than or equal to
ε := d[0]/2^(n + 1)
ε = 0.000195312
# which gives the value
# To estimate n for this error use the integer part of
n := ((log(d[0]) - log(2*ε))/log(2))
n = 9
# -------------------------------------------------------------------------------------------------------------------------------------------
