# -------------------------------------------------------------------------------------------------------------------------------------------
# EXAMPLE 6.8 : Roots of a function by a simple bisection method
# -------------------------------------------------------------------------------------------------------------------------------------------
# Consider for simplicity a function defined by
f(y) := sin(y)/y - cos(y)  # with range of argument
x := -4.8, -4.6 .. 4.8
# Apply Bisection for iterate
# with the starting interval
a[0] := 5
b[0] := 2
# [plot: f(x) vs x]
# use the conditional branching operator: if (CONDITION, x, y), return x if CONDITION is true, return y otherwise
# Apply Bisection
# For the interval
a[0] = 5
b[0] = 2
x[:, 0] := [a[0]; b[0]]
# using case 3 with the assumption f(a) < 0.  and  f(b) > 0
# number of iterates
imax := 10
i := 0 .. imax
# define a function to move the end points at each iterate
III(x, p) := if((f(0.5*(x[0] + x[1]))*f(x[1])) < 0, [0.5*(x[0] + x[1]); x[1]], [x[0]; 0.5*(x[0] + x[1])])
# iterate | store all intervals and function values at midpoints
x[:, i + 1] := III(x[:, i], f)
[a[i]; b[i]] := [x[0, i]; x[1, i]]
d := b - a
c[i] := 0.5*(a[i] + b[i])
fc[i] := f(c[i])
# inspect the results
i := 1 .. 10
# function value at iterate
fc := vectorize(f(c))
# size of interval
d := b - a
i := 1 .. 9
a[i] = [5; 5; 4.625; 4.625; 4.53125; 4.53125; 4.50781; 4.49609; 4.49609]
b[i] = [3.5; 4.25; 4.25; 4.4375; 4.4375; 4.48438; 4.48438; 4.48438; 4.49023]
d[i] = [-1.5; -0.75; -0.375; -0.1875; -0.09375; -0.046875; -0.0234375; -0.0117188; -0.00585938]
c[i] = [4.25; 4.625; 4.4375; 4.53125; 4.48438; 4.50781; 4.49609; 4.49023; 4.49316]
fc = [0.836233; 0.235502; -0.128113; 0.0545487; -0.0369289; 0.0088186; -0.0140587; -0.00262019; 0.00309926; 0.000239535; -0.00119033]
# Look at the last values of d=b-a compared to the function value. If b-a is small this does not also mean that the function value at c is small
# The convergence factor for bisection between iterates should not exceed 0.5.
e[i] := (|c[imax] - c[i]|/d[i - 1])
e[i] = [-0.081543; -0.0869141; -0.0761719; -0.0976562; -0.0546875; -0.140625; -0.03125; -0.1875; -0.125]
# The distance between the last iterate and the root is
c[imax] - c[imax - 1] = 0.00146484
# Define
n := 9
# and this must be less than or equal to
ε := d[0]/2^(n + 1)
ε = -0.00292969
# which gives the value
# To estimate n for this error use the integer part of
n := ((log(d[0]) - log(2*ε))/log(2))
n = 9
# -------------------------------------------------------------------------------------------------------------------------------------------
