# -------------------------------------------------------------------------------------------------------------------------------------------
# EXAMPLE 6.9 : Roots of a function by Newton's method: first root
# -------------------------------------------------------------------------------------------------------------------------------------------
# Consider for simplicity a
# Legendre polynomial function with coefficients
j := 0 .. 6
α[j] := 0
α[0] := -5
α[2] := 105
α[4] := -315
α[6] := 231
α[j] := α[j]/16
# defined by
p(x) := sum(α[j]*x^j, j)
# with range of argument
x := -1, -.98 .. 1
# [plot: p(x) vs x]
# Newton's Method
# Note that Newton's method works well if the initial iterate is chosen well and not close to extrema of the function where the derivative can approach a zero value.
imax := 4
i := 0 .. imax  # is the iteration range
# Define the derivative
x[0] := 1.0  # is the initial iterate
pp(y) := d/dy(p(y))
# c and d must be nearly equal close to the root
x[i + 1] := x[i] - (p(x[i])/pp(x[i]))
c[i + 1] := x[i + 1] - x[i]
d[i + 1] := x[imax + 1] - x[i]
i = [0; 1; 2; 3; 4]
x[i] = [1; 0.952381; 0.934852; 0.932509; 0.93247]
p(x[i]) = [1; 0.216411; 0.0229171; 0.000375121; 1.06207e-7]
c[i] = [0; -0.047619; -0.0175292; -0.00234261; -3.96393e-5]
d[i] = [0; -0.0675305; -0.0199114; -0.00238226; -3.96505e-5]
# C should be constant
# and 1/C should be a bound
i := 1 .. imax  # check iterate correction
C[i] := d[i + 1]/d[i]^2
CI[i] := 1/C[i]
C[i] = [-4.36619; -6.00874; -6.98669; -7.14263]
CI[i] = [-0.229033; -0.166424; -0.143129; -0.140005]
pp(x[i]) = [12.3457; 9.78273; 9.46335; 9.45799]
p(x[i])/pp(x[i]) = [0.0175292; 0.00234261; 3.96393e-5; 1.12294e-8]
# Compare the convergence in function and argument to the bisection method
# -------------------------------------------------------------------------------------------------------------------------------------------
