# ----------------------------------------------------------------------------------------------------------------------------------------------
# EXAMPLE  7.1 : Compute the integral as a contained area by a statistical method, k=2
ORIGIN := 1
# ----------------------------------------------------------------------------------------------------------------------------------------------
# Function to be integrated is sin(x) for argument range [0, π ]
y(x) := sin(x)
xmin := 0
xmax := π
# set area of a box containing sine(x)
area := (xmax - xmin)*(sin(0.5*π) - 0)
# Monte-Carlo estimates of the 1-D integral for different sample sizes with increasing sample count 10**k, k = 2
# rnd generates a random number on each call for the argument in the 1-D area
# sum over all samples to form the integral value and an error estimate
k := 2
imax := 10^k
i := 1 .. imax
t[i] := rnd(1)
x[i] := π*t[i]
f[i] := sin(x[i])
sum[k] := sum(f[i], i)
err[k] := sum(f[i]^2, i)
integral[k] := area*sum[k]/imax
error_estimate[k] := area*sqrt((err[k]/imax - (sum[k]/imax)^2)/imax)
error_estimate[k] = 0.0930603
integral[k] = 2.1529
# integral of sine(x) is -cosine(x)
exact_value := -(cos(xmax) - cos(xmin))
exact_value = 2
# error of the estimate is
error := |exact_value - integral[k]|
error = 0.152898
# [plot: y(x[i]) vs x[i]]
# this method of estimating and integral is known as the Monte Carlo method (see Section 8.4)
# obviously to decrease the error by 10 the number of trials has to be increased by 100 and even so the gain in precision by one significant figure may not be worth the expense of this algorithm
# since the cost of an integration algorithm increases as as the number of integrand evaluations increases, the Monte Carlo method is not usually applied for low dimensional cases
# ----------------------------------------------------------------------------------------------------------------------------------------------
