# ----------------------------------------------------------------------------------------------------------------------------------------------
# EXAMPLE  7.10 : Compute Simpson's rule for the integral of tabular values at 9 points
ORIGIN := 1
# ----------------------------------------------------------------------------------------------------------------------------------------------
# Function to be integrated
y(x) := sin(x)
# for argument range
xmin := 0
xmax := π
# select the number of argument values
imax := 9
i := 1 .. imax
# tabulate argument and function values
x[i] := xmin + (i - 1)*(xmax - xmin)/(imax - 1)
f[i] := y(x[i])
i := 1 .. imax - 1
# set minimum and maximum values on each interval
# step size
h := x[2] - x[1]
h = 0.392699
# Simpson rule sum
s[1] := (f[1] + 2*(f[3] + f[5] + f[7]) + f[9])
s[2] := 4*(f[2] + f[4] + f[6] + f[8])
# integral of sine(x) is -cosine(x)
exact_value := -(cos(xmax) - cos(xmin))
exact_value = 2
S := h/3*(s[1] + s[2])
S = 2.00027
error_S := |exact_value - S|
error_S = 0.00026917
# [plot: y(x[i]) vs x[i]]
# ----------------------------------------------------------------------------------------------------------------------------------------------
