# ----------------------------------------------------------------------------------------------------------------------------------------------
# EXAMPLE  7.11 : Compute the Trapezoid and Simpson rule for the integral of the exponential function
# ----------------------------------------------------------------------------------------------------------------------------------------------
# Function to be integrated
y(x) := exp(-x^2)
# for argument range
xmin := 0
xmax := π
ORIGIN := 0
n := 4
# select the number of argument values
imax := 2*n + 1
i := 1 .. imax
# tabulate argument and function values
x[i] := xmin + (i - 1)*(xmax - xmin)/(imax - 1)
imax = 9
f[i] := y(x[i])
i := 2 .. imax - 1
# set minimum and maximum values on each interval
# step size
h := x[2] - x[1]
h = 0.392699
# Trapezoid rule sum
ST := h*(1/2*(f[1] + f[imax]) + sum(f[i], i))
j := 1 .. n
# Simpson rule sum
s[j] := f[2*j - 1] + 4*f[2*j] + f[2*j + 1]
SS := h/3*sum(s[j], j)
# integral of exp(-x^2)
exact_value := 0.8862190537
ST = 0.886215
error_ST := |exact_value - ST|
error_ST = 3.84245e-6
SS = 0.886218
error_SS := |exact_value - SS|
error_SS = 9.90505e-7
error_ST/error_SS = 3.87928
# Simpson's rule if four times more accurate than the Trapezoidal rule for 9 tabular points
# [plot: y(x[i]) vs x[i]]
# ----------------------------------------------------------------------------------------------------------------------------------------------
