# ----------------------------------------------------------------------------------------------------------------------------------------------
# EXAMPLE  7.12 : Compute the Trapezoid and Simpson rule for the integral the Runge function
# ----------------------------------------------------------------------------------------------------------------------------------------------
# Function to be integrated
# for argument range
xmin := 0
xmax := 4
y(x) := (1 + x^2)^-1
n := 4
ORIGIN := 0
# select the number of argument values
imax := 2*n + 1
i := 1 .. imax
# tabulate argument and function values
x[i] := xmin + (i - 1)*(xmax - xmin)/(imax - 1)
imax = 9
f[i] := y(x[i])
i := 2 .. imax - 1
# set minimum and maximum values on each interval
# step size
h := x[2] - x[1]
h = 0.5
# Trapezoid rule sum
ST := h*(1/2*(f[1] + f[imax]) + sum(f[i], i))
j := 1 .. n
# Simpson rule sum
s[j] := f[2*j - 1] + 4*f[2*j] + f[2*j + 1]
SS := h/3*sum(s[j], j)
# integral of (1+x^2)^-1
exact_value := 1.3258176622  # Simpson's rule is less accurate than the Trapezoidal rule for 9 tabular points
ST = 1.32525
error_ST := |exact_value - ST|
error_ST = 0.00056426
SS = 1.32387
error_SS := |exact_value - SS|
error_SS = 0.00195038
# ----------------------------------------------------------------------------------------------------------------------------------------------
