# ----------------------------------------------------------------------------------------------------------------------------------------------
# EXAMPLE  7.13 : Gauss-Legendre quadrature of order
n := 2  # for sin(x)
# ----------------------------------------------------------------------------------------------------------------------------------------------
# Function to be integrated
y(x) := sin(x)
# for argument range
xmin := 0
xmax := π
ORIGIN := 0
# select the number of argument values
imax := n
i := 1 .. imax
# map interval into [-1,+1]
A := 0.5*(xmax + xmin)
imax = 2
B := 0.5*(xmax - xmin)
t[1] := sqrt(1/3)
t[2] := -t[1]  # quadrature weights
w[1] := 1
w[2] := w[1]
# quadrature nodes
# set tabulate argument | set tabular function values | Gauss quadrature value
x := A + B*t
f[i] := y(x[i])
SG := B*sum(w[i]*f[i], i)
# integral of sine(x) is -cosine(x)
exact_value := -(cos(xmax) - cos(xmin))
exact_value = 2
SG = 1.93582
error_SG := |exact_value - SG|
error_SG = 0.0641804
# ----------------------------------------------------------------------------------------------------------------------------------------------
