# ----------------------------------------------------------------------------------------------------------------------------------------------
# EXAMPLE  7.14 : Recurrence for the Legendre polynomial and Gauss-Legendre quadrature
# ----------------------------------------------------------------------------------------------------------------------------------------------
# Polynomial order
km := 9
# quadrature order
n := 1/2*(km + 1)
k := 2 .. km
# Function to be integrated
f(x) := sin(x)
# for argument range
xmin := 0
xmax := π
ORIGIN := 0
# select the number of argument values
imax := n - 1
i := 0 .. imax
# map interval into [-1,+1]
A := 0.5*(xmax + xmin)
imax = 4
B := 0.5*(xmax - xmin)
# read in nodes (first column) and weights (second column)
XW := READPRN("gaus09.PRN")
XW = [0, 0.330239; 0.324253, 0.312347; 0.613371, 0.260611; 0.836031, 0.180648; 0.96816, 0.0812744]
# load node values
t[i] := XW[i, 0]
# recurrence for Legendre polynomials at each argument value
P[i, 0] := 1
P[i, 1] := t[i]
P[:, k] := vectorize(((2*k - 1)/k)*t*P[:, k - 1] - (k - 1)/k*P[:, k - 2])
i := 1 .. imax  # check nodes are zeros of the Legendre polynomial of order km
# check sum of weights
P[:, km] = [0; -3.05311e-16; -1.38778e-15; -1.66533e-15; -2.33147e-15]
W := XW[0, 1] + 2*sum(XW[i, 1], i)
W = 2
# compute Gauss quadrature
SG := B*sum(XW[i, 1]*(f(A - B*XW[i, 0]) + f(A + B*XW[i, 0])), i) + B*XW[0, 1]*f(A)
# integral of sine(x) is -cosine(x)
exact_value := -(cos(xmax) - cos(xmin))
exact_value = 2
SG = 2
error_SG := |exact_value - SG|
error_SG = 0
# ----------------------------------------------------------------------------------------------------------------------------------------------
