# ----------------------------------------------------------------------------------------------------------------------------------------------
# EXAMPLE  7.18 : Gauss-Legendre quadrature of order
n := 3  # for the Runge function
# ----------------------------------------------------------------------------------------------------------------------------------------------
# Function to be integrated
# for argument range
xmin := 0
xmax := 4
ORIGIN := 0
y(x) := (1 + x^2)^-1
# select the number of argument values
imax := n
i := 1 .. imax
# map interval into [-1,+1]
A := 0.5*(xmax + xmin)
imax = 3
B := 0.5*(xmax - xmin)
# quadrature nodes
t[1] := -sqrt(3/5)
t[2] := 0
t[3] := -t[1]
# quadrature weights
w[1] := 5/9
w[2] := 8/9
w[3] := w[1]
# set tabulate argument | set tabular function values | Gauss quadrature value
x := A + B*t
f[i] := y(x[i])
SG := B*sum(w[i]*f[i], i)
# integral of (1+x^2)^-1
exact_value := 1.3258176622
SG = 1.36072
error_SG := |exact_value - SG|
error_SG = 0.0348995
# ----------------------------------------------------------------------------------------------------------------------------------------------
