# ----------------------------------------------------------------------------------------------------------------------------------------------
# EXAMPLE  7.19 : Legendre series expansion and Gauss-Legendre quadrature
# ----------------------------------------------------------------------------------------------------------------------------------------------
# Apply Gauss-Legendre quadrature to evaluate the Legendre series coefficients in Eq.(2.51) and (2.52)
# Polynomial order
km := 16
# quadrature order
n := 20
k := 2 .. km
z := 0.5
# Function to be integrated
f(t) := exp(z*t)
# for argument range
xmin := -1
xmax := 1
ORIGIN := 0
# select the number of argument values
imax := n - 1
i := 0 .. imax
# map interval into [-1,+1]
A := 0.5*(xmax + xmin)
imax = 19
B := 0.5*(xmax - xmin)
# read in nodes (first column) and weights (second column)
XW := READPRN("gaus40.PRN")
# load node values
t[i] := XW[i, 0]
# recurrence for Legendre polynomials at each argument value
P[i, 0] := 1
P[i, 1] := t[i]
P[:, k] := vectorize(((2*k - 1)/k)*t*P[:, k - 1] - (k - 1)/k*P[:, k - 2])
i := 0 .. imax
# check sum of weights
W := sum(XW[i, 1], i)
W = 1
k := 0 .. km
# compute Gauss quadrature
g[k] := B*sum(XW[i, 1]*((f(A + B*XW[i, 0]) + (-1)^k*f(A - B*XW[i, 0]))*P[i, k]), i)
K := 0 .. km - 3
# compute the L2 error of the Legendre series for exp(z*x)
L2T[km - 2] := (km - 1 + 0.5)*g[km - 1]^2
L2T[km - K - 3] := (km - K - 2 + 0.5)*g[km - K - 2]^2 + L2T[km - K - 2]
L2T[K] := sqrt(L2T[K])
LOGL2T[K] := log(L2T[K])
k = [0; 1; 2; 3; 4; 5; 6; 7; 8; 9; 10; 11; 12; 13; 14; 15; 16]
g = [2.08438; 0.341741; 0.0339327; 0.00241421; 0.000133786; 6.07056e-6; 2.33184e-7; 7.76521e-9; 2.28212e-10; 6.00196e-12; 1.43066e-13; 0; 0; 0; 0; 0; 0]
L2T[K] = [0.421995; 0.0538429; 0.0045255; 0.000284159; 1.42491e-5; 5.94887e-7; 2.12763e-8; 6.65605e-10; 1.85051e-11; 4.63714e-13; 1.08345e-14; 0; 0; 0]
LOGL2T = [-0.374693; -1.26887; -2.34433; -3.54644; -4.84621; -6.22557; -7.6721; -9.17678; -10.7327; -12.3337; -13.9652; -15.0363; -15.1867; -15.1867]
# The log versus K plot bends down well before K approaches the maximum value and then falls steeply.
# [plot: LOGL2T[K] vs K]
# Compute the exponential index of convergence from Eq. (2.187)
I := 2, 4 .. km - 2
s[I] := ln(|g[I]|)
r[I] := ln(|s[I]|)/ln(I)
r[I] = [1.75846; 1.57846; 1.5214; 1.49085; 1.47093; 1.4447; 1.36226]
# The asymptotic index of convergence is evident even when K is not very large.
# Evaluate the Legendre series and compare to the exact result on a grid in argument
imax := 21
i := 1 .. imax
x[i] := xmin + (i - 1)*(xmax - xmin)/(imax - 1)
# exact value is
exact[i] := exp(z*x[i])
# generate Legendre polynomial values at the tabular points
k := 2 .. km
P[i, 0] := 1
P[i, 1] := x[i]
P[:, k] := vectorize(((2*k - 1)/k)*x*P[:, k - 1] - (k - 1)/k*P[:, k - 2])
# series value is
k := 0 .. km
series[i] := sum((k + 0.5)*g[k]*P[i, k], k)
error[i] := |exact[i] - series[i]|
# the solid line is the exact function value and the error at tabular values is scaled by 10^14
# [plot: exact[i], 10^14*error[i] vs x[i]]
# the tabulated values show agreement to ten significant digits (if not more)
x[i] = [-1; -0.9; -0.8; -0.7; -0.6; -0.5; -0.4; -0.3; -0.2; -0.1; 0; 0.1; 0.2; 0.3; 0.4; 0.5; 0.6; 0.7; 0.8; 0.9; 1]
exact = [0; 0.606531; 0.637628; 0.67032; 0.704688; 0.740818; 0.778801; 0.818731; 0.860708; 0.904837; 0.951229; 1; 1.05127; 1.10517; 1.16183; 1.2214; 1.28403; 1.34986; 1.41907; 1.49182; 1.56831; 1.64872]
series = [0; 0.606531; 0.637628; 0.67032; 0.704688; 0.740818; 0.778801; 0.818731; 0.860708; 0.904837; 0.951229; 1; 1.05127; 1.10517; 1.16183; 1.2214; 1.28403; 1.34986; 1.41907; 1.49182; 1.56831; 1.64872]
error = [0; 2.22045e-16; 3.33067e-15; 1.11022e-16; 2.22045e-16; 0; 6.66134e-16; 0; 0; 1.11022e-16; 1.11022e-16; 1.11022e-16; 2.22045e-16; 2.22045e-16; 6.66134e-16; 2.22045e-16; 1.55431e-15; 4.44089e-16; 2.22045e-16; 0; 7.10543e-15; 3.33067e-15]
# maximum error on the interval [-1,+1]
max(error) = 7.10543e-15
# ----------------------------------------------------------------------------------------------------------------------------------------------
