# ----------------------------------------------------------------------------------------------------------------------------------------------
# EXAMPLE  7.2 : Compute the integral as a contained area by a statistical method, k=4
ORIGIN := 1
# ----------------------------------------------------------------------------------------------------------------------------------------------
# Function to be integrated is sin(x) for argument range [0, π ]
y(x) := sin(x)
xmin := 0
xmax := π
# set area of a box containing sine(x)
area := (xmax - xmin)*(sin(0.5*π) - 0)
# Monte-Carlo estimates of the 1-D integral for different sample sizes with increasing sample count 10**k, k = 4
# rnd generates a random number on each call for the argument in the 1-D area
# sum over all samples to form the integral value and an error estimate
k := 4
imax := 10^k
i := 1 .. imax
t[i] := rnd(1)
x[i] := π*t[i]
f[i] := sin(x[i])
sum[k] := sum(f[i], i)
err[k] := sum(f[i]^2, i)
integral[k] := area*sum[k]/imax
error_estimate[k] := area*sqrt((err[k]/imax - (sum[k]/imax)^2)/imax)
error_estimate[k] = 0.00962836
integral[k] = 1.99195
# integral of sine(x) is -cosine(x)
exact_value := -(cos(xmax) - cos(xmin))
exact_value = 2
# error of the estimate is
error := |exact_value - integral[k]|
error = 0.0080512
# [plot: y(x[i]) vs x[i]]
# this method of estimating and integral is known as the Monte Carlo method
# to decrease the error by 10^3 the number of trials has to be increased to 10000 for a gain in precision to three significant figures
# since the cost of an integration algorithm increased as as the number of integrand evaluations increases the Monte Carlo method is not usually applied for low dimensional cases
# ----------------------------------------------------------------------------------------------------------------------------------------------
