# ----------------------------------------------------------------------------------------------------------------------------------------------
# EXAMPLE  7.20 : Chebyshev series expansion and Gauss-Chebyshev quadrature
# ----------------------------------------------------------------------------------------------------------------------------------------------
# Apply Gauss-Chebyshev quadrature to evaluate the Chebyshev series coefficients in Eq.(2.53) and (2.54)
# Polynomial order
km := 16
# quadrature order
n := 40
k := 2 .. km
z := 0.5
# Function to be integrated
f(t) := exp(z*t)
# for argument range
xmin := -1
xmax := 1
ORIGIN := 0
# select the number of argument values
imax := n
i := 0 .. imax
# map interval into [-1,+1]
A := 0.5*(xmax + xmin)
B := 0.5*(xmax - xmin)
# node values
t[i] := cos(i*π/n)
# weights are all equal
w := π/n*2/π
x := A + B*t
# recurrence for Chebyshev polynomials at each argument value
T[i, 0] := 1
T[i, 1] := t[i]
T[:, k] := vectorize(2*t*T[:, k - 1] - T[:, k - 2])
k := 0 .. km - 1
# compute Gauss quadrature
T[0, k] := 0.5*T[0, k]
T[n, k] := 0.5*T[n, k]
h[k] := w*sum(f(x[i])*T[i, k], i)
K := 0 .. km - 3
# compute the L2 error of the Legendre series for exp(z*x)
L2T[km - 2] := h[km - 1]^2
L2T[km - K - 3] := h[km - K - 2]^2 + L2T[km - K - 2]
L2T[K] := sqrt(0.5*π*L2T[K])
LOGL2T[K] := log(L2T[K])
k = [0; 1; 2; 3; 4; 5; 6; 7; 8; 9; 10; 11; 12; 13; 14; 15]
h = [2.12697; 0.515789; 0.0638123; 0.00529022; 0.000329611; 1.64463e-5; 6.84247e-7; 2.44102e-8; 7.62157e-10; 2.11566e-11; 5.28716e-13; 0; 0; 0; 0; 0]
L2T[K] = [0.651408; 0.0802523; 0.0066432; 0.000413621; 2.06303e-5; 8.58123e-7; 3.06085e-8; 9.5559e-10; 2.65241e-11; 6.62831e-13; 1.55976e-14; 0; 0; 0]
LOGL2T = [-0.186147; -1.09554; -2.17762; -3.3834; -4.68549; -6.06645; -7.51416; -9.01973; -10.5764; -12.1786; -13.8069; -14.9655; -15.0302; -15.1273]
# The log versus K plot bends down well before K approaches the maximum value and then falls steeply.
# [plot: LOGL2T[K] vs K]
# Compute the exponential index of convergence from Eq. (2.187)
I := 2, 4 .. km - 2
s[I] := ln(|h[I]|)
r[I] := ln(|h[I]|)/ln(I)
r[I] = [-3.97002; -5.78347; -7.92235; -10.0964; -12.2768; -14.2312; -13.7929]
# The asymptotic index of convergence is evident even when K is not very large.
# Evaluate the Legendre series and compare to the exact result on a grid in argument
imax := 21
i := 1 .. imax
x[i] := xmin + (i - 1)*(xmax - xmin)/(imax - 1)
# exact value is
exact[i] := exp(z*x[i])
# generate Legendre polynomial values at the tabular points
k := 2 .. km
T[i, 0] := 1
T[i, 1] := x[i]
T[:, k] := vectorize(2*x*T[:, k - 1] - T[:, k - 2])
# series value is
k := 1 .. km - 1
series[i] := 0.5*h[0] + sum(h[k]*T[i, k], k)
error[i] := |exact[i] - series[i]|
# the solid line is the exact function value and the error at tabular values is scaled by 10^14
# [plot: exact[i], 10^14*error[i] vs x[i]]
# the tabulated values show agreement to ten significant digits (if not more)
x[i] = [-1; -0.9; -0.8; -0.7; -0.6; -0.5; -0.4; -0.3; -0.2; -0.1; 0; 0.1; 0.2; 0.3; 0.4; 0.5; 0.6; 0.7; 0.8; 0.9; 1]
exact = [0; 0.606531; 0.637628; 0.67032; 0.704688; 0.740818; 0.778801; 0.818731; 0.860708; 0.904837; 0.951229; 1; 1.05127; 1.10517; 1.16183; 1.2214; 1.28403; 1.34986; 1.41907; 1.49182; 1.56831; 1.64872]
series = [0; 0.606531; 0.637628; 0.67032; 0.704688; 0.740818; 0.778801; 0.818731; 0.860708; 0.904837; 0.951229; 1; 1.05127; 1.10517; 1.16183; 1.2214; 1.28403; 1.34986; 1.41907; 1.49182; 1.56831; 1.64872]
error = [0; 1.11022e-15; 0; 6.66134e-16; 1.11022e-16; 3.33067e-16; 7.77156e-16; 3.33067e-16; 0; 3.33067e-16; 5.55112e-16; 0; 2.22045e-16; 2.22045e-16; 6.66134e-16; 2.22045e-16; 0; 4.44089e-16; 2.22045e-16; 0; 1.55431e-15; 2.22045e-15]
# maximum error on the interval [-1,+1]
max(error) = 2.22045e-15
# compare the error plot and the maximum error to the Legendre series case
# ----------------------------------------------------------------------------------------------------------------------------------------------
