# ----------------------------------------------------------------------------------------------------------------------------------------------
# EXAMPLE  7.3 : Compute upper and lower sums for the integral of tabular values
ORIGIN := 1
# ----------------------------------------------------------------------------------------------------------------------------------------------
# Function to be integrated
y(x) := sin(x)
# for argument range
xmin := 0
xmax := π
# select the number of argument values
imax := 12
i := 1 .. imax
# tabulate argument and function values
x[i] := xmin + (i - 1)*(xmax - xmin)/(imax - 1)
f[i] := y(x[i])
i := 1 .. imax - 1
# set minimum and maximum values on each interval
L[i] := if(f[i] < f[i + 1], f[i], f[i + 1])
U[i] := if(f[i] > f[i + 1], f[i], f[i + 1])
i = [1; 2; 3; 4; 5; 6; 7; 8; 9; 10; 11]
x = [0; 0.285599; 0.571199; 0.856798; 1.1424; 1.428; 1.7136; 1.9992; 2.28479; 2.57039; 2.85599; 3.14159]
f = [0; 0.281733; 0.540641; 0.75575; 0.909632; 0.989821; 0.989821; 0.909632; 0.75575; 0.540641; 0.281733; 0]
L = [0; 0.281733; 0.540641; 0.75575; 0.909632; 0.989821; 0.909632; 0.75575; 0.540641; 0.281733; 0]
U = [0.281733; 0.540641; 0.75575; 0.909632; 0.989821; 0.989821; 0.989821; 0.909632; 0.75575; 0.540641; 0.281733]
i := 1 .. imax - 1
# lower sum
SL := sum(L[i]*(x[i + 1] - x[i]), i)
# upper sum
SU := sum(U[i]*(x[i + 1] - x[i]), i)
# integral of sine(x) is -cosine(x)
exact_value := -(cos(xmax) - cos(xmin))
exact_value = 2
SL = 1.70369
error_L := |exact_value - SL|
SU = 2.26908
error_U := |exact_value - SU|
error_L = 0.296305
error_U = 0.269079
|SL - SU| = 0.565385
# [plot: y(x[i]) vs x[i]]
# ----------------------------------------------------------------------------------------------------------------------------------------------
