# ----------------------------------------------------------------------------------------------------------------------------------------------
# EXAMPLE  7.4 : Compute upper and lower sums for the integral of tabular values
ORIGIN := 1
# ----------------------------------------------------------------------------------------------------------------------------------------------
# Function to be integrated
y(x) := sin(x)
# for argument range
xmin := 0
xmax := π
# select the number of argument values
imax := 120
i := 1 .. imax
# tabulate argument and function values
x[i] := xmin + (i - 1)*(xmax - xmin)/(imax - 1)
f[i] := y(x[i])
i := 1 .. imax - 1
# set minimum and maximum values on each interval
L[i] := if(f[i] < f[i + 1], f[i], f[i + 1])
U[i] := if(f[i] > f[i + 1], f[i], f[i + 1])
i := 1 .. imax - 1
# lower sum
SL := sum(L[i]*(x[i + 1] - x[i]), i)
# upper sum
SU := sum(U[i]*(x[i + 1] - x[i]), i)
# integral of sine(x) is -cosine(x)
exact_value := -(cos(xmax) - cos(xmin))
exact_value = 2
SL = 1.97349
error_L := |exact_value - SL|
SU = 2.02628
error_U := |exact_value - SU|
error_L = 0.0265138
|SL - SU| = 0.0527953
error_U = 0.0262815
# [plot: y(x[i]) vs x[i]]
# ----------------------------------------------------------------------------------------------------------------------------------------------
