# ----------------------------------------------------------------------------------------------------------------------------------------------
# EXAMPLE  7.5 : Compute the Trapezoid rule for the integral of tabular values
ORIGIN := 1
# ----------------------------------------------------------------------------------------------------------------------------------------------
# Function to be integrated
y(x) := sin(x)
# for argument range
xmin := 0
xmax := π
# select the number of argument values
imax := 12
i := 1 .. imax
# tabulate argument and function values
x[i] := xmin + (i - 1)*(xmax - xmin)/(imax - 1)
f[i] := y(x[i])
i := 1 .. imax - 1
# set minimum and maximum values on each interval
t[i] := 0.5*(f[i] + f[i + 1])
i := 1 .. imax - 1
# Trapezoid sum
ST := sum(t[i]*(x[i + 1] - x[i]), i)
# integral of sine(x) is -cosine(x)
exact_value := -(cos(xmax) - cos(xmin))
exact_value = 2
ST = 1.98639
error_T := |exact_value - ST|
error_T = 0.013613
# [plot: y(x[i]) vs x[i]]
# ----------------------------------------------------------------------------------------------------------------------------------------------
