# ----------------------------------------------------------------------------------------------------------------------------------------------
# EXAMPLE  7.6 : Compute the Trapezoid rule for the integral of tabular values: half step size
# ----------------------------------------------------------------------------------------------------------------------------------------------
# Function to be integrated
y(x) := sin(x)
# for argument range
xmin := 0
xmax := π
ORIGIN := 0
# tabulate function values only as required
j := 0
No_intervals := 2^j
No_intervals = 1
imax := No_intervals + 1
imax = 2
# step size
h := (xmax - xmin)/No_intervals
h = 3.14159
# grid points
x[1] := xmin
x[2] := xmax
# Trapezoid quadrature
st[j] := 0.5*h*(y(x[1]) + y(x[2]))
ST[imax] := st[j]
j := 1
No_intervals := 2^j
No_intervals = 2
# grid points
imax := No_intervals + 1
imax = 3
# step size
h := (xmax - xmin)/No_intervals
h = 1.5708
i := 1 .. 2^(j - 1)
x[2*i] := xmin + (2*i - 1)*h
# contribution to Trapezoid sum | Trapezoid quadrature
st[j] := 0.5*st[j - 1] + h*sum(y(x[2*i]), i)
ST[imax] := st[j]
j := 2
No_intervals := 2^j
No_intervals = 4
# grid points
imax := No_intervals + 1
imax = 5
# step size
h := (xmax - xmin)/No_intervals
h = 0.785398
i := 1 .. 2^(j - 1)
x[2*i] := xmin + (2*i - 1)*h
# contribution to Trapezoid sum | Trapezoid quadrature
st[j] := 0.5*st[j - 1] + h*sum(y(x[2*i]), i)
ST[imax] := st[j]
j := 3
No_intervals := 2^j
No_intervals = 8
# grid points
imax := No_intervals + 1
imax = 9
# step size
h := (xmax - xmin)/No_intervals
h = 0.392699
i := 1 .. 2^(j - 1)
x[2*i] := xmin + (2*i - 1)*h
# contribution to Trapezoid sum | Trapezoid quadrature
st[j] := 0.5*st[j - 1] + h*sum(y(x[2*i]), i)
ST[imax] := st[j]
j := 4
No_intervals := 2^j
No_intervals = 16
# grid points
imax := No_intervals + 1
imax = 17
# step size
h := (xmax - xmin)/No_intervals
h = 0.19635
i := 1 .. 2^(j - 1)
x[2*i] := xmin + (2*i - 1)*h
# contribution to Trapezoid sum | Trapezoid quadrature
st[j] := 0.5*st[j - 1] + h*sum(y(x[2*i]), i)
ST[imax] := st[j]
j := 0 .. 4
# integral of sine(x) is -cosine(x)
exact_value := -(cos(xmax) - cos(xmin))
exact_value = 2
error_T[j] := |exact_value - st[j]|
st = [0; 1.5708; 1.89612; 1.97423; 1.99357]
error_T = [2; 0.429204; 0.103881; 0.0257684; 0.00642966]
# ----------------------------------------------------------------------------------------------------------------------------------------------
