# ----------------------------------------------------------------------------------------------------------------------------------------------
# EXAMPLE  7.7 : For a table of Trapezoid quadrature compute the Richardson extrapolation
# ----------------------------------------------------------------------------------------------------------------------------------------------
# Use the results of EXAMPLE 7.6 for trapezoid quadrature for sin(x) on [0,π]
ORIGIN := 0
# define a triangular array with the first column containing the Trapezoid estimates for step size successively reduced by a factor of 2
jm := 5
j := 1 .. jm
r[1, 1] := 0
r[2, 1] := 1.570796
r[3, 1] := 1.896119
r[4, 1] := 1.974232
r[5, 1] := 1.99357
exact_value := 2
E[j, 1] := |exact_value - r[j, 1]|
# first extrapolation: column 2
j := 2 .. jm
r[j, 2] := r[j, 1] + (1/(4^1 - 1)*(r[j, 1] - r[j - 1, 1]))
E[j, 2] := |exact_value - r[j, 2]|
# second extrapolation: column 3
j := 3 .. jm
r[j, 3] := r[j, 2] + (1/(4^2 - 1)*(r[j, 2] - r[j - 1, 2]))
E[j, 3] := |exact_value - r[j, 3]|
# third extrapolation: column 4
j := 4 .. jm
r[j, 4] := r[j, 3] + (1/(4^3 - 1)*(r[j, 3] - r[j - 1, 3]))
E[j, 4] := |exact_value - r[j, 4]|
# fifth extrapolation: column 5
j := 5 .. jm
r[j, 5] := r[j, 4] + (1/(4^4 - 1)*(r[j, 4] - r[j - 1, 4]))
E[j, 5] := |exact_value - r[j, 5]|
# inspect the final array and observe how the accuracy of the estimate improves from one column to the next
r = [
    0, 0, 0, 0, 0, 0;
    0, 0, 0, 0, 0, 0;
    0, 1.5708, 2.09439, 0, 0, 0;
    0, 1.89612, 2.00456, 1.99857, 0, 0;
    0, 1.97423, 2.00027, 1.99998, 2.00001, 0;
    0, 1.99357, 2.00002, 2, 2, 2
]
# the corresponding  error matrix is
E = [
    0, 0, 0, 0, 0, 0;
    0, 2, 0, 0, 0, 0;
    0, 0.429204, 0.0943947, 0, 0, 0;
    0, 0.103881, 0.00456, 0.00142898, 0, 0;
    0, 0.025768, 0.000269667, 1.63556e-5, 6.06702e-6, 0;
    0, 0.00643, 1.6e-5, 9.11111e-7, 6.65961e-7, 6.92365e-7
]
# ----------------------------------------------------------------------------------------------------------------------------------------------
