# ----------------------------------------------------------------------------------------------------------------------------------------------
# EXAMPLE  7.8 : Compute Simpson's rule for the integral of tabular values at 3 points
ORIGIN := 1
# ----------------------------------------------------------------------------------------------------------------------------------------------
# Function to be integrated
y(x) := sin(x)
# for argument range
xmin := 0
xmax := π
# select the number of argument values
imax := 3
i := 1 .. imax
# tabulate argument and function values
x[i] := xmin + (i - 1)*(xmax - xmin)/(imax - 1)
f[i] := y(x[i])
i := 1 .. imax - 1
# set minimum and maximum values on each interval
# step size
h := x[2] - x[1]
h = 1.5708
# Simpson rule sum
S := h/3*(f[1] + 4*f[2] + f[3])
# integral of sine(x) is -cosine(x)
exact_value := -(cos(xmax) - cos(xmin))
exact_value = 2
S = 2.0944
error_S := |exact_value - S|
error_S = 0.0943951
# [plot: y(x[i]) vs x[i]]
# ----------------------------------------------------------------------------------------------------------------------------------------------
