# ----------------------------------------------------------------------------------------------------------------------------------------------
# EXAMPLE  8.11 : 2-D 12 point fully-symmetric quadrature to integrate of the order 2 exponential function
# ----------------------------------------------------------------------------------------------------------------------------------------------
# Two dimensional function to be integrated
F(x, y) := (1.5*x^2 - 0.5)*(1.5*y^2 - 0.5)*exp(x)*exp(y)
# the integrand is the Legendre Polynomial of order 2 times the exponential in both dimensions
ORIGIN := 1
# quadrature applied is the 2-D fully symmetric 12 point formula of Franke (Table 5) formed from 3 pairs of generators read in as a a three column matrix (three rows deep)
n := 3
XW := READPRN("q12.PRN")
# load x node generators from first column
t[1] := XW[1, 1]
t[2] := XW[2, 1]
t[3] := XW[3, 1]
t = [0.92582; 0.380554; 0.80598]
# load y node generators from second column
s[1] := XW[1, 2]
s[2] := XW[2, 2]
s[3] := XW[3, 2]
s = [0; 0.380554; 0.80598]
# load weight values from third column
w[1] := XW[1, 3]
w[2] := XW[2, 3]
w[3] := XW[3, 3]
w = [0.241975; 0.520593; 0.237432]
# select the number of argument values and tabulate in 2-D
# x dimension
imax := n
i := 1 .. imax
imax = 3
xmin := -1
xmax := 1
# map interval into [-1,+1]
A := 0.5*(xmax + xmin)
B := 0.5*(xmax - xmin)
x[i] := A + B*t[i]
# y dimension
jmax := n
j := 1 .. jmax
jmax = 3
ymin := -1
ymax := 1
# map interval into [-1,+1]
C := 0.5*(ymax + ymin)
D := 0.5*(ymax - ymin)
y[j] := C + D*s[j]
A = 0
C = 0
# tabulate function values on 2-D nodes
f[i, j] := F(x[i], y[j])
B = 1
D = 1
# symmetry of the nodes means there are four terms in the quadrature corresponding to each node pair
imax*4 = 12  # function evaluations
# ITERATION
k := 1
x[k] = 0.92582
y[k] = 0
# COORDINATE (+x,+y)
term := F(x[k], y[k])
# COORDINATE (-x,+y)
term := term + F(-x[k], y[k])
# COORDINATE (+x,-y)
term := term + F(x[k], -y[k])
# COORDINATE (-x,-y)
term := term + F(-x[k], -y[k])
sum := term*w[k]
# ITERATION
k := 2
x[k] = 0.380554
y[k] = 0.380554
# COORDINATE (+x,+y)
term := F(x[k], y[k])
# COORDINATE (-x,+y)
term := term + F(-x[k], y[k])
# COORDINATE (+x,-y)
term := term + F(x[k], -y[k])
# COORDINATE (-x,-y)
term := term + F(-x[k], -y[k])
sum := sum + term*w[k]
# ITERATION
k := 3
x[3] = 0.80598
y[3] = 0.80598
# COORDINATE (+x,+y)
term := F(x[k], y[k])
# COORDINATE (-x,+y)
term := term + F(-x[k], y[k])
# COORDINATE (+x,-y)
term := term + F(x[k], -y[k])
# COORDINATE (-x,-y)
term := term + F(-x[k], -y[k])
sum := sum + term*w[k]
# quadrature value
sum = 0.0220031
EXACT := READPRN("exactIK.PRN")
# integral of F(x,y)
exact_value := EXACT[2]^2
exact_value = 0.020485
error := |exact_value - sum|
error = 0.00151814  # correct to 1 significant figure
# ----------------------------------------------------------------------------------------------------------------------------------------------
