# ----------------------------------------------------------------------------------------------------------------------------------------------
# EXAMPLE  8.12 : 2-D 28 point fully-symmetric quadrature to integrate of the order 2 exponential function
# ----------------------------------------------------------------------------------------------------------------------------------------------
# Two dimensional function to be integrated
F(x, y) := (1.5*x^2 - 0.5)*(1.5*y^2 - 0.5)*exp(x)*exp(y)
# the integrand is the Legendre Polynomial of order 2 times the exponential in both dimensions
ORIGIN := 1
# quadrature applied is the 2-D fully symmetric 28 point formula of Rabinowitz and Richter formed from 6 pairs of generators read in as a a three column matrix (three rows deep)
n := 6
XW := READPRN("q28.PRN")
# load x node generators from first column
t[1] := XW[1, 1]
t[2] := XW[2, 1]
t[3] := XW[3, 1]
t[4] := XW[4, 1]
t[5] := XW[5, 1]
t[6] := XW[6, 1]
t = [0.898974; 0.763237; 0.894965; 0.632245; 0.279735; 0.960266]
# load y node generators from second column
s[1] := XW[1, 2]
s[2] := XW[2, 2]
s[3] := XW[3, 2]
s[4] := XW[4, 2]
s[5] := XW[5, 2]
s[6] := XW[6, 2]
s = [0; 0; 0.894965; 0.632245; 0.279735; 0.434741]
# load weight values from third column
w[1] := XW[1, 3]
w[2] := XW[2, 3]
w[3] := XW[3, 3]
w[4] := XW[4, 3]
w[5] := XW[5, 3]
w[6] := XW[6, 3]
w = [0.017668; 0.232225; 0.0715517; 0.219287; 0.296584; 0.0813422]
# select the number of argument values and tabulate in 2-D
# x dimension
imax := n
i := 1 .. imax
imax = 6
xmin := -1
xmax := 1
# map interval into [-1,+1]
A := 0.5*(xmax + xmin)
B := 0.5*(xmax - xmin)
x[i] := A + B*t[i]
# y dimension
jmax := n
j := 1 .. jmax
jmax = 6
ymin := -1
ymax := 1
# map interval into [-1,+1]
C := 0.5*(ymax + ymin)
D := 0.5*(ymax - ymin)
y[j] := C + D*s[j]
A = 0
C = 0
# tabulate function values on 2-D nodes
f[i, j] := F(x[i], y[j])
B = 1
D = 1
# symmetry of the nodes means there are 5x4+8 terms in the quadrature with 28 function evaluations
# ITERATION
k := 1
x[k] = 0.898974
y[k] = 0
# COORDINATE (+x,+y)
term := F(x[k], y[k])
# COORDINATE (-x,+y)
term := term + F(-x[k], y[k])
# COORDINATE (+x,-y)
term := term + F(x[k], -y[k])
# COORDINATE (-x,-y)
term := term + F(-x[k], -y[k])
sum := term*w[k]
# ITERATION
k := 2
x[k] = 0.763237
y[k] = 0
# COORDINATE (+x,+y)
term := F(x[k], y[k])
# COORDINATE (-x,+y)
term := term + F(-x[k], y[k])
# COORDINATE (+x,-y)
term := term + F(x[k], -y[k])
# COORDINATE (-x,-y)
term := term + F(-x[k], -y[k])
sum := sum + term*w[k]
# ITERATION
k := 3
x[k] = 0.894965
y[k] = 0.894965
# COORDINATE (+x,+y)
term := F(x[k], y[k])
# COORDINATE (-x,+y)
term := term + F(-x[k], y[k])
# COORDINATE (+x,-y)
term := term + F(x[k], -y[k])
# COORDINATE (-x,-y)
term := term + F(-x[k], -y[k])
sum := sum + term*w[k]
# ITERATION
k := 4
x[k] = 0.632245
y[k] = 0.632245
# COORDINATE (+x,+y)
term := F(x[k], y[k])
# COORDINATE (-x,+y)
term := term + F(-x[k], y[k])
# COORDINATE (+x,-y)
term := term + F(x[k], -y[k])
# COORDINATE (-x,-y)
term := term + F(-x[k], -y[k])
sum := sum + term*w[k]
# ITERATION
k := 5
x[k] = 0.279735
y[k] = 0.279735
# COORDINATE (+x,+y)
term := F(x[k], y[k])
# COORDINATE (-x,+y)
term := term + F(-x[k], y[k])
# COORDINATE (+x,-y)
term := term + F(x[k], -y[k])
# COORDINATE (-x,-y)
term := term + F(-x[k], -y[k])
sum := sum + term*w[k]
# ITERATION
k := 6
x[k] = 0.960266
y[k] = 0.434741
# COORDINATE (+x,+y)
term := F(x[k], y[k])
# COORDINATE (-x,-y)
term := term + F(-x[k], -y[k])
# COORDINATE (+x,-y)
term := term + F(x[k], -y[k])
# COORDINATE (-x,-y)
term := term + F(-x[k], y[k])
# ITERATION
x[k] = 0.960266
y[k] = 0.434741
# COORDINATE (+x,+y)
term := term + F(y[k], x[k])
# COORDINATE (-x,+y)
term := term + F(-y[k], -x[k])
# COORDINATE (+x,-y)
term := term + F(y[k], -x[k])
# COORDINATE (-x,-y)
term := term + F(-y[k], x[k])
sum := sum + term*w[k]
# quadrature value
sum = 0.0204855
EXACT := READPRN("exactIK.PRN")
# integral of F(x,y)
exact_value := EXACT[2]^2
exact_value = 0.020485
error := |exact_value - sum|
error = 5.34916e-7  # correct to 5 significant figures
# ----------------------------------------------------------------------------------------------------------------------------------------------
