# ----------------------------------------------------------------------------------------------------------------------------------------------
# EXAMPLE  8.14 : 2-D 48 point fully-symmetric quadrature to integrate of the order 3 exponential function
# ----------------------------------------------------------------------------------------------------------------------------------------------
# Two dimensional function to be integrated
F(x, y) := (2.5*x^3 - 1.5*x)*(2.5*y^3 - 1.5*y)*exp(x)*exp(y)
# the integrand is the Legendre Polynomial of order 3 times the exponential in both dimensions
ORIGIN := 1
# quadrature applied is the 2-D fully symmetric 48 point formula of Rabinowitz and Richter formed from 9 pairs of generators read in as a a three column matrix (three rows deep)
n := 9
XW := READPRN("q48.PRN")
# load x node generators from first column
t[1] := XW[1, 1]
t[2] := XW[2, 1]
t[3] := XW[3, 1]
t[4] := XW[4, 1]
t[5] := XW[5, 1]
t[6] := XW[6, 1]
t[7] := XW[7, 1]
t[8] := XW[8, 1]
t[9] := XW[9, 1]
t = [0.991538; 0.802016; 0.564867; 0.935439; 0.762456; 0.215616; 0.976966; 0.893713; 0.612249]
# load y node generators from second column
s[1] := XW[1, 2]
s[2] := XW[2, 2]
s[3] := XW[3, 2]
s[4] := XW[4, 2]
s[5] := XW[5, 2]
s[6] := XW[6, 2]
s[7] := XW[7, 2]
s[8] := XW[8, 2]
s[9] := XW[9, 2]
s = [0; 0; 0; 0.935439; 0.762456; 0.215616; 0.668448; 0.373521; 0.407898]
# load weight values from third column
w[1] := XW[1, 3]
w[2] := XW[2, 3]
w[3] := XW[3, 3]
w[4] := XW[4, 3]
w[5] := XW[5, 3]
w[6] := XW[6, 3]
w[7] := XW[7, 3]
w[8] := XW[8, 3]
w[9] := XW[9, 3]
w = [0.0301245; 0.0871147; 0.125008; 0.0267651; 0.0959652; 0.175083; 0.0283136; 0.0866415; 0.115014]
# select the number of argument values and tabulate in 2-D
# x dimension
imax := n
i := 1 .. imax
imax = 9
xmin := -1
xmax := 1
# map interval into [-1,+1]
A := 0.5*(xmax + xmin)
B := 0.5*(xmax - xmin)
x[i] := A + B*t[i]
# y dimension
jmax := n
j := 1 .. jmax
jmax = 9
ymin := -1
ymax := 1
# map interval into [-1,+1]
C := 0.5*(ymax + ymin)
D := 0.5*(ymax - ymin)
y[j] := C + D*s[j]
A = 0
C = 0
# tabulate function values on 2-D nodes
f[i, j] := F(x[i], y[j])
B = 1
D = 1
# symmetry of the nodes means there are 5x4+8 terms in the quadrature with 28 function evaluations
# ITERATION
k := 1
x[k] = 0.991538
y[k] = 0
# COORDINATE (+x,+y)
term := F(x[k], y[k])
# COORDINATE (-x,+y)
term := term + F(-x[k], y[k])
# COORDINATE (+y,-x)
term := term + F(y[k], -x[k])
# COORDINATE (-y,-x)
term := term + F(-y[k], -x[k])
sum := term*w[k]
# ITERATION
k := 2
x[k] = 0.802016
y[k] = 0
# COORDINATE (+x,+y)
term := F(x[k], y[k])
# COORDINATE (-x,+y)
term := term + F(-x[k], y[k])
# COORDINATE (+y,-x)
term := term + F(y[k], -x[k])
# COORDINATE (-y,-x)
term := term + F(-y[k], -x[k])
sum := sum + term*w[k]
# ITERATION
k := 3
x[k] = 0.564867
y[k] = 0
# COORDINATE (+x,+y)
term := F(x[k], y[k])
# COORDINATE (-x,+y)
term := term + F(-x[k], y[k])
# COORDINATE (+y,-x)
term := term + F(y[k], -x[k])
# COORDINATE (-y,-x)
term := term + F(-y[k], -x[k])
sum := sum + term*w[k]
# ITERATION
k := 4
x[k] = 0.935439
y[k] = 0.935439
# COORDINATE (+x,+y)
term := F(x[k], y[k])
# COORDINATE (-x,+y)
term := term + F(-x[k], y[k])
# COORDINATE (+y,-x)
term := term + F(y[k], -x[k])
# COORDINATE (-y,-x)
term := term + F(-y[k], -x[k])
sum := sum + term*w[k]
# ITERATION
k := 5
x[k] = 0.762456
y[k] = 0.762456
# COORDINATE (+x,+y)
term := F(x[k], y[k])
# COORDINATE (-x,+y)
term := term + F(-x[k], y[k])
# COORDINATE (+y,-x)
term := term + F(y[k], -x[k])
# COORDINATE (-y,-x)
term := term + F(-y[k], -x[k])
sum := sum + term*w[k]
# ITERATION
k := 6
x[k] = 0.215616
y[k] = 0.215616
# COORDINATE (+x,+y)
term := F(x[k], y[k])
# COORDINATE (-x,+y)
term := term + F(-x[k], y[k])
# COORDINATE (+y,-x)
term := term + F(y[k], -x[k])
# COORDINATE (-y,-x)
term := term + F(-y[k], -x[k])
sum := sum + term*w[k]
# ITERATION
k := 7
x[k] = 0.976966
y[k] = 0.668448
# COORDINATE (+x,+y)
term := F(x[k], y[k])
# COORDINATE (-x,-y)
term := term + F(-x[k], -y[k])
# COORDINATE (+x,-y)
term := term + F(x[k], -y[k])
# COORDINATE (-x,+y)
term := term + F(-x[k], y[k])
# COORDINATE (+y,+x)
term := term + F(y[k], x[k])
# COORDINATE (-y,-x)
term := term + F(-y[k], -x[k])
# COORDINATE (+y,-x)
term := term + F(y[k], -x[k])
# COORDINATE (-y,+x)
term := term + F(-y[k], x[k])
sum := sum + term*w[k]
# ITERATION
k := 8
x[k] = 0.893713
y[k] = 0.373521
# COORDINATE (+x,+y)
term := F(x[k], y[k])
# COORDINATE (-x,-y)
term := term + F(-x[k], -y[k])
# COORDINATE (+x,-y)
term := term + F(x[k], -y[k])
# COORDINATE (-x,+y)
term := term + F(-x[k], y[k])
# COORDINATE (+y,+x)
term := term + F(y[k], x[k])
# COORDINATE (-y,-x)
term := term + F(-y[k], -x[k])
# COORDINATE (+y,-x)
term := term + F(y[k], -x[k])
# COORDINATE (-y,+x)
term := term + F(-y[k], x[k])
sum := sum + term*w[k]
# ITERATION
k := 9
x[k] = 0.612249
y[k] = 0.407898
# COORDINATE (+x,+y)
term := F(x[k], y[k])
# COORDINATE (-x,-y)
term := term + F(-x[k], -y[k])
# COORDINATE (+x,-y)
term := term + F(x[k], -y[k])
# COORDINATE (-x,+y)
term := term + F(-x[k], y[k])
# COORDINATE (+y,+x)
term := term + F(y[k], x[k])
# COORDINATE (-y,-x)
term := term + F(-y[k], -x[k])
# COORDINATE (+y,-x)
term := term + F(y[k], -x[k])
# COORDINATE (-y,+x)
term := term + F(-y[k], x[k])
sum := sum + term*w[k]
# quadrature value
sum = 0.000405222
EXACT := READPRN("exactIK.PRN")
# integral of F(x,y)
exact_value := EXACT[3]^2
exact_value = 0.000405224
error := |exact_value - sum|
error = 2.63946e-9  # correct to 5 significant figures
# ----------------------------------------------------------------------------------------------------------------------------------------------
