# ----------------------------------------------------------------------------------------------------------------------------------------------
# EXAMPLE  8.15 : 4-D 48 point fully-symmetric quadrature to integrate of the order 3 exponential function
# ----------------------------------------------------------------------------------------------------------------------------------------------
# Four dimensional (4-D) quadrature formula obtained from the product of two 2-D 48 point quadrature formulas by application of matrix products using full matrix storage
# Four dimensional function to be integrated
F(x, y) := (2.5*x^3 - 1.5*x)*(2.5*y^3 - 1.5*y)*exp(x)*exp(y)
# the integrand is the Legendre Polynomial of order 3 times the exponential in four dimensions
ORIGIN := 1
# quadrature applied is the 2-D fully symmetric 48 point formula of Rabinowitz and Richter formed from 9 pairs of generators read in as a a three column matrix (three rows deep)
n := 9
XW := READPRN("q48.PRN")
# load x node generators from first column
t[1] := XW[1, 1]
t[2] := XW[2, 1]
t[3] := XW[3, 1]
t[4] := XW[4, 1]
t[5] := XW[5, 1]
t[6] := XW[6, 1]
t[7] := XW[7, 1]
t[8] := XW[8, 1]
t[9] := XW[9, 1]
t = [0.991538; 0.802016; 0.564867; 0.935439; 0.762456; 0.215616; 0.976966; 0.893713; 0.612249]
# load y node generators from second column
s[1] := XW[1, 2]
s[2] := XW[2, 2]
s[3] := XW[3, 2]
s[4] := XW[4, 2]
s[5] := XW[5, 2]
s[6] := XW[6, 2]
s[7] := XW[7, 2]
s[8] := XW[8, 2]
s[9] := XW[9, 2]
s = [0; 0; 0; 0.935439; 0.762456; 0.215616; 0.668448; 0.373521; 0.407898]
# load weight values from third column
w[1] := XW[1, 3]
w[2] := XW[2, 3]
w[3] := XW[3, 3]
w[4] := XW[4, 3]
w[5] := XW[5, 3]
w[6] := XW[6, 3]
w[7] := XW[7, 3]
w[8] := XW[8, 3]
w[9] := XW[9, 3]
w = [0.0301245; 0.0871147; 0.125008; 0.0267651; 0.0959652; 0.175083; 0.0283136; 0.0866415; 0.115014]
# use the 48 point 2-D quadrature as a product formula in 4-D
# select the number of argument values and tabulate in 2-D
# x dimension
imax := n
i := 1 .. imax
imax = 9
xmin := -1
xmax := 1
# map interval into [-1,+1]
A := 0.5*(xmax + xmin)
B := 0.5*(xmax - xmin)
x[i] := A + B*t[i]
# y dimension
jmax := n
j := 1 .. jmax
jmax = 9
ymin := -1
ymax := 1
# map interval into [-1,+1]
C := 0.5*(ymax + ymin)
D := 0.5*(ymax - ymin)
y[j] := C + D*s[j]
A = 0
B = 1
C = 0
D = 1
# symmetry of the nodes means there are 48^2 terms in the quadrature with 48^2 function evaluations but in a symmetric function such as F(x,y) defined above this simplifies
# first contract the iterations of the previous EXAMPLE into two cases
# ITERATION 1 has four terms with 6x4 function evaluations
k := 1 .. 6
sum1[k] := w[k]*(F(x[k], y[k]) + F(-x[k], y[k]) + F(-y[k], -x[k]) + F(y[k], -x[k]))
# ITERATION 2 has eight terms with 3x8 function evaluations
k := 7 .. 9
sum2[k] := w[k]*(F(x[k], y[k]) + F(-x[k], -y[k]) + F(x[k], -y[k]) + F(-x[k], y[k]) + F(y[k], x[k]) + F(-y[k], -x[k]) + F(y[k], -x[k]) + F(-y[k], x[k]))
# the 2-D quadrature value is
sum := sum(sum1[k], k = 1 .. 6) + sum(sum2[k], k = 7 .. 9)
EXACT := READPRN("exactIK.PRN")
# confirm the 2-D result for the integral of F(x,y)
exact_value := EXACT[3]^2
exact_value = 0.000405224
sum = 0.000405222
error := |exact_value - sum|
error = 2.63946e-9  # correct to 5 significant figures
# form a 4-D quadrature as a product of the 2-D quadrature formula in the two ITERATIONS above by forming a 9x8 matrix W with non-zero entries for 2-D (x,y) pairs, and sum over the resultant to evaluate the 4-D quadrature
# the matrix has 9 rows and 8 columns
K := 1 .. 9
J := 1 .. 8
# initialize to zero
W[K, J] := 0
# rows 1 to 6 have four non-zero column entries
k := 1 .. 6
W[k, 1] := w[k]*F(x[k], y[k])
W[k, 4] := w[k]*F(-x[k], y[k])
W[k, 6] := w[k]*F(-y[k], -x[k])
W[k, 7] := w[k]*F(y[k], -x[k])
# rows 7 to 9 have eight non-zero column entries
k := 7 .. 9
W[k, 1] := w[k]*F(x[k], y[k])
W[k, 4] := w[k]*F(-x[k], y[k])
W[k, 6] := w[k]*F(-y[k], -x[k])
W[k, 7] := w[k]*F(y[k], -x[k])
W[k, 2] := w[k]*F(-x[k], -y[k])
W[k, 3] := w[k]*F(x[k], -y[k])
W[k, 5] := w[k]*F(y[k], x[k])
W[k, 8] := w[k]*F(-y[k], x[k])
# and the 4-D quadrature is sum of the product of two 2-D quadrature formulas
k := 1 .. 9
j := 1 .. 8
K := 1 .. 9
J := 1 .. 8
sum := 0
sum := sum + sum(sum(W[K, J]*sum(sum(W[k, j], j), k), J), K)
sum = 1.64205e-7
exact_value := EXACT[3]^4
exact_value = 1.64207e-7
error := |exact_value - sum|
error = 2.13914e-12  # correct to 5 significant figures
# ----------------------------------------------------------------------------------------------------------------------------------------------
