# ----------------------------------------------------------------------------------------------------------------------------------------------
# EXAMPLE  8.16 : 4-D 48 point fully-symmetric quadrature as in EXAMPLE 9.15 using CC sparse storage
# ----------------------------------------------------------------------------------------------------------------------------------------------
# Four dimensional (4-D) quadrature formula obtained from the product of two 2-D 48 point quadrature formulas by application of matrix products using sparse matrix storage for fewer operation counts
# Four dimensional function to be integrated
F(x, y) := (2.5*x^3 - 1.5*x)*(2.5*y^3 - 1.5*y)*exp(x)*exp(y)
# the integrand is the Legendre Polynomial of order 3 times the exponential in four dimensions
ORIGIN := 1
# quadrature applied is the 2-D fully symmetric 48 point formula of Rabinowitz and Richter formed from 9 pairs of generators read in as a a three column matrix (three rows deep)
n := 9
XW := READPRN("q48.PRN")
# load x node generators from first column
t[1] := XW[1, 1]
t[2] := XW[2, 1]
t[3] := XW[3, 1]
t[4] := XW[4, 1]
t[5] := XW[5, 1]
t[6] := XW[6, 1]
t[7] := XW[7, 1]
t[8] := XW[8, 1]
t[9] := XW[9, 1]
t = [0.991538; 0.802016; 0.564867; 0.935439; 0.762456; 0.215616; 0.976966; 0.893713; 0.612249]
# load y node generators from second column
s[1] := XW[1, 2]
s[2] := XW[2, 2]
s[3] := XW[3, 2]
s[4] := XW[4, 2]
s[5] := XW[5, 2]
s[6] := XW[6, 2]
s[7] := XW[7, 2]
s[8] := XW[8, 2]
s[9] := XW[9, 2]
s = [0; 0; 0; 0.935439; 0.762456; 0.215616; 0.668448; 0.373521; 0.407898]
# load weight values from third column
w[1] := XW[1, 3]
w[2] := XW[2, 3]
w[3] := XW[3, 3]
w[4] := XW[4, 3]
w[5] := XW[5, 3]
w[6] := XW[6, 3]
w[7] := XW[7, 3]
w[8] := XW[8, 3]
w[9] := XW[9, 3]
w = [0.0301245; 0.0871147; 0.125008; 0.0267651; 0.0959652; 0.175083; 0.0283136; 0.0866415; 0.115014]
# use the 48 point 2-D quadrature as a product formula in 4-D
# select the number of argument values and tabulate in 2-D
# x dimension
imax := n
i := 1 .. imax
imax = 9
xmin := -1
xmax := 1
# map interval into [-1,+1]
A := 0.5*(xmax + xmin)
B := 0.5*(xmax - xmin)
x[i] := A + B*t[i]
# y dimension
jmax := n
j := 1 .. jmax
jmax = 9
ymin := -1
ymax := 1
# map interval into [-1,+1]
C := 0.5*(ymax + ymin)
D := 0.5*(ymax - ymin)
y[j] := C + D*s[j]
A = 0
B = 1
C = 0
D = 1
# symmetry of the nodes means there are 48^2 terms in the quadrature with 48^2 function evaluations but in a symmetric function such as F(x,y) defined above this simplifies
# first contract the iterations of the previous EXAMPLE into two cases
# ITERATION 1 has four terms with 6x4 function evaluations
k := 1 .. 6
sum1[k] := w[k]*(F(x[k], y[k]) + F(-x[k], y[k]) + F(-y[k], -x[k]) + F(y[k], -x[k]))
# ITERATION 2 has eight terms with 3x8 function evaluations
k := 7 .. 9
sum2[k] := w[k]*(F(x[k], y[k]) + F(-x[k], -y[k]) + F(x[k], -y[k]) + F(-x[k], y[k]) + F(y[k], x[k]) + F(-y[k], -x[k]) + F(y[k], -x[k]) + F(-y[k], x[k]))
# the 2-D quadrature value is
sum := sum(sum1[k], k = 1 .. 6) + sum(sum2[k], k = 7 .. 9)
EXACT := READPRN("exactIK.PRN")
# now confirm the same 2-D result of the previous EXAMPLE for the integral of F(x,y)
exact_value := EXACT[3]^2
exact_value = 0.000405224
sum = 0.000405222
error := |exact_value - sum|
error = 2.63946e-9  # correct to 5 significant figures
# a 4-D quadrature is a product of the 2-D quadrature formula in the two ITERATIONS above to form a 9x8 matrix W with non-zero entries for 2-D (x,y) pairs, and sum over the resultant to evaluate the 4-D quadrature
# form a matrix with 9 rows and 8 columns
K := 1 .. 9
J := 1 .. 8
# and initialize to zero
W[K, J] := 0
# rows 1 to 6 have four non-zero column entries
k := 1 .. 6
W[k, 1] := w[k]*F(x[k], y[k])
W[k, 4] := w[k]*F(-x[k], y[k])
W[k, 6] := w[k]*F(-y[k], -x[k])
W[k, 7] := w[k]*F(y[k], -x[k])
# rows 7 to 9 have eight non-zero column entries
k := 7 .. 9
W[k, 1] := w[k]*F(x[k], y[k])
W[k, 4] := w[k]*F(-x[k], y[k])
W[k, 6] := w[k]*F(-y[k], -x[k])
W[k, 7] := w[k]*F(y[k], -x[k])
W[k, 2] := w[k]*F(-x[k], -y[k])
W[k, 3] := w[k]*F(x[k], -y[k])
W[k, 5] := w[k]*F(y[k], x[k])
W[k, 8] := w[k]*F(-y[k], x[k])
# and the 4-D quadrature formula is sum of the product of two 2-D quadrature formulas
kmax := 9
jmax := 8
k := 1 .. kmax
j := 1 .. jmax
K := 1 .. kmax
J := 1 .. jmax
sum := 0
# note that the full matrix W(k,j) has 9x8=72 entries with only 48 non-zero values so if this algorithm is to be applied repeatedly it is more efficient to use sparse matrix storage and sparse matrix products
# the following demonstrates Compressed Column (CC) storage for NZ=48 non-zero entries in W: described as follows, step-by-step, then the above results are used to confirm the outcome
# row counters
izero := 6
lmax := 3
l := 1 .. lmax
# row index for column one (all rows have non-zero entries)
row[k] := k
cc[k] := W[k, 1]
p[1] := 1
# row indices | matrix value | column pointer
# row index for column two (only rows 7 to 9 have non-zero entries)
row[kmax + l] := izero + l
cc[kmax + l] := W[izero + l, 2]
p[2] := 10
# row index for column three (only rows 7 to 9 have non-zero entries)
row[kmax + lmax + l] := izero + l
cc[kmax + lmax + l] := W[izero + l, 3]
p[3] := 13
# row index for column four (all rows have non-zero entries)
row[kmax + 2*lmax + k] := k
cc[kmax + 2*lmax + k] := W[k, 4]
p[4] := 16
p[5] := 25
# row index for column five (only rows 7 to 9 have non-zero entries)
row[2*kmax + 2*lmax + l] := izero + l
cc[2*kmax + 2*lmax + l] := W[izero + l, 5]
# row index for column six (all rows have non-zero entries)
row[2*kmax + 3*lmax + k] := k
cc[2*kmax + 3*lmax + k] := W[k, 6]
p[6] := 28
# row index for column seven (all rows have non-zero entries)
row[3*kmax + 3*lmax + k] := k
cc[3*kmax + 3*lmax + k] := W[k, 7]
p[7] := 37
# row index for column eight (only rows 7 to 9 have non-zero entries)
row[4*kmax + 3*lmax + l] := izero + l
cc[4*kmax + 3*lmax + l] := W[izero + l, 8]
p[8] := 46
p[9] := 49
# pointer array index for column j
j := 1 .. jmax
# row indices from pointer array
row[j] := p[j] .. p[j + 1] - 1
row[1] = [1; 2; 3; 4; 5; 6; 7; 8; 9]
row[2] = [10; 11; 12]
row[3] = [13; 14; 15]
row[4] = [16; 17; 18; 19; 20; 21; 22; 23; 24]
row[5] = [25; 26; 27]
row[6] = [28; 29; 30; 31; 32; 33; 34; 35; 36]
row[7] = [37; 38; 39; 40; 41; 42; 43; 44; 45]
row[8] = [46; 47; 48]
# for a 4-D integration form a 4-D quadrature formula and note improved efficiency with sparse flops
L := 1 .. 48  # flop count for sparse versus full matrix sum
# sparse matrix product
J := 1 .. 48
sum := sum(sum(cc[L]*cc[J], J), L)
48^2 = 2304  # versus
(9*8)^2 = 5184
# and the 4-D quadrature is the sum of the product of two 2-D quadrature formulas
sum = 1.64205e-7
exact_value := EXACT[3]^4
exact_value = 1.64207e-7
error := |exact_value - sum|
error = 2.13915e-12  # correct to 5 significant figures as before
# for a 6-D integration form a 6-D quadrature formula and note improved efficiency with sparse flops
L := 1 .. 48  # a 3.4 smaller flop count for sparse versus full matrix sum
# sparse matrix product
J := 1 .. 48
48^3 = 110592
I := 1 .. 48  # versus
# and the 6-D quadrature is the sum of the product of three 2-D quadrature formulas
sum := sum(sum(sum(cc[L]*cc[J]*cc[I], J), L), I)
(9*8)^3 = 373248
sum = 6.65392e-11
exact_value := EXACT[3]^6
exact_value = 6.65405e-11
error := |exact_value - sum|
error = 1.30045e-15  # correct to 4 significant figures as before
# ----------------------------------------------------------------------------------------------------------------------------------------------
