# ----------------------------------------------------------------------------------------------------------------------------------------------
# EXAMPLE  8.17 : Monte Carlo method for 4-D integral of the exponential function
ORIGIN := 1
# ----------------------------------------------------------------------------------------------------------------------------------------------
# Four dimensional function to be integrated is exp(x+y+u+v) in the 4-D cube [0,1]^4 with unit volume
# volume of 4-D cube
volume := 1^4
# Monte-Carlo estimates of the 4-D integral for different sample sizes with increasing sample count 10**k, k=1,..6
# rnd generates a random number in the interval [0,1] on each call for each variable in the 4-D cube
# sum over all samples to form the integral value and an error estimate
k := 1
imax := 10^1
i := 1 .. imax
x[i] := rnd(1)
y[i] := rnd(1)
u[i] := rnd(1)
v[i] := rnd(1)
f_4D[i] := exp(x[i]*y[i]*u[i]*v[i])
sum[k] := sum(f_4D[i], i)
err[k] := sum(f_4D[i]^2, i)
integral[k] := volume*sum[k]/imax
integral[k] = 1.0368
error_estimate[k] := volume*sqrt((err[k]/imax - (sum[k]/imax)^2)/imax)
error_estimate[k] = 0.0100687
k := 2
imax := 10^k
i := 1 .. imax
x[i] := rnd(1)
y[i] := rnd(1)
u[i] := rnd(1)
v[i] := rnd(1)
f_4D[i] := exp(x[i]*y[i]*u[i]*v[i])
sum[k] := sum(f_4D[i], i)
err[k] := sum(f_4D[i]^2, i)
integral[k] := volume*sum[k]/imax
integral[k] = 1.09933
error_estimate[k] := volume*sqrt((err[k]/imax - (sum[k]/imax)^2)/imax)
error_estimate[k] = 0.0157433
k := 3
imax := 10^k
i := 1 .. imax
x[i] := rnd(1)
y[i] := rnd(1)
u[i] := rnd(1)
v[i] := rnd(1)
f_4D[i] := exp(x[i]*y[i]*u[i]*v[i])
sum[k] := sum(f_4D[i], i)
err[k] := sum(f_4D[i]^2, i)
integral[k] := volume*sum[k]/imax
integral[k] = 1.07426
error_estimate[k] := volume*sqrt((err[k]/imax - (sum[k]/imax)^2)/imax)
error_estimate[k] = 0.00348048
k := 4
imax := 10^k
i := 1 .. imax
x[i] := rnd(1)
y[i] := rnd(1)
u[i] := rnd(1)
v[i] := rnd(1)
f_4D[i] := exp(x[i]*y[i]*u[i]*v[i])
sum[k] := sum(f_4D[i], i)
err[k] := sum(f_4D[i]^2, i)
integral[k] := volume*sum[k]/imax
integral[k] = 1.06824
error_estimate[k] := volume*sqrt((err[k]/imax - (sum[k]/imax)^2)/imax)
error_estimate[k] = 0.00110555
k := 5
imax := 10^k
i := 1 .. imax
x[i] := rnd(1)
y[i] := rnd(1)
u[i] := rnd(1)
v[i] := rnd(1)
f_4D[i] := exp(x[i]*y[i]*u[i]*v[i])
sum[k] := sum(f_4D[i], i)
err[k] := sum(f_4D[i]^2, i)
integral[k] := volume*sum[k]/imax
integral[k] = 1.06968
error_estimate[k] := volume*sqrt((err[k]/imax - (sum[k]/imax)^2)/imax)
error_estimate[k] = 0.000357152
k := 6
imax := 10^k
i := 1 .. imax
x[i] := rnd(1)
y[i] := rnd(1)
u[i] := rnd(1)
v[i] := rnd(1)
f_4D[i] := exp(x[i]*y[i]*u[i]*v[i])
sum[k] := sum(f_4D[i], i)
err[k] := sum(f_4D[i]^2, i)
integral[k] := volume*sum[k]/imax
integral[k] = 1.06931
error_estimate[k] := volume*sqrt((err[k]/imax - (sum[k]/imax)^2)/imax)
error_estimate[k] = 0.000111984
k := 1 .. 6
exact_integral := 1.0693976
error[k] := |integral[k] - exact_integral|
integral = [1.0368; 1.09933; 1.07426; 1.06824; 1.06968; 1.06931]
error_estimate = [0.0100687; 0.0157433; 0.00348048; 0.00110555; 0.000357152; 0.000111984]
error = [0.0325993; 0.0299366; 0.00485998; 0.00115973; 0.000277564; 8.34445e-5]
# for this case the number of significant figures increases steadily from 2 to 5 in the range of 10^3 to 10^6 samples
# ----------------------------------------------------------------------------------------------------------------------------------------------
