# ----------------------------------------------------------------------------------------------------------------------------------------------
# EXAMPLE  8.18 : Monte Carlo method for 4-D integral of the order 1 exponential function
ORIGIN := 1
# ----------------------------------------------------------------------------------------------------------------------------------------------
# Function to be integrated in 4-D
F(x) := x*exp(x)
# volume of 4-D cube
volume := 2^4
# the integrand is the Legendre Polynomial of order 1 times the exponential in four dimensions (see below)
EXACT := READPRN("exactIK.PRN")
exact_value := EXACT[1]^4
# Monte-Carlo estimates of the 4-D integral for different sample sizes with increasing sample count 10**k, k=5 and 6
# rnd generates a random number on [0,1] with each call for each variable in the 4-D cube of side length 2
# sum over all samples to form the integral value and an error estimate
# map interval into [-1,+1]
k := 5
imax := 10^k
i := 1 .. imax
x[i] := rnd(1)
t[i] := 2*x[i] - 1
y[i] := rnd(1)
s[i] := 2*y[i] - 1
u[i] := rnd(1)
r[i] := 2*u[i] - 1
v[i] := rnd(1)
p[i] := 2*v[i] - 1
f_4D[i] := F(t[i])*F(s[i])*F(r[i])*F(p[i])
sum[k] := sum(f_4D[i], i)
integral[k] := volume*sum[k]/imax
err[k] := sum(f_4D[i]^2, i)
error_estimate[k] := volume*sqrt((err[k]/imax - (sum[k]/imax)^2)/imax)
integral[k] = 0.282314
error_estimate[k] = 0.0337988
exact_value = 0.29305
error := |exact_value - integral[k]|
error = 0.0107366
k := 6
imax := 10^k
i := 1 .. imax
x[i] := rnd(1)
t[i] := 2*x[i] - 1
y[i] := rnd(1)
s[i] := 2*y[i] - 1
u[i] := rnd(1)
r[i] := 2*u[i] - 1
v[i] := rnd(1)
p[i] := 2*v[i] - 1
f_4D[i] := F(t[i])*F(s[i])*F(r[i])*F(p[i])
sum[k] := sum(f_4D[i], i)
integral[k] := volume*sum[k]/imax
err[k] := sum(f_4D[i]^2, i)
error_estimate[k] := volume*sqrt((err[k]/imax - (sum[k]/imax)^2)/imax)
# at best this is correct correct to 1 or 2 significant figures
integral[k] = 0.292687
error_estimate[k] = 0.0111648
exact_value = 0.29305
error := |exact_value - integral[k]|
error = 0.000363049
# ----------------------------------------------------------------------------------------------------------------------------------------------
