# ----------------------------------------------------------------------------------------------------------------------------------------------
# EXAMPLE  8.2 : Compute the product Simpson rule for the integral of the 2-D sine function: 4 tiles
# ----------------------------------------------------------------------------------------------------------------------------------------------
# Two dimensional function to be integrated
F(x, y) := sin(x)*sin(y)
Nx := 1
Ny := 1
ORIGIN := 1
# subdivide  [ 0, π  ] x [ 0, π  ] into four quadrants of equal area
# QUADRANT (1,1)  [ 0, π/2  ] x [ 0, π/2  ]
k := 1 .. Nx
m := 1 .. Ny
# select the number of argument values and tabulate evenly spaced grid in 2-D
# x dimension
imax := 2*Nx + 1
i := 1 .. imax
imax = 3
xmin := 0
xmax := π/2
# y dimension
jmax := 2*Ny + 1
j := 1 .. jmax
jmax = 3
ymin := 0
ymax := π/2
x[i] := xmin + (i - 1)*(xmax - xmin)/(imax - 1)
y[j] := ymin + (j - 1)*(ymax - ymin)/(jmax - 1)
f[i, j] := F(x[i], y[j])
imax*jmax = 9
# step size
hx := x[2] - x[1]
hx = 0.785398
hy := y[2] - y[1]
hy = 0.785398
# Simpson rule sum in 2-D
sum := f[1, 1] + f[1, 3] + f[3, 1] + f[3, 3] + 4*(f[1, 2] + f[2, 1] + f[3, 2] + f[2, 3]) + 16*f[2, 2]
I[1, 1] := hx/3*hy/3*sum
exact_value_x := (-(cos(xmax) - cos(xmin)))
exact_value_y := (-(cos(ymax) - cos(ymin)))
exact_value_1 := exact_value_x*exact_value_y
exact_value_1 = 1
I[1, 1] = 1.00456
error_11 := |exact_value_1 - I[1, 1]|
error_11 = 0.00456495
# QUADRANT (1,2)  [ 0, π/2  ] x [ π/2 , π ]
# select the number of argument values and tabulate evenly spaced grid in 2-D
# x dimension
imax := 2*Nx + 1
i := 1 .. imax
imax = 3
xmin := 0
xmax := π/2
# y dimension
jmax := 2*Ny + 1
j := 1 .. jmax
jmax = 3
ymin := π/2
ymax := π
x[i] := xmin + (i - 1)*(xmax - xmin)/(imax - 1)
y[j] := ymin + (j - 1)*(ymax - ymin)/(jmax - 1)
f[i, j] := F(x[i], y[j])
imax*jmax = 9
# step size
hx := x[2] - x[1]
hx = 0.785398
hy := y[2] - y[1]
hy = 0.785398
# Simpson rule sum in 2-D
sum := f[1, 1] + f[1, 3] + f[3, 1] + f[3, 3] + 4*(f[1, 2] + f[2, 1] + f[3, 2] + f[2, 3]) + 16*f[2, 2]
I[1, 2] := hx/3*hy/3*sum
exact_value_x := (-(cos(xmax) - cos(xmin)))
exact_value_y := (-(cos(ymax) - cos(ymin)))
exact_value_2 := exact_value_x*exact_value_y
exact_value_2 = 1
I[1, 2] = 1.00456
error_12 := |exact_value_2 - I[1, 2]|
error_12 = 0.00456495
# QUADRANT (2,1)  [ π/2 , π ] x [ 0, π/2  ]
# select the number of argument values and tabulate evenly spaced grid in 2-D
# x dimension
imax := 2*Nx + 1
i := 1 .. imax
imax = 3
xmin := π/2
xmax := π
# y dimension
jmax := 2*Ny + 1
j := 1 .. jmax
jmax = 3
ymin := 0
ymax := π/2
x[i] := xmin + (i - 1)*(xmax - xmin)/(imax - 1)
y[j] := ymin + (j - 1)*(ymax - ymin)/(jmax - 1)
f[i, j] := F(x[i], y[j])
imax*jmax = 9
# step size
hx := x[2] - x[1]
hx = 0.785398
hy := y[2] - y[1]
hy = 0.785398
# Simpson rule sum in 2-D
sum := f[1, 1] + f[1, 3] + f[3, 1] + f[3, 3] + 4*(f[1, 2] + f[2, 1] + f[3, 2] + f[2, 3]) + 16*f[2, 2]
I[2, 1] := hx/3*hy/3*sum
exact_value_x := (-(cos(xmax) - cos(xmin)))
exact_value_y := (-(cos(ymax) - cos(ymin)))
exact_value_3 := exact_value_x*exact_value_y
exact_value_3 = 1
I[2, 1] = 1.00456
error_21 := |exact_value_3 - I[2, 1]|
error_21 = 0.00456495
# QUADRANT (2,2)  [ π/2 , π ] x [ π/2 , π ]
# select the number of argument values and tabulate evenly spaced grid in 2-D
# x dimension
imax := 2*Nx + 1
i := 1 .. imax
imax = 3
xmin := π/2
xmax := π
# y dimension
jmax := 2*Ny + 1
j := 1 .. jmax
jmax = 3
ymin := π/2
ymax := π
x[i] := xmin + (i - 1)*(xmax - xmin)/(imax - 1)
y[j] := ymin + (j - 1)*(ymax - ymin)/(jmax - 1)
f[i, j] := F(x[i], y[j])
imax*jmax = 9
# step size
hx := x[2] - x[1]
hx = 0.785398
hy := y[2] - y[1]
hy = 0.785398
# Simpson rule sum in 2-D
sum := f[1, 1] + f[1, 3] + f[3, 1] + f[3, 3] + 4*(f[1, 2] + f[2, 1] + f[3, 2] + f[2, 3]) + 16*f[2, 2]
I[2, 2] := hx/3*hy/3*sum
exact_value_x := (-(cos(xmax) - cos(xmin)))
exact_value_y := (-(cos(ymax) - cos(ymin)))
exact_value_4 := exact_value_x*exact_value_y
exact_value_4 = 1
I[2, 2] = 1.00456
error_22 := |exact_value_4 - I[2, 2]|
error_22 = 0.00456495
# SUMMATION OVER FOUR QUADRANTS: exact value versus Simpson's rule estimate
exact_value := exact_value_1 + exact_value_2 + exact_value_3 + exact_value_4
exact_value = 4
SS := I[1, 1] + I[1, 2] + I[2, 1] + I[2, 2]
SS = 4.01826
error := |exact_value - SS|
# The error is 21 times smaller than if Simpson's rule is applied to one quadrant over the entire 2-D domain
error = 0.0182598
# correct to 2 significant figures
# 4x9=36 function evaluations
# ----------------------------------------------------------------------------------------------------------------------------------------------
