# ----------------------------------------------------------------------------------------------------------------------------------------------
# EXAMPLE  8.3 : Compute the product Simpson rule for the integral of the 2-D exponential function: 1 tile
# ----------------------------------------------------------------------------------------------------------------------------------------------
# Two dimensional function to be integrated
F(x, y) := exp(x + y)
N := 1
ORIGIN := 1
# select the number of argument values and tabulate evenly spaced grid in 2-D
# x dimension
imax := 2*N + 1
i := 1 .. imax
imax = 3
xmin := 0
xmax := π
# y dimension
jmax := 2*N + 1
j := 1 .. jmax
jmax = 3
ymin := 0
ymax := π
x[i] := xmin + (i - 1)*(xmax - xmin)/(imax - 1)
y[j] := ymin + (j - 1)*(ymax - ymin)/(jmax - 1)
# tabulate function values on a 2-D grid
f[i, j] := F(x[i], y[j])
imax*jmax = 9  # is the 2-D quadrature grid size
k := 1 .. N
m := 1 .. N
# step size
hx := x[2] - x[1]
hx = 1.5708
hy := y[2] - y[1]
hy = 1.5708
# Simpson rule sum in 2-D
sum := f[1, 1] + f[1, 3] + f[3, 1] + f[3, 3] + 4*(f[1, 2] + f[2, 1] + f[3, 2] + f[2, 3]) + 16*f[2, 2]
SS := hx/3*hy/3*sum
# [3D plot: F(x[i], y[j])]
# integral of F(x,y)
exact_value_x := exp(xmax) - exp(xmin)
exact_value_y := exp(ymax) - exp(ymin)
exact_value := exact_value_x*exact_value_y
exact_value = 490.21
# Simpson's rule
SS = 515.975
error := |exact_value - SS|
error = 25.7645
# correct to 1 significant figure
# 9 function evaluations
# ----------------------------------------------------------------------------------------------------------------------------------------------
