# ----------------------------------------------------------------------------------------------------------------------------------------------
# EXAMPLE  8.7 : Gauss-Legendre quadrature for the integral of the 2-D exponential function order
n := 2
# ----------------------------------------------------------------------------------------------------------------------------------------------
# Two dimensional function to be integrated
F(x, y) := exp(x + y)
ORIGIN := 1
# quadrature nodes
t[1] := sqrt(1/3)
t[2] := -t[1]
# weights
w[1] := 1
w[2] := w[1]
# select the number of argument values and tabulate in 2-D
# x dimension
imax := n
i := 1 .. imax
imax = 2
xmin := 0
xmax := π
# map interval into [-1,+1]
A := 0.5*(xmax + xmin)
B := 0.5*(xmax - xmin)
x[i] := A + B*t[i]
# y dimension
jmax := n
j := 1 .. jmax
jmax = 2
ymin := 0
ymax := π
# map interval into [-1,+1]
C := 0.5*(ymax + ymin)
D := 0.5*(ymax - ymin)
y[j] := C + D*t[j]
A = 1.5708
B = 1.5708
C = 1.5708
D = 1.5708
# tabulate function values on a 2-D grid
f[i, j] := F(x[i], y[j])
imax*jmax = 4  # is the 2-D quadrature grid size
# nodes
x = [2.4777; 0.663897]
y = [2.4777; 0.663897]
t = [0.57735; -0.57735]
# number of function evaluations
f = [141.938, 23.1407; 23.1407, 3.77271]
w = [1; 1]
i = [1; 2]
j = [1; 2]
imax*jmax = 4
# Gauss quadrature value
SG := B*D*sum(sum(w[i]*w[j]*f[i, j], j), i)
SG = 473.722
# integral of F(x,y)
exact_value_x := exp(xmax) - exp(xmin)
exact_value_y := exp(ymax) - exp(ymin)
exact_value := exact_value_x*exact_value_y
exact_value = 490.21
# Gauss quadrature
error := |exact_value - SG|
error = 16.4882
SG = 473.722
imax*jmax = 4  # function evaluations  # correct to 1 significant figure
# ----------------------------------------------------------------------------------------------------------------------------------------------
