# ----------------------------------------------------------------------------------------------------------------------------------------------
# EXAMPLE  8.8 : Gauss-Legendre quadrature for the integral of the 2-D exponential function order
n := 4
# ----------------------------------------------------------------------------------------------------------------------------------------------
# Two dimensional function to be integrated
F(x, y) := exp(x + y)
ORIGIN := 1
# read in nodes (first column) and weights (second column)
imax := n
i := 1 .. imax/2
XW := READPRN("gaus04.PRN")
# load node and weight values
t[1] := -XW[2, 1]
t[2] := -XW[1, 1]
t[3] := -t[2]
t[4] := -t[1]
t = [-0.861136; -0.339981; 0.339981; 0.861136]
w[1] := XW[2, 2]
w[2] := XW[1, 2]
w[3] := w[2]
w[4] := w[1]
# check sum of weights
i := 1 .. imax
W := sum(w[i], i)
W = 2
w = [0.347855; 0.652145; 0.652145; 0.347855]
# select the number of argument values and tabulate in 2-D
# x dimension
imax := n
i := 1 .. imax
imax = 4
xmin := 0
xmax := π
# map interval into [-1,+1]
A := 0.5*(xmax + xmin)
B := 0.5*(xmax - xmin)
x[i] := A + B*t[i]
# y dimension
jmax := n
j := 1 .. jmax
jmax = 4
ymin := 0
ymax := π
# map interval into [-1,+1]
C := 0.5*(ymax + ymin)
D := 0.5*(ymax - ymin)
y[j] := C + D*t[j]
A = 1.5708
B = 1.5708
C = 1.5708
D = 1.5708
# tabulate function values on a 2-D grid
f[i, j] := F(x[i], y[j])
imax*jmax = 16  # is the 2-D quadrature grid size
# number of function evaluations
f = [
    1.5469, 3.50742, 10.2059, 23.1407;
    3.50742, 7.95269, 23.1407, 52.4689;
    10.2059, 23.1407, 67.3346, 152.674;
    23.1407, 52.4689, 152.674, 346.171
]
i = [1; 2; 3; 4]
j = [1; 2; 3; 4]
imax*jmax = 16
# Gauss quadrature value
SG := B*D*sum(sum(w[i]*w[j]*f[i, j], j), i)
SG = 490.206
# integral of F(x,y)
exact_value_x := exp(xmax) - exp(xmin)
exact_value_y := exp(ymax) - exp(ymin)
exact_value := exact_value_x*exact_value_y
exact_value = 490.21
# Gauss quadrature
SG = 490.206
error := |exact_value - SG|
error = 0.00379461
imax*jmax = 16  # function evaluations  # correct to 4 significant figures
# ----------------------------------------------------------------------------------------------------------------------------------------------
