# ----------------------------------------------------------------------------------------------------------------------------------------------
# EXAMPLE  9.1 : Euler formula for du/dx = -u(x) for step sizes 0.1 and 0.05
# ----------------------------------------------------------------------------------------------------------------------------------------------
# Exact solution to compare
F(x) := exp(-x)
N := 20
ORIGIN := 0
# argument values and tabulate evenly spaced grid in 1-D with step h
imax := N
i := 0 .. imax + 1
j := 0 .. imax
k := 0, 2 .. 20
h := 0.1
x[i] := i*h
u[0] := 1
# initial argument
x[0] = 0
# exact value
F(x[0]) = 1
F(x[0]) - u[0] = 0
# Euler estimate
u[j + 1] := u[j] - h*u[j]
error[j + 1] := |F(x[j + 1]) - u[j + 1]|
rel_err[j + 1] := error[j + 1]*(F(x[j + 1])^-1)
# argument | Euler estimate | exact value | absolute error | relative error
x[k] = [0; 0.2; 0.4; 0.6; 0.8; 1; 1.2; 1.4; 1.6; 1.8; 2]
u[k] = [1; 0.81; 0.6561; 0.531441; 0.430467; 0.348678; 0.28243; 0.228768; 0.185302; 0.150095; 0.121577]
F(x[k]) = [1; 0.818731; 0.67032; 0.548812; 0.449329; 0.367879; 0.301194; 0.246597; 0.201897; 0.165299; 0.135335]
error[k] = [0; 0.00873075; 0.01422; 0.0173706; 0.0188618; 0.019201; 0.0187647; 0.017829; 0.0165945; 0.0152043; 0.0137586]
rel_err[k] = [0; 0.0106638; 0.0212138; 0.0316514; 0.0419776; 0.0521937; 0.0623009; 0.0723003; 0.0821931; 0.0919804; 0.101663]
# [plot: error[j] vs x[j]]
# the error on a log scale grows as the argument increases and levels off
h := 0.05
x[i] := i*h
u[0] := 1
# initial argument
x[0] = 0
# exact value
F(x[0]) = 1
F(x[0]) + u[0] = 2
# Euler estimate
u[j + 1] := u[j] - h*u[j]
error[j + 1] := |F(x[j + 1]) - u[j + 1]|
rel_err[j + 1] := error[j + 1]*(F(x[j + 1])^-1)
# argument | Euler estimate | exact value | absolute error | relative error
x[k] = [0; 0.1; 0.2; 0.3; 0.4; 0.5; 0.6; 0.7; 0.8; 0.9; 1]
u[k] = [1; 0.9025; 0.814506; 0.735092; 0.66342; 0.598737; 0.54036; 0.487675; 0.440127; 0.397214; 0.358486]
F(x[k]) = [1; 0.904837; 0.818731; 0.740818; 0.67032; 0.606531; 0.548812; 0.496585; 0.449329; 0.40657; 0.367879]
error[k] = [0; 0.00233742; 0.0042245; 0.00572633; 0.00689961; 0.00779372; 0.00845155; 0.00891032; 0.0092023; 0.00935534; 0.00939352]
rel_err[k] = [0; 0.00258325; 0.00515982; 0.00772974; 0.010293; 0.0128497; 0.0153997; 0.0179432; 0.0204801; 0.0230104; 0.0255342]
# [plot: error[j] vs x[j]]
# compare the error on a log scale at half the step size h on the same interval [0,1]
# the error at x=1 is approximately halved at half the step size
# ----------------------------------------------------------------------------------------------------------------------------------------------
