# ----------------------------------------------------------------------------------------------------------------------------------------------
# EXAMPLE  9.10: RK order 4 formula for du/dx = -u(x) for step sizes 0.1 and 0.05
# ----------------------------------------------------------------------------------------------------------------------------------------------
# Exact solution to compare
F(x) := exp(-x)
N := 20
ORIGIN := 0
# argument values and tabulate evenly spaced grid in 1-D with step h
imax := N
i := 0 .. imax + 1
j := 0 .. imax
k := 0, 2 .. 20
h := 0.1
x[i] := i*h  # given initial value (IV)
u[0] := 1
# initial argument value
x[0] := 0
# exact value
F(x[0]) = 1
# RK order 4 parameters
w[1] := 1/8
w[2] := 3/8
w[3] := 3/8
w[4] := 1/8
a21 := 1/3
a31 := -1/3
a32 := 1
a41 := 1
a42 := -1
a43 := 1
c[1] := 0
c[2] := a21
c[3] := a31 + a32
c[4] := a41 + a42 + a43
# define right hand side
f(u) := -u
# check IV
f(u[0]) = -1
# Perform iteration loop over j=0,..,20 and store result in vector  RK_u on the grid
RK_u :=
    u[0] ← 1
    h ← 0.1
    for j ∈ 0 .. 20
        R1[j] ← h*f(u[j])
        R2[j] ← h*f(u[j] + a21*R1[j])
        R3[j] ← h*f(u[j] + a31*R1[j] + a32*R2[j])
        R4[j] ← h*f(u[j] + a41*R1[j] + a42*R2[j] + a43*R3[j])
        u[j + 1] ← u[j] + w[1]*R1[j] + w[2]*R2[j] + w[3]*R3[j] + w[4]*R4[j]
        x[j + 1] ← (j + 1)*h
    u
# inspect the error at selected argument values
error[j + 1] := |F(x[j + 1]) - RK_u[j + 1]|
rel_err[j + 1] := error[j + 1]*(F(x[j + 1])^-1)
# RK estimate | exact value | absolute error | relative error
x[k] = [0; 0.2; 0.4; 0.6; 0.8; 1; 1.2; 1.4; 1.6; 1.8; 2]
RK_u[k] = [1; 0.818731; 0.67032; 0.548812; 0.449329; 0.36788; 0.301195; 0.246597; 0.201897; 0.165299; 0.135336]
F(x[k]) = [1; 0.818731; 0.67032; 0.548812; 0.449329; 0.367879; 0.301194; 0.246597; 0.201897; 0.165299; 0.135335]
error[k] = [0; 1.48328e-7; 2.42882e-7; 2.98282e-7; 3.25617e-7; 3.33241e-7; 3.27402e-7; 3.12729e-7; 2.92619e-7; 2.69523e-7; 2.45185e-7]
rel_err[k] = [0; 1.81169e-7; 3.62337e-7; 5.43506e-7; 7.24674e-7; 9.05843e-7; 1.08701e-6; 1.26818e-6; 1.44935e-6; 1.63052e-6; 1.81169e-6]
# [plot: error[j] vs x[j]]
# the error on a log scale grows as the argument increases then levels off
# Repeat for half the step size
h := 0.05
x[i] := i*h
# Perform iteration loop over j=0,..,20 and store result in vector  RK_u on the grid
RK_u :=
    u[0] ← 1
    h ← 0.05
    for j ∈ 0 .. 20
        R1[j] ← h*f(u[j])
        R2[j] ← h*f(u[j] + a21*R1[j])
        R3[j] ← h*f(u[j] + a31*R1[j] + a32*R2[j])
        R4[j] ← h*f(u[j] + a41*R1[j] + a42*R2[j] + a43*R3[j])
        u[j + 1] ← u[j] + w[1]*R1[j] + w[2]*R2[j] + w[3]*R3[j] + w[4]*R4[j]
        x[j + 1] ← (j + 1)*h
    u
# inspect the error at selected argument values
error[j + 1] := |F(x[j + 1]) - RK_u[j + 1]|
rel_err[j + 1] := error[j + 1]*(F(x[j + 1])^-1)
# RK estimate | exact value | absolute error | relative error
x[k] = [0; 0.1; 0.2; 0.3; 0.4; 0.5; 0.6; 0.7; 0.8; 0.9; 1]
RK_u[k] = [1; 0.904837; 0.818731; 0.740818; 0.67032; 0.606531; 0.548812; 0.496585; 0.449329; 0.40657; 0.367879]
F(x[k]) = [1; 0.904837; 0.818731; 0.740818; 0.67032; 0.606531; 0.548812; 0.496585; 0.449329; 0.40657; 0.367879]
error[k] = [0; 4.91333e-9; 8.89152e-9; 1.20681e-8; 1.45595e-8; 1.64675e-8; 1.78805e-8; 1.88754e-8; 1.95191e-8; 1.98693e-8; 1.99761e-8]
rel_err[k] = [0; 5.43007e-9; 1.08601e-8; 1.62902e-8; 2.17203e-8; 2.71503e-8; 3.25804e-8; 3.80105e-8; 4.34405e-8; 4.88706e-8; 5.43007e-8]
# [plot: error[j] vs x[j]]
# compare the error on a log scale at half the step size h on the same interval [0,1]
# the the relative error at x=1 is more than 16 times smaller at half the step size
# ----------------------------------------------------------------------------------------------------------------------------------------------
