# ----------------------------------------------------------------------------------------------------------------------------------------------
# EXAMPLE  9.11: RK order 4 formula for du/dx = u(x) for step sizes 0.1 and 0.05
# ----------------------------------------------------------------------------------------------------------------------------------------------
# Exact solution to compare
F(x) := exp(x)
N := 20
ORIGIN := 0
# argument values and tabulate evenly spaced grid in 1-D with step h
imax := N
i := 0 .. imax + 1
j := 0 .. imax
k := 0, 2 .. 20
h := 0.1
x[i] := i*h  # given initial value (IV)
u[0] := 1
# initial argument value
x[0] := 0
# exact value
F(x[0]) = 1
# RK order 4 parameters
w[1] := 1/8
w[2] := 3/8
w[3] := 3/8
w[4] := 1/8
a21 := 1/3
a31 := -1/3
a32 := 1
a41 := 1
a42 := -1
a43 := 1
c[1] := 0
c[2] := a21
c[3] := a31 + a32
c[4] := a41 + a42 + a43
# define right hand side
f(u) := u
# check IV
f(u[0]) = 1
# Perform iteration loop over j=0,..,20 and store result in vector  RK_u on the grid
RK_u :=
    u[0] ← 1
    h ← 0.1
    for j ∈ 0 .. 20
        R1[j] ← h*f(u[j])
        R2[j] ← h*f(u[j] + a21*R1[j])
        R3[j] ← h*f(u[j] + a31*R1[j] + a32*R2[j])
        R4[j] ← h*f(u[j] + a41*R1[j] + a42*R2[j] + a43*R3[j])
        u[j + 1] ← u[j] + w[1]*R1[j] + w[2]*R2[j] + w[3]*R3[j] + w[4]*R4[j]
        x[j + 1] ← (j + 1)*h
    u
# inspect the error at selected argument values
error[j + 1] := |F(x[j + 1]) - RK_u[j + 1]|
rel_err[j + 1] := error[j + 1]*(F(x[j + 1])^-1)
# RK estimate | exact value | absolute error | relative error
x[k] = [0; 0.2; 0.4; 0.6; 0.8; 1; 1.2; 1.4; 1.6; 1.8; 2]
RK_u[k] = [1; 1.2214; 1.49182; 1.82212; 2.22554; 2.71828; 3.32011; 4.0552; 4.95303; 6.04964; 7.38904]
F(x[k]) = [1; 1.2214; 1.49182; 1.82212; 2.22554; 2.71828; 3.32012; 4.0552; 4.95303; 6.04965; 7.38906]
error[k] = [0; 1.87309e-7; 4.57561e-7; 8.38299e-7; 1.3652e-6; 2.08432e-6; 3.05496e-6; 4.35322e-6; 6.07662e-6; 8.34974e-6; 1.13316e-5]
rel_err[k] = [0; 1.53356e-7; 3.06712e-7; 4.60068e-7; 6.13424e-7; 7.6678e-7; 9.20136e-7; 1.07349e-6; 1.22685e-6; 1.3802e-6; 1.53356e-6]
# [plot: error[j] vs x[j]]
# the error on a log scale grows as the argument increases then levels off
# Repeat for half the step size
h := 0.05
x[i] := i*h
# Perform iteration loop over j=0,..,20 and store result in vector  RK_u on the grid
RK_u :=
    u[0] ← 1
    h ← 0.05
    for j ∈ 0 .. 20
        R1[j] ← h*f(u[j])
        R2[j] ← h*f(u[j] + a21*R1[j])
        R3[j] ← h*f(u[j] + a31*R1[j] + a32*R2[j])
        R4[j] ← h*f(u[j] + a41*R1[j] + a42*R2[j] + a43*R3[j])
        u[j + 1] ← u[j] + w[1]*R1[j] + w[2]*R2[j] + w[3]*R3[j] + w[4]*R4[j]
        x[j + 1] ← (j + 1)*h
    u
# inspect the error at selected argument values
error[j + 1] := |F(x[j + 1]) - RK_u[j + 1]|
rel_err[j + 1] := error[j + 1]*(F(x[j + 1])^-1)
# RK estimate | exact value | absolute error | relative error
x[k] = [0; 0.1; 0.2; 0.3; 0.4; 0.5; 0.6; 0.7; 0.8; 0.9; 1]
RK_u[k] = [1; 1.10517; 1.2214; 1.34986; 1.49182; 1.64872; 1.82212; 2.01375; 2.22554; 2.4596; 2.71828]
F(x[k]) = [1; 1.10517; 1.2214; 1.34986; 1.49182; 1.64872; 1.82212; 2.01375; 2.22554; 2.4596; 2.71828]
error[k] = [0; 5.52133e-9; 1.2204e-8; 2.02313e-8; 2.9812e-8; 4.11843e-8; 5.46188e-8; 7.04236e-8; 8.89487e-8; 1.10591e-7; 1.35803e-7]
rel_err[k] = [0; 4.9959e-9; 9.99181e-9; 1.49877e-8; 1.99836e-8; 2.49795e-8; 2.99754e-8; 3.49713e-8; 3.99672e-8; 4.49631e-8; 4.9959e-8]
# [plot: error[j] vs x[j]]
# compare the error on a log scale at half the step size h on the same interval [0,1]
# the the relative error at x=1 is more than 15 times smaller at half the step size
# ----------------------------------------------------------------------------------------------------------------------------------------------
