# ----------------------------------------------------------------------------------------------------------------------------------------------
# EXAMPLE  9.15: PC order 3 formula for du/dx =1-u(x) for step size 0.1
# ----------------------------------------------------------------------------------------------------------------------------------------------
# Exact solution to compare
F(x) := 1 - exp(-x)
N := 10
ORIGIN := 0
# argument values and tabulate evenly spaced grid in 1-D with step h
imax := N
i := 0 .. imax + 1
h := 0.1
x[i] := i*h  # given initial value (IV)
u[0] := 0
# initial argument value
x[0] := 0
# exact value
F(x[0]) = 0
# define right hand side
f(u) := 1 - u
# check IV
f(u[0]) = 1
# RK order 2 parameters
w[1] := 1/2
w[2] := 1/2
a21 := 1
c[1] := 0
c[2] := a21
# Predictor order  K and parameters
K := 3
# predictor parameters
p[1] := 23/12
p[2] := -16/12
p[3] := 5/12
# Corrector order and parameters
K - 1 = 2  # corrector parameters
c[0] := 5/12
c[1] := 8/12
c[2] := -1/12
# first predictor step needs starting values at
x[1] = 0.1
x[2] = 0.2
RK_u :=
    u[0] ← 0
    h ← 0.1
    for j ∈ 0 .. 2
        R1[j] ← h*f(u[j])
        R2[j] ← h*f(u[j] + a21*R1[j])
        u[j + 1] ← u[j] + w[1]*R1[j] + w[2]*R2[j]
        x[j + 1] ← (j + 1)*h
    u
# use order 2 RK for initial values of u and f(u) over j=1 and 2 then store result in vector  RK_u on the grid
# then start the predictor-corrector iteration
PC_u :=
    h ← 0.1
    for j ∈ 3 .. N
        RK_u[j] ← RK_u[j - 1] + h*(p[1]*f(RK_u[j - 1]) + p[2]*f(RK_u[j - 2]) + p[3]*f(RK_u[j - 3]))
        RK_u[j] ← RK_u[j - 1] + h*(c[0]*f(RK_u[j]) + c[1]*f(RK_u[j - 1]) + c[2]*f(RK_u[j - 2]))
    RK_u
# inspect error
j := 1 .. N
error[j] := |F(x[j]) - PC_u[j]|
rel_err[j] := error[j]*(F(x[j])^-1)
# PC estimate | exact value | absolute error | relative error
x[j] = [0.1; 0.2; 0.3; 0.4; 0.5; 0.6; 0.7; 0.8; 0.9; 1]
PC_u[j] = [0.095; 0.180975; 0.258912; 0.329432; 0.393241; 0.450978; 0.503221; 0.550493; 0.593267; 0.63197]
F(x[j]) = [0.0951626; 0.181269; 0.259182; 0.32968; 0.393469; 0.451188; 0.503415; 0.550671; 0.59343; 0.632121]
error[j] = [0.000162582; 0.000294247; 0.000269896; 0.000248186; 0.00022841; 0.000210147; 0.000193291; 0.000177741; 0.000163399; 0.000150178]
rel_err[j] = [0.00170847; 0.00162326; 0.00104134; 0.00075281; 0.000580502; 0.000465763; 0.00038396; 0.000322771; 0.000275347; 0.000237578]
# [plot: error[j] vs x[j]]
# inspect the error on a log scale for the interval [0,1]
# the relative error at x=1 is more than 4 times smaller with one PC iteration compared to order 2 RK
# ----------------------------------------------------------------------------------------------------------------------------------------------
