# ----------------------------------------------------------------------------------------------------------------------------------------------
# EXAMPLE  9.16: PC order 4 formula for du/dx = -u(x) for step size 0.1
# ----------------------------------------------------------------------------------------------------------------------------------------------
# Exact solution to compare
F(x) := exp(-x)
N := 10
ORIGIN := 0
# argument values and tabulate evenly spaced grid in 1-D with step h
imax := N
i := 0 .. imax + 1
h := 0.1
x[i] := i*h  # given initial value (IV)
u[0] := 1
# initial argument value
x[0] := 0
# exact value
F(x[0]) = 1
# define right hand side
f(u) := -u
# check IV
f(u[0]) = -1
# RK order 3 parameters
w[1] := 1/4
w[2] := 3/8
w[3] := 3/8
a21 := 2/3
a31 := 0
a32 := 2/3
c[1] := 0
c[2] := a21
c[3] := a31 + a32
# Predictor order  K and parameters
K := 4
# predictor parameters
p[1] := 55/24
p[2] := -59/24
p[3] := 37/24
p[4] := -9/24
# Corrector order and parameters
K - 1 = 3  # corrector parameters
c[0] := 9/24
c[1] := 19/24
c[2] := -5/24
c[3] := 1/24
# first predictor step needs starting values at
RK_u :=
    u[0] ← 1
    h ← 0.1
    for j ∈ 0 .. 3
        R1[j] ← h*f(u[j])
        R2[j] ← h*f(u[j] + a21*R1[j])
        R3[j] ← h*f(u[j] + a31*R1[j] + a32*R2[j])
        u[j + 1] ← u[j] + w[1]*R1[j] + w[2]*R2[j] + w[3]*R3[j]
        x[j + 1] ← (j + 1)*h
    u
x[1] = 0.1
x[2] = 0.2
x[3] = 0.3
# use order 3 RK for initial values of u and f(u) over j=1,.., 3 then store result in vector  RK_u on the grid
# then start the predictor-corrector iteration
PC_u :=
    h ← 0.1
    for j ∈ 4 .. N
        RK_u[j] ← RK_u[j - 1] + h*(p[1]*f(RK_u[j - 1]) + p[2]*f(RK_u[j - 2]) + p[3]*f(RK_u[j - 3]) + p[4]*f(RK_u[j - 4]))
        RK_u[j] ← RK_u[j - 1] + h*(c[0]*f(RK_u[j]) + c[1]*f(RK_u[j - 1]) + c[2]*f(RK_u[j - 2]) + c[3]*f(RK_u[j - 3]))
    RK_u
# inspect error
j := 0 .. N
error[j] := |F(x[j]) - PC_u[j]|
rel_err[j] := error[j]*(F(x[j])^-1)
# PC estimate | exact value | absolute error | relative error
x[j] = [0; 0.1; 0.2; 0.3; 0.4; 0.5; 0.6; 0.7; 0.8; 0.9; 1]
PC_u[j] = [1; 0.904833; 0.818723; 0.740808; 0.670311; 0.606522; 0.548803; 0.496578; 0.449322; 0.406563; 0.367873]
F(x[j]) = [1; 0.904837; 0.818731; 0.740818; 0.67032; 0.606531; 0.548812; 0.496585; 0.449329; 0.40657; 0.367879]
error[j] = [0; 4.0847e-6; 7.39197e-6; 1.00328e-5; 9.35016e-6; 8.74216e-6; 8.16493e-6; 7.61411e-6; 7.0943e-6; 6.60447e-6; 6.14361e-6]
rel_err[j] = [0; 4.51429e-6; 9.02857e-6; 1.35428e-5; 1.39488e-5; 1.44134e-5; 1.48775e-5; 1.53329e-5; 1.57887e-5; 1.62444e-5; 1.67001e-5]
# [plot: error[j] vs x[j]]
# inspect the error on a log scale for the interval [0,1]
# the the relative error at x=1 is more than 2.5 times smaller with one PC iteration compared to order 3 RK
# ----------------------------------------------------------------------------------------------------------------------------------------------
