# ----------------------------------------------------------------------------------------------------------------------------------------------
# EXAMPLE  9.17: PC order 4 formula for du/dx = u(x) for step size 0.1
# ----------------------------------------------------------------------------------------------------------------------------------------------
# Exact solution to compare
F(x) := exp(x)
N := 10
ORIGIN := 0
# argument values and tabulate evenly spaced grid in 1-D with step h
imax := N
i := 0 .. imax + 1
h := 0.1
x[i] := i*h  # given initial value (IV)
u[0] := 1
# initial argument value
x[0] := 0
# exact value
F(x[0]) = 1
# define right hand side
f(u) := u
# check IV
f(u[0]) = 1
# RK order 3 parameters
w[1] := 1/4
w[2] := 3/8
w[3] := 3/8
a21 := 2/3
a31 := 0
a32 := 2/3
c[1] := 0
c[2] := a21
c[3] := a31 + a32
# Predictor order  K and parameters
K := 4
# predictor parameters
p[1] := 55/24
p[2] := -59/24
p[3] := 37/24
p[4] := -9/24
# Corrector order and parameters
K - 1 = 3  # corrector parameters
c[0] := 9/24
c[1] := 19/24
c[2] := -5/24
c[3] := 1/24
# first predictor step needs starting values at
RK_u :=
    u[0] ← 1
    h ← 0.1
    for j ∈ 0 .. 3
        R1[j] ← h*f(u[j])
        R2[j] ← h*f(u[j] + a21*R1[j])
        R3[j] ← h*f(u[j] + a31*R1[j] + a32*R2[j])
        u[j + 1] ← u[j] + w[1]*R1[j] + w[2]*R2[j] + w[3]*R3[j]
        x[j + 1] ← (j + 1)*h
    u
x[1] = 0.1
x[2] = 0.2
x[3] = 0.3
# use order 2 RK for initial values of u and f(u) over j=1,.., 3 then store result in vector  RK_u on the grid
# then start the predictor-corrector iteration
PC_u :=
    h ← 0.1
    for j ∈ 4 .. N
        RK_u[j] ← RK_u[j - 1] + h*(p[1]*f(RK_u[j - 1]) + p[2]*f(RK_u[j - 2]) + p[3]*f(RK_u[j - 3]) + p[4]*f(RK_u[j - 4]))
        RK_u[j] ← RK_u[j - 1] + h*(c[0]*f(RK_u[j]) + c[1]*f(RK_u[j - 1]) + c[2]*f(RK_u[j - 2]) + c[3]*f(RK_u[j - 3]))
    RK_u
# inspect error
j := 0 .. N
error[j] := |F(x[j]) - PC_u[j]|
rel_err[j] := error[j]*(F(x[j])^-1)
# PC estimate | exact value | absolute error | relative error
x[j] = [0; 0.1; 0.2; 0.3; 0.4; 0.5; 0.6; 0.7; 0.8; 0.9; 1]
PC_u[j] = [1; 1.10517; 1.22139; 1.34984; 1.49181; 1.6487; 1.8221; 2.01373; 2.22552; 2.45958; 2.71825]
F(x[j]) = [1; 1.10517; 1.2214; 1.34986; 1.49182; 1.64872; 1.82212; 2.01375; 2.22554; 2.4596; 2.71828]
error[j] = [0; 4.25141e-6; 9.39705e-6; 1.5578e-5; 1.71018e-5; 1.86563e-5; 2.03922e-5; 2.22813e-5; 2.43415e-5; 2.65886e-5; 2.90393e-5]
rel_err[j] = [0; 3.84683e-6; 7.69365e-6; 1.15405e-5; 1.14637e-5; 1.13156e-5; 1.11915e-5; 1.10645e-5; 1.09373e-5; 1.08101e-5; 1.06829e-5]
# [plot: error[j] vs x[j]]
# inspect the error on a log scale for the interval [0,1]
# the the relative error at x=1 is more than 3.5 times smaller with one PC iteration compared to order 3 RK
# ----------------------------------------------------------------------------------------------------------------------------------------------
