# ----------------------------------------------------------------------------------------------------------------------------------------------
# EXAMPLE  9.18: PC order 4 formula for du/dx = 1-u(x) for step size 0.1
# ----------------------------------------------------------------------------------------------------------------------------------------------
# Exact solution to compare
F(x) := 1 - exp(-x)
N := 10
ORIGIN := 0
# argument values and tabulate evenly spaced grid in 1-D with step h
imax := N
i := 0 .. imax + 1
h := 0.1
x[i] := i*h  # given initial value (IV)
u[0] := 0
# initial argument value
x[0] := 0
# exact value
F(x[0]) = 0
# define right hand side
f(u) := 1 - u
# check IV
f(u[0]) = 1
# RK order 3 parameters
w[1] := 1/4
w[2] := 3/8
w[3] := 3/8
a21 := 2/3
a31 := 0
a32 := 2/3
c[1] := 0
c[2] := a21
c[3] := a31 + a32
# Predictor order  K and parameters
K := 4
# predictor parameters
p[1] := 55/24
p[2] := -59/24
p[3] := 37/24
p[4] := -9/24
# Corrector order and parameters
K - 1 = 3  # corrector parameters
c[0] := 9/24
c[1] := 19/24
c[2] := -5/24
c[3] := 1/24
# first predictor step needs starting values at
RK_u :=
    u[0] ← 0
    h ← 0.1
    for j ∈ 0 .. 3
        R1[j] ← h*f(u[j])
        R2[j] ← h*f(u[j] + a21*R1[j])
        R3[j] ← h*f(u[j] + a31*R1[j] + a32*R2[j])
        u[j + 1] ← u[j] + w[1]*R1[j] + w[2]*R2[j] + w[3]*R3[j]
        x[j + 1] ← (j + 1)*h
    u
x[1] = 0.1
x[2] = 0.2
x[3] = 0.3
# use order 2 RK for initial values of u and f(u) over j=1,.., 3 then store result in vector  RK_u on the grid
# then start the predictor-corrector iteration
PC_u :=
    h ← 0.1
    for j ∈ 4 .. N
        RK_u[j] ← RK_u[j - 1] + h*(p[1]*f(RK_u[j - 1]) + p[2]*f(RK_u[j - 2]) + p[3]*f(RK_u[j - 3]) + p[4]*f(RK_u[j - 4]))
        RK_u[j] ← RK_u[j - 1] + h*(c[0]*f(RK_u[j]) + c[1]*f(RK_u[j - 1]) + c[2]*f(RK_u[j - 2]) + c[3]*f(RK_u[j - 3]))
    RK_u
# inspect error
j := 1 .. N
error[j] := |F(x[j]) - PC_u[j]|
rel_err[j] := error[j]*(F(x[j])^-1)
# PC estimate | exact value | absolute error | relative error
x[j] = [0.1; 0.2; 0.3; 0.4; 0.5; 0.6; 0.7; 0.8; 0.9; 1]
PC_u[j] = [0.0951667; 0.181277; 0.259192; 0.329689; 0.393478; 0.451197; 0.503422; 0.550678; 0.593437; 0.632127]
F(x[j]) = [0.0951626; 0.181269; 0.259182; 0.32968; 0.393469; 0.451188; 0.503415; 0.550671; 0.59343; 0.632121]
error[j] = [4.0847e-6; 7.39197e-6; 1.00328e-5; 9.35016e-6; 8.74216e-6; 8.16493e-6; 7.61411e-6; 7.0943e-6; 6.60447e-6; 6.14361e-6]
rel_err[j] = [4.29234e-5; 4.07789e-5; 3.87094e-5; 2.83613e-5; 2.22181e-5; 1.80965e-5; 1.51249e-5; 1.2883e-5; 1.11293e-5; 9.71905e-6]
# [plot: error[j] vs x[j]]
# inspect the error on a log scale for the interval [0,1]
# the the relative error at x=1 is more than 2.5 times smaller with one PC iteration compared to order 3 RK
# ----------------------------------------------------------------------------------------------------------------------------------------------
