# ----------------------------------------------------------------------------------------------------------------------------------------------
# EXAMPLE  9.19: RK order 4 formula for stiff ODE with step size 0.01
# ----------------------------------------------------------------------------------------------------------------------------------------------
ORIGIN := 0
# Define auxiliary function FF(x) and the derivative dFF
FF(x) := 10 - (10 + x)*exp(-x)
x[0] := 0
N := 1000
dFF(x) := 9*exp(-x) + x*exp(-x)
dFF(x[0]) = 9
# Exact solution to compare
F(x) := FF(x) + 10*exp(-200*x)
F(x[0]) = 10
# define right hand side
f(x, u) := -200*(u - FF(x)) + dFF(x)
u[0] := 10
# check IV
f(x[0], u[0]) = -1991
# argument values and evenly spaced grid in 1-D with step h
imax := N
i := 0 .. imax + 1
j := 0 .. imax
h := 0.01
x[i] := i*h
# RK order 4 parameters
w[1] := 1/8
w[2] := 3/8
w[3] := 3/8
w[4] := 1/8
a21 := 1/3
a31 := -1/3
a32 := 1
a41 := 1
a42 := -1
a43 := 1
c[1] := 0
c[2] := a21
c[3] := a31 + a32
c[4] := a41 + a42 + a43
# Perform iteration loop over j=0,..,N and store result in vector  RK_u on the grid
RK_u :=
    u[0] ← 10
    h ← 0.01
    for j ∈ 0 .. N
        R1[j] ← h*f(x[j], u[j])
        R2[j] ← h*f(x[j], u[j] + a21*R1[j])
        R3[j] ← h*f(x[j], u[j] + a31*R1[j] + a32*R2[j])
        R4[j] ← h*f(x[j], u[j] + a41*R1[j] + a42*R2[j] + a43*R3[j])
        u[j + 1] ← u[j] + w[1]*R1[j] + w[2]*R2[j] + w[3]*R3[j] + w[4]*R4[j]
        x[j + 1] ← (j + 1)*h
    u
# number of function evaluations
4*N = 4000
# inspect the error at selected argument values
error[j + 1] := |F(x[j + 1]) - RK_u[j + 1]|
rel_err[j + 1] := error[j + 1]*(F(x[j + 1])^-1)
# [plot: error[j] vs x[j]]
# inspect the error on a log scale for the interval [0,10]
# the the relative error is large close to the start, but declines steadily as x increases
k := 0, 100 .. N  # RK estimate  # exact value  # absolute error
# relative error
x[k] = [0; 1; 2; 3; 4; 5; 6; 7; 8; 9; 10]
RK_u[k] = [10; 5.91629; 8.36099; 9.34675; 9.74118; 9.89798; 9.95997; 9.98435; 9.9939; 9.99763; 9.99908]
F(x[k]) = [10; 5.95333; 8.37598; 9.35277; 9.74358; 9.89893; 9.96034; 9.9845; 9.99396; 9.99766; 9.99909]
error[k] = [0; 0.0370381; 0.0149892; 0.00601584; 0.00239764; 0.000949933; 0.000374436; 0.000146935; 5.74344e-5; 2.23724e-5; 8.68776e-6]
rel_err[k] = [0; 0.00622142; 0.00178954; 0.000643215; 0.000246074; 9.59632e-5; 3.75927e-5; 1.47163e-5; 5.74691e-6; 2.23776e-6; 8.68855e-7]
# [plot: error[j] vs x[j]]
# inspect the error on a log scale for the interval [0,0.4]
# the the relative error is large close to the start
j := 0, 1 .. 40
k := 0, 4 .. 40  # RK estimate  # exact value  # absolute error
# relative error
x[k] = [0; 0.04; 0.08; 0.12; 0.16; 0.2; 0.24; 0.28; 0.32; 0.36; 0.4]
RK_u[k] = [10; 0.39081; 0.612143; 0.942953; 1.26364; 1.57312; 1.87176; 2.15993; 2.43801; 2.70633; 2.96524]
F(x[k]) = [10; 0.357029; 0.694988; 1.02437; 1.34222; 1.64895; 1.94493; 2.23054; 2.50614; 2.77207; 3.02867]
error[k] = [0; 0.0337818; 0.0828456; 0.0814123; 0.0785815; 0.0758305; 0.0731741; 0.0706095; 0.0681336; 0.0657432; 0.0634355]
rel_err[k] = [0; 0.0946192; 0.119204; 0.0794758; 0.0585459; 0.0459872; 0.037623; 0.0316558; 0.0271866; 0.0237162; 0.020945]
# ----------------------------------------------------------------------------------------------------------------------------------------------
