# ----------------------------------------------------------------------------------------------------------------------------------------------
# EXAMPLE  9.2 : Euler formula for du/dx = u(x) for step sizes 0.1 and 0.05
# ----------------------------------------------------------------------------------------------------------------------------------------------
# Exact solution to compare
F(x) := exp(x)
N := 20
ORIGIN := 0
# argument values and tabulate evenly spaced grid in 1-D with step h
imax := N
i := 0 .. imax + 1
j := 0 .. imax
k := 0, 2 .. 20
h := 0.1
x[i] := i*h
u[0] := 1
# initial argument
x[0] = 0
# exact value
F(x[0]) = 1
F(x[0]) + u[0] = 2
# Euler estimate
u[j + 1] := u[j] + h*u[j]
error[j + 1] := |F(x[j + 1]) - u[j + 1]|
rel_err[j + 1] := error[j + 1]*(F(x[j + 1])^-1)
# argument | Euler estimate | exact value | absolute error | relative error
x[k] = [0; 0.2; 0.4; 0.6; 0.8; 1; 1.2; 1.4; 1.6; 1.8; 2]
u[k] = [1; 1.21; 1.4641; 1.77156; 2.14359; 2.59374; 3.13843; 3.7975; 4.59497; 5.55992; 6.7275]
F(x[k]) = [1; 1.2214; 1.49182; 1.82212; 2.22554; 2.71828; 3.32012; 4.0552; 4.95303; 6.04965; 7.38906]
error[k] = [0; 0.0114028; 0.0277247; 0.0505578; 0.0819521; 0.124539; 0.181689; 0.257702; 0.358059; 0.48973; 0.661556]
rel_err[k] = [0; 0.00933579; 0.0185844; 0.0277467; 0.0368235; 0.0458155; 0.0547235; 0.0635484; 0.072291; 0.0809518; 0.0895319]
# [plot: error[j] vs x[j]]
# the error on a log scale grows as the argument increases
h := 0.05
x[i] := i*h
u[0] := 1
# initial argument
x[0] = 0
# exact value
F(x[0]) = 1
F(x[0]) + u[0] = 2
# Euler estimate
u[j + 1] := u[j] + h*u[j]
error[j + 1] := |F(x[j + 1]) - u[j + 1]|
rel_err[j + 1] := error[j + 1]*(F(x[j + 1])^-1)
# argument | Euler estimate | exact value | absolute error | relative error
x[k] = [0; 0.1; 0.2; 0.3; 0.4; 0.5; 0.6; 0.7; 0.8; 0.9; 1]
u[k] = [1; 1.1025; 1.21551; 1.3401; 1.47746; 1.62889; 1.79586; 1.97993; 2.18287; 2.40662; 2.6533]
F(x[k]) = [1; 1.10517; 1.2214; 1.34986; 1.49182; 1.64872; 1.82212; 2.01375; 2.22554; 2.4596; 2.71828]
error[k] = [0; 0.00267092; 0.00589651; 0.00976317; 0.0143693; 0.0198266; 0.0262625; 0.0338211; 0.0426663; 0.0529839; 0.0649841]
rel_err[k] = [0; 0.00241675; 0.00482765; 0.00723273; 0.009632; 0.0120255; 0.0144132; 0.0167951; 0.0191712; 0.0215416; 0.0239063]
# [plot: error[j] vs x[j]]
# compare the error on a log scale at half the step size h on the same interval [0,1]
# the error at x=1 is approximately halved at half the step size
# ----------------------------------------------------------------------------------------------------------------------------------------------
