# ----------------------------------------------------------------------------------------------------------------------------------------------
# EXAMPLE  9.20: PC order 4 formula for stiff ODE for step size 0.005
# ----------------------------------------------------------------------------------------------------------------------------------------------
ORIGIN := 0
# Define auxiliary function FF(x) and the derivative dFF
FF(x) := 10 - (10 + x)*exp(-x)
x[0] := 0
N := 2000
dFF(x) := 9*exp(-x) + x*exp(-x)
dFF(x[0]) = 9
# Exact solution to compare
F(x) := FF(x) + 10*exp(-200*x)
F(x[0]) = 10
# define right hand side
f(x, u) := -200*(u - FF(x)) + dFF(x)
u[0] := 10
# check IV
f(x[0], u[0]) = -1991
# argument values and evenly spaced grid in 1-D with step h
imax := N
i := 0 .. imax + 1
h := 0.005
x[i] := i*h
# RK order 4 parameters
w[1] := 1/8
w[2] := 3/8
w[3] := 3/8
w[4] := 1/8
a21 := 1/3
a31 := -1/3
a32 := 1
a41 := 1
a42 := -1
a43 := 1
c[1] := 0
c[2] := a21
c[3] := a31 + a32
c[4] := a41 + a42 + a43
# Predictor order  K and parameters
K := 4
# predictor parameters
p[1] := 55/24
p[2] := -59/24
p[3] := 37/24
p[4] := -9/24
# Corrector order and parameters
K - 1 = 3  # corrector parameters
c[0] := 9/24
c[1] := 19/24
c[2] := -5/24
c[3] := 1/24
# first predictor step needs starting values at
RK_u :=
    u[0] ← 10
    h ← 0.005
    for j ∈ 0 .. 3
        R1[j] ← h*f(x[j], u[j])
        R2[j] ← h*f(x[j], u[j] + a21*R1[j])
        R3[j] ← h*f(x[j], u[j] + a31*R1[j] + a32*R2[j])
        R4[j] ← h*f(x[j], u[j] + a41*R1[j] + a42*R2[j] + a43*R3[j])
        u[j + 1] ← u[j] + w[1]*R1[j] + w[2]*R2[j] + w[3]*R3[j] + w[4]*R4[j]
        x[j + 1] ← (j + 1)*h
    u
x[1] = 0.005
x[2] = 0.01
x[3] = 0.015
# use order 4 RK for initial values of u and f(u) over j=1,.., 3 then store result in vector  RK_u on the grid
# number of function evaluations
4*N = 8000
j := 0, 1 .. 3
PC_u[j] := RK_u[j]
PC_u :=
    h ← 0.005
    for j ∈ 4 .. N
        PC_u[j] ← PC_u[j - 1] + h*(p[1]*f(x[j - 1], PC_u[j - 1]) + p[2]*f(x[j - 2], PC_u[j - 2]) + p[3]*f(x[j - 3], PC_u[j - 3]) + p[4]*f(x[j - 4], PC_u[j - 4]))
        PC_u[j] ← PC_u[j - 1] + h*(c[0]*f(x[j], PC_u[j]) + c[1]*f(x[j - 1], PC_u[j - 1]) + c[2]*f(x[j - 2], PC_u[j - 2]) + c[3]*f(x[j - 3], PC_u[j - 3]))
    PC_u
# total number of function evaluations
4*N + (N - 4)*8 = 23968
j := 0 .. 800
error[j] := |F(x[j]) - PC_u[j]|
rel_err[j] := error[j]*(F(x[j])^-1)
# [plot: error[j] vs x[j]]
# inspect the absolute error on a log scale for the interval [0,0.4]
# the error is large close to the start, but declines rapidly as x increases
# [plot: error[j] vs x[j]]
# inspect the same error on a linear scale for the interval [0,0.2]
# the the error  oscillates close to the start
k := 0, 80 .. 800  # PC estimate  # exact value  # absolute error
# relative error
x[k] = [0; 0.4; 0.8; 1.2; 1.6; 2; 2.4; 2.8; 3.2; 3.6; 4]
PC_u[k] = [10; 3.02867; 5.14725; 6.62662; 7.658; 8.37598; 8.8751; 9.22163; 9.46194; 9.6284; 9.74358]
F(x[k]) = [10; 3.02867; 5.14725; 6.62662; 7.658; 8.37598; 8.8751; 9.22163; 9.46194; 9.6284; 9.74358]
error[k] = [0; 9.61432e-9; 2.06857e-12; 1.48237e-12; 1.05693e-12; 7.53175e-13; 5.32907e-13; 3.76588e-13; 2.64677e-13; 1.86517e-13; 1.3145e-13]
rel_err[k] = [0; 3.17444e-9; 4.01878e-13; 2.23699e-13; 1.38017e-13; 8.99209e-14; 6.00452e-14; 4.08374e-14; 2.79728e-14; 1.93716e-14; 1.3491e-14]
# [plot: error[j] vs x[j]]
j := 10 .. 80
# inspect the absolute error on a log scale for the interval [0,2]
# the error is large close to the start
# [plot: error[j] vs x[j]]
# inspect the same error on a linear scale for the interval [0.2,0.365]
# the error continues to oscillate
k := 0, 40 .. 400  # RK estimate  # exact value  # absolute error
# relative error
x[k] = [0; 0.2; 0.4; 0.6; 0.8; 1; 1.2; 1.4; 1.6; 1.8; 2]
PC_u[k] = [10; 1.64902; 3.02867; 4.1826; 5.14725; 5.95333; 6.62662; 7.18879; 7.658; 8.04947; 8.37598]
F(x[k]) = [10; 1.64895; 3.02867; 4.1826; 5.14725; 5.95333; 6.62662; 7.18879; 7.658; 8.04947; 8.37598]
error[k] = [0; 6.9886e-5; 9.61432e-9; 2.96652e-13; 2.06857e-12; 1.75149e-12; 1.48237e-12; 1.25233e-12; 1.05693e-12; 8.91731e-13; 7.53175e-13]
rel_err[k] = [0; 4.23822e-5; 3.17444e-9; 7.09252e-14; 4.01878e-13; 2.94203e-13; 2.23699e-13; 1.74206e-13; 1.38017e-13; 1.10781e-13; 8.99209e-14]
# ----------------------------------------------------------------------------------------------------------------------------------------------
