# ----------------------------------------------------------------------------------------------------------------------------------------------
# EXAMPLE  9.24:  Compute matrix S for orthonormal functions w(x) for N=9
# ----------------------------------------------------------------------------------------------------------------------------------------------
# Define Chebyshev Polynomials
T0(x) := 1
T1(x) := x
T2(x) := 2*x^2 - 1
T3(x) := 4*x^3 - 3*x
T4(x) := 8*x^4 - 8*x^2 + 1
T5(x) := 16*x^5 - 20*x^3 + 5*x
T6(x) := 32*x^6 - 48*x^4 + 18*x^2 - 1
T7(x) := 64*x^7 - 112*x^5 + 56*x^3 - 7*x
T8(x) := 128*x^8 - 256*x^6 + 160*x^4 - 32*x^2 + 1
T9(x) := 256*x^9 - 576*x^7 + 432*x^5 - 120*x^3 + 9*x
T10(x) := 512*x^10 - 1280*x^8 + 1120*x^6 - 400*x^4 + 50*x^2 - 1
T11(x) := 1024*x^11 - 2816*x^9 + 2816*x^7 - 1232*x^5 + 220*x^3 - 11*x
# rows | columns
# Set index origin to 1
# and set up matrix T in e = T t
ORIGIN := 1
N := 9
k := 1 .. N
j := 1 .. N + 2
# Initialize to zero
T[k, j] := 0
S[k, j] := 0
k := 1 .. 4
T[k, 2] := -1
k := 5, 7 .. 9
T[k, 2] := -2
T[k, 1] := 1
k := 6, 8 .. 8
T[k, 1] := -1
k := 1 .. 4
T[k, 2*(k + 1)] := 1
k := 5, 6 .. 9
T[k, 2*(k - 3) - 1] := 1
# inspect matrices T and S
T = [
    0, -1, 0, 1, 0, 0, 0, 0, 0, 0, 0;
    0, -1, 0, 0, 0, 1, 0, 0, 0, 0, 0;
    0, -1, 0, 0, 0, 0, 0, 1, 0, 0, 0;
    0, -1, 0, 0, 0, 0, 0, 0, 0, 1, 0;
    1, -2, 1, 0, 0, 0, 0, 0, 0, 0, 0;
    -1, 0, 0, 0, 1, 0, 0, 0, 0, 0, 0;
    1, -2, 0, 0, 0, 0, 1, 0, 0, 0, 0;
    -1, 0, 0, 0, 0, 0, 0, 0, 1, 0, 0;
    1, -2, 0, 0, 0, 0, 0, 0, 0, 0, 1
]
S = [
    0, 0, 0, 0, 0, 0, 0, 0, 0, 0, 0;
    0, 0, 0, 0, 0, 0, 0, 0, 0, 0, 0;
    0, 0, 0, 0, 0, 0, 0, 0, 0, 0, 0;
    0, 0, 0, 0, 0, 0, 0, 0, 0, 0, 0;
    0, 0, 0, 0, 0, 0, 0, 0, 0, 0, 0;
    0, 0, 0, 0, 0, 0, 0, 0, 0, 0, 0;
    0, 0, 0, 0, 0, 0, 0, 0, 0, 0, 0;
    0, 0, 0, 0, 0, 0, 0, 0, 0, 0, 0;
    0, 0, 0, 0, 0, 0, 0, 0, 0, 0, 0
]
# set up grid in x for plots: showing full range even though only [0,1] is required
# Minimum and maximum value of the range
xmin := -1
xmax := 1
# for plots set argument range
imax := 101
i := 1 .. imax
x[i] := xmin + (i - 1)*(xmax - xmin)/(imax - 1)
# Define basis functions t(x) on this grid
t[1, i] := T0(x[i])
t[2, i] := T1(x[i])
t[3, i] := T2(x[i])
t[4, i] := T3(x[i])
t[5, i] := T4(x[i])
t[6, i] := T5(x[i])
t[7, i] := T6(x[i])
t[8, i] := T7(x[i])
t[9, i] := T8(x[i])
t[10, i] := T9(x[i])
t[11, i] := T10(x[i])
# Form linearly independent set e(x) satisfying the  boundary conditions u(0,t)=u(ρ ,t)=0
e[1, i] := T[1, 2]*t[2, i] + T[1, 4]*t[4, i]
e[4, i] := T[4, 2]*t[2, i] + T[4, 10]*t[10, i]
e[7, i] := T[7, 1]*t[1, i] + T[7, 2]*t[2, i] + T[7, 7]*t[7, i]
e[2, i] := T[2, 2]*t[2, i] + T[2, 6]*t[6, i]
e[5, i] := T[5, 1]*t[1, i] + T[5, 2]*t[2, i] + T[5, 3]*t[3, i]
e[8, i] := T[8, 1]*t[1, i] + T[8, 9]*t[9, i]
e[3, i] := T[3, 2]*t[2, i] + T[3, 8]*t[8, i]
e[6, i] := T[6, 1]*t[1, i] + T[6, 5]*t[5, i]
e[9, i] := T[9, 1]*t[1, i] + T[9, 2]*t[2, i] + T[9, 11]*t[11, i]
# inspect the 9 linearly independent functions e(x) and note that they are all zero at x=0 and x=1
# [plot: e[1, i], e[2, i], e[3, i], e[4, i] vs x[i]]
# note odd behavior of n=5, 7 and 9 for x< 0 but this is of no consequence
# [plot: e[5, i], e[6, i], e[7, i], e[8, i], e[9, i] vs x[i]]
# with the linearly independent set e(x) form the orthonormal basis w(x) in function space using the modified Gram-Schmidt (MGS) algorithm and form the matrix S for  w=St
# START WITH n = 1
# INITIALIZATION
D[k, j] := 0
# STEP 1
n := 1
e[n, i] := T[n, 2]*t[2, i] + T[n, 4]*t[4, i]
# STEP 2
d[n, i] := e[1, i]
D[n, 2] := T[1, 2]
D[n, 4] := T[1, 4]
# STEP 3
normd[n] := sqrt(π/2*(2*D[n, 1]^2 + sum(D[n, m]^2, m = 2 .. N + 2)))
normd = [1.77245]
# STEP 4
S[n, j] := D[n, j]/normd[n]
# STEP 5
w[n, i] := sum(S[n, j]*t[j, i], j)
# CONTINUE WITH n = 2,3, ... , N, note index ranges are set above k = rows, j = columns
n := 2
# STEP 1 choose function e | STEP 2 evaluate constants
e[n, i] := sum(T[n, j]*t[j, i], j)
m := 1 .. n - 1
α[n, m] := -π/2*(2*S[m, 1]*T[n, 1] + sum(S[m, k]*T[n, k], k = 2 .. N + 2))
# STEP 3 evaluate coefficients and the norm
D[n, j] := T[n, j] + sum(α[n, m]*S[m, j], m)
normd[n] := sqrt(π/2*(2*D[n, 1]^2 + sum(D[n, m]^2, m = 2 .. N + 2)))
# STEP 4 evaluate coefficients of w
S[n, j] := D[n, j]/normd[n]
# STEP 5 form orthonormal set w
w[n, i] := sum(S[n, j]*t[j, i], j)
n := 3
# STEP 1 | STEP 2
e[n, i] := sum(T[n, j]*t[j, i], j)
m := 1 .. n - 1
α[n, m] := -π/2*(2*S[m, 1]*T[n, 1] + sum(S[m, k]*T[n, k], k = 2 .. N + 2))
# STEP 3
D[n, j] := T[n, j] + sum(α[n, m]*S[m, j], m)
normd[n] := sqrt(π/2*(2*D[n, 1]^2 + sum(D[n, m]^2, m = 2 .. N + 2)))
# STEP 4
S[n, j] := D[n, j]/normd[n]
# STEP 5
w[n, i] := sum(S[n, j]*t[j, i], j)
n := 4
# STEP 1 | STEP 2
e[n, i] := sum(T[n, j]*t[j, i], j)
m := 1 .. n - 1
α[n, m] := -π/2*(2*S[m, 1]*T[n, 1] + sum(S[m, k]*T[n, k], k = 2 .. N + 2))
# STEP 3
D[n, j] := T[n, j] + sum(α[n, m]*S[m, j], m)
normd[n] := sqrt(π/2*(2*D[n, 1]^2 + sum(D[n, m]^2, m = 2 .. N + 2)))
# STEP 4
S[n, j] := D[n, j]/normd[n]
# STEP 5
w[n, i] := sum(S[n, j]*t[j, i], j)
n := 5
# STEP 1 | STEP 2
e[n, i] := sum(T[n, j]*t[j, i], j)
m := 1 .. n - 1
α[n, m] := -π/2*(2*S[m, 1]*T[n, 1] + sum(S[m, k]*T[n, k], k = 2 .. N + 2))
# STEP 3
D[n, j] := T[n, j] + sum(α[n, m]*S[m, j], m)
normd[n] := sqrt(π/2*(2*D[n, 1]^2 + sum(D[n, m]^2, m = 2 .. N + 2)))
# STEP 4
S[n, j] := D[n, j]/normd[n]
# STEP 5
w[n, i] := sum(S[n, j]*t[j, i], j)
n := 6
# STEP 1 | STEP 2
e[n, i] := sum(T[n, j]*t[j, i], j)
m := 1 .. n - 1
α[n, m] := -π/2*(2*S[m, 1]*T[n, 1] + sum(S[m, k]*T[n, k], k = 2 .. N + 2))
# STEP 3
D[n, j] := T[n, j] + sum(α[n, m]*S[m, j], m)
normd[n] := sqrt(π/2*(2*D[n, 1]^2 + sum(D[n, m]^2, m = 2 .. N + 2)))
# STEP 4
S[n, j] := D[n, j]/normd[n]
# STEP 5
w[n, i] := sum(S[n, j]*t[j, i], j)
n := 7
# STEP 1 | STEP 2
e[n, i] := sum(T[n, j]*t[j, i], j)
m := 1 .. n - 1
α[n, m] := -π/2*(2*S[m, 1]*T[n, 1] + sum(S[m, k]*T[n, k], k = 2 .. N + 2))
# STEP 3
D[n, j] := T[n, j] + sum(α[n, m]*S[m, j], m)
normd[n] := sqrt(π/2*(2*D[n, 1]^2 + sum(D[n, m]^2, m = 2 .. N + 2)))
# STEP 4
S[n, j] := D[n, j]/normd[n]
# STEP 5
w[n, i] := sum(S[n, j]*t[j, i], j)
n := 8
# STEP 1 | STEP 2
e[n, i] := sum(T[n, j]*t[j, i], j)
m := 1 .. n - 1
α[n, m] := -π/2*(2*S[m, 1]*T[n, 1] + sum(S[m, k]*T[n, k], k = 2 .. N + 2))
# STEP 3
D[n, j] := T[n, j] + sum(α[n, m]*S[m, j], m)
normd[n] := sqrt(π/2*(2*D[n, 1]^2 + sum(D[n, m]^2, m = 2 .. N + 2)))
# STEP 4
S[n, j] := D[n, j]/normd[n]
# STEP 5
w[n, i] := sum(S[n, j]*t[j, i], j)
n := 9
# STEP 1 | STEP 2
e[n, i] := sum(T[n, j]*t[j, i], j)
m := 1 .. n - 1
α[n, m] := -π/2*(2*S[m, 1]*T[n, 1] + sum(S[m, k]*T[n, k], k = 2 .. N + 2))
# STEP 3
D[n, j] := T[n, j] + sum(α[n, m]*S[m, j], m)
normd[n] := sqrt(π/2*(2*D[n, 1]^2 + sum(D[n, m]^2, m = 2 .. N + 2)))
# STEP 4
S[n, j] := D[n, j]/normd[n]
# STEP 5
w[n, i] := sum(S[n, j]*t[j, i], j)
# inspect the 9 orthonormalized functions w(x) and note that they are all zero at x=0 and x=1
# [plot: w[1, i], w[2, i], w[3, i], w[4, i] vs x[i]]
# [plot: w[5, i], w[6, i], w[7, i] vs x[i]]
# [plot: w[8, i], w[9, i] vs x[i]]
# check that the functions w are orthonormal by calculating their 9 x 9 inner product matrix (w',w"), where ' and " each indicate the range 1,..,9
n := 1 .. 9
m := 1 .. 9
β[n, m] := π/2*(2*S[m, 1]*S[n, 1] + sum(S[m, k]*S[n, k], k = 2 .. N + 2))
# the inner product matrix has unity on the main diagonal and zero elsewhere
β = [
    1, 0, 0, 0, 0, 0, 0, 0, 0;
    0, 1, 0, 0, 0, 0, 0, 0, 0;
    0, 0, 1, 0, 0, 0, 0, 0, 0;
    0, 0, 0, 1, 0, 0, 0, 0, 0;
    0, 0, 0, 0, 1, 0, 0, 0, 0;
    0, 0, 0, 0, 0, 1, 0, 0, 0;
    0, 0, 0, 0, 0, 0, 1, 0, 0;
    0, 0, 0, 0, 0, 0, 0, 1, 0;
    0, 0, 0, 0, 0, 0, 0, 0, 1
]
# Write the matrix S to a file for later use
PRNPRECISION := 15
PRNCOLWIDTH := 22
S9 := WRITEPRN("S9.PRN", S)
S = [
    0, -0.56419, 0, 0.56419, 0, 0, 0, 0, 0, 0, 0;
    0, -0.325735, 0, -0.325735, 0, 0.65147, 0, 0, 0, 0, 0;
    0, -0.230329, 0, -0.230329, 0, -0.230329, 0, 0.690988, 0, 0, 0;
    0, -0.178412, 0, -0.178412, 0, -0.178412, 0, -0.178412, 0, 0.71365, 0;
    0.409306, -0.163722, 0.409306, -0.163722, 0, -0.163722, 0, -0.163722, 0, -0.163722, 0;
    -0.270835, -0.120371, 0.300928, -0.120371, 0.571763, -0.120371, 0, -0.120371, 0, -0.120371, 0;
    0.0853853, -0.102462, -0.375695, -0.102462, 0.170771, -0.102462, 0.631851, -0.102462, 0, -0.102462, 0;
    -0.14647, -0.0901352, 0.112669, -0.0901352, -0.29294, -0.0901352, 0.112669, -0.0901352, 0.664747, -0.0901352, 0;
    0.0403508, -0.0807015, -0.242105, -0.0807015, 0.0807015, -0.0807015, -0.242105, -0.0807015, 0.0807015, -0.0807015, 0.685963
]
# ----------------------------------------------------------------------------------------------------------------------------------------------
