# ----------------------------------------------------------------------------------------------------------------------------------------------
# EXAMPLE  9.25:  Compute matrix eigenvalues and eigenvectors of W for rank N=7
# ----------------------------------------------------------------------------------------------------------------------------------------------
# Define Chebyshev Polynomials
T0(x) := 1
T1(x) := x
T2(x) := 2*x^2 - 1
T3(x) := 4*x^3 - 3*x
T4(x) := 8*x^4 - 8*x^2 + 1
T5(x) := 16*x^5 - 20*x^3 + 5*x
T6(x) := 32*x^6 - 48*x^4 + 18*x^2 - 1
T7(x) := 64*x^7 - 112*x^5 + 56*x^3 - 7*x
T8(x) := 128*x^8 - 256*x^6 + 160*x^4 - 32*x^2 + 1
T9(x) := 256*x^9 - 576*x^7 + 432*x^5 - 120*x^3 + 9*x
T10(x) := 512*x^10 - 1280*x^8 + 1120*x^6 - 400*x^4 + 50*x^2 - 1
T11(x) := 1024*x^11 - 2816*x^9 + 2816*x^7 - 1232*x^5 + 220*x^3 - 11*x
# rows | columns
# Set index origin to 1
# and set up matrix T in e = T t
ORIGIN := 1
N := 7
k := 1 .. N
j := 1 .. N + 2
# Initialize to zero
T[k, j] := 0
S[k, j] := 0
# set up grid in x for plots: showing full range even though only [0,1] is required
# Minimum and maximum value of the range
xmin := -1
xmax := 1
# for plots set argument range
imax := 101
i := 1 .. imax
x[i] := xmin + (i - 1)*(xmax - xmin)/(imax - 1)
# Define basis functions t(x) on this grid
t[1, i] := T0(x[i])
t[2, i] := T1(x[i])
t[3, i] := T2(x[i])
t[4, i] := T3(x[i])
t[5, i] := T4(x[i])
t[6, i] := T5(x[i])
t[7, i] := T6(x[i])
t[8, i] := T7(x[i])
t[9, i] := T8(x[i])
t[10, i] := T9(x[i])
t[11, i] := T10(x[i])
# read matrix S then inspect it
S := READFILE("S7.PRN", "delimited")
S = [
    0, -0.56419, 0, 0.56419, 0, 0, 0, 0, 0;
    0, -0.325735, 0, -0.325735, 0, 0.65147, 0, 0, 0;
    0, -0.230329, 0, -0.230329, 0, -0.230329, 0, 0.690988, 0;
    0.398942, -0.199471, 0.398942, -0.199471, 0, -0.199471, 0, -0.199471, 0;
    -0.282095, -0.141047, 0.282095, -0.141047, 0.56419, -0.141047, 0, -0.141047, 0;
    0.078239, -0.117359, -0.391195, -0.117359, 0.156478, -0.117359, 0.625912, -0.117359, 0;
    -0.152305, -0.101536, 0.101536, -0.101536, -0.304609, -0.101536, 0.101536, -0.101536, 0.659986
]
# Form the orthonormal basis w(x) in functions space using input coefficients from the modified Gram-Schmidt (MGS) algorithm, for  n = 1,2, ... , N, note index ranges are set above for k = rows, j = columns. Note that the boundary conditions at x = 0 and x = 1
n := 1 .. 7
w[n, i] := sum(S[n, j]*t[j, i], j)
# [plot: w[1, i], w[2, i], w[3, i], w[4, i] vs x[i]]
# [plot: w[5, i], w[6, i], w[7, i] vs x[i]]
# Now proceed to find the second derivative of functions w(x) with respect to x
# FIRST STEP: expansion coefficients of the second derivative of Chebyshev polynomials in a Chebyshev series
# form coefficient matrix ce for even powers of x
m := 1 .. 5
ce[m, 1] := 4*m^3
m := 2 .. 5
ce[m, 2] := 8*m*(m^2 - 1^2)
m := 3 .. 5
ce[m, 3] := 8*m*(m^2 - 2^2)
m := 4 .. 5
ce[m, 4] := 8*m*(m^2 - 3^2)
m := 5 .. 5
ce[m, 5] := 8*m*(m^2 - 4^2)
# form coefficient matrix co for odd powers of x
m := 2 .. 5
co[m - 1, 1] := 4*(2*m - 1)*(m - 1)*(m + 1 - 1)
m := 3 .. 5
co[m - 1, 2] := 4*(2*m - 1)*(m - 2)*(m + 2 - 1)
m := 4 .. 5
co[m - 1, 3] := 4*(2*m - 1)*(m - 3)*(m + 3 - 1)
m := 5 .. 5
co[m - 1, 4] := 4*(2*m - 1)*(m - 4)*(m + 4 - 1)
# expansion for second derivative t2 is
m := 1 .. 5
t2[2*m + 1, i] := sum(ce[m, l]*t[2*(l - 1) + 1, i], l = 1 .. m)
m := 2 .. 5
t2[2*m, i] := sum(co[m - 1, l]*t[2*l, i], l = 1 .. m - 1)
N = 7
N2 := 4
np := 1 .. 7
# Form matrix K (even powers)
ke := 0 .. 3
Ke[n, ke + 1] := 0
Ke[n, ke + 1] := sum(S[n, 2*m + 1]*ce[m, ke + 1], m = ke + 1 .. N2)
# Form matrix K (odd powers)
ko := 0 .. 2
Ko[n, ko + 1] := 0
Ko[n, ko + 1] := sum(S[n, 2*m]*co[m - 1, ko + 1], m = ko + 2 .. N2)
ce = [
    4, 0, 0, 0, 0;
    32, 48, 0, 0, 0;
    108, 192, 120, 0, 0;
    256, 480, 384, 224, 0;
    500, 960, 840, 640, 360
]
Ke = [
    0, 0, 0, 0;
    0, 0, 0, 0;
    0, 0, 0, 0;
    1.59577, 0, 0, 0;
    19.1824, 27.0811, 0, 0;
    71.041, 127.686, 75.1095, 0;
    170.581, 321.667, 265.619, 147.837
]
co = [24, 0, 0, 0; 120, 80, 0, 0; 336, 280, 168, 0; 720, 648, 504, 288]
Ko = [
    13.5406, 0, 0;
    70.3588, 52.1176, 0;
    199.005, 175.05, 116.086;
    -95.7461, -71.8096, -33.5112;
    -67.7028, -50.7771, -23.696;
    -56.3321, -42.2491, -19.7162;
    -48.7375, -36.5531, -17.0581
]
# form np x n matrix W
np := 1 .. 7
W[np, n] := 0
W[np, n] := π/2*(2*S[np, 1]*Ke[n, 1] + sum(S[np, 2*kk + 1]*Ke[n, kk + 1] + S[np, 2*kk]*Ko[n, kk], kk = 1 .. N2 - 1))
W = [
    -12, -16.1658, -21.2289, 21.2132, 15, 12.4808, 10.7981;
    -6.9282, -62.6667, -72.5963, 51.4393, 36.3731, 30.2642, 26.184;
    -4.89898, -44.312, -177.333, 72.7461, 51.4393, 42.8001, 37.0298;
    -4.24264, -38.3753, -153.575, 65, 85.5599, 206.118, 447.435;
    -3, -27.1355, -108.594, 43.1335, 26.5, 86.3946, 249.436;
    -2.49615, -22.5781, -90.3557, 37.4582, 14.2835, -20.7308, 73.7733;
    -2.15962, -19.5341, -78.174, 31.3052, 17.8169, -30.6973, -117.506
]
# Check determinant of matrix W and find the eigenvalues
detW := det(W)
detW = -4.38084e10
# find the real eigenvalues
v := eigenvals(W)
# computed value | exact value
v[3] = -9.89473
(1*π)^2 = 9.8696
v = [17.1079 + 13.5754i; 17.1079 - 13.5754i; -9.89473; -14.5913 - 24.8255i; -14.5913 + 24.8255i; -44.9748; -248.9]
v[6] = -44.9748
(2*π)^2 = 39.4784
v[7] = -248.9
(3*π)^2 = 88.8264
# show absolute and relative error of the real eigenvalues
v[3] + (1*π)^2 = -0.0251286
error[1] := (v[3] + (1*π)^2)/(1*π)^2
error[1] = -0.00254606
v[6] + (2*π)^2 = -5.49643
error[2] := (v[6] + (2*π)^2)/(2*π)^2
error[2] = -0.139226
v[7] + (3*π)^2 = -160.074
error[3] := (v[7] + (3*π)^2)/(3*π)^2
error[3] = -1.8021
# note that the accuracy of the eigenvalues decreases as their magnitude increases, or conversely, the eigenvalues of smallest magnitude converge fastest
# find the real eigenvalues of the transpose of W
vt := eigenvals(transpose(W))
# computed value
vt[3] = -9.89473
vt = [17.1079 - 13.5754i; 17.1079 + 13.5754i; -9.89473; -14.5913 + 24.8255i; -14.5913 - 24.8255i; -44.9748; -248.9]
vt[6] = -44.9748
vt[7] = -248.9
# find the real eigenvectors  of W corresponding to the first three real eigenvalues
z := eigenvecs(W)
ze1 := z[:, 3]
ze2 := z[:, 6]
ze3 := z[:, 7]
ze1 = [0.989381; -0.14427; 0.00730058; -0.0106451; 0.011324; -0.00386281; 0.000909492]
ze2 = [0.240577; 0.61713; -0.361281; -0.447698; 0.00368689; 0.449994; -0.166756]
ze3 = [0.0940736; 0.290406; 0.510195; -0.526834; -0.226295; 0.157457; 0.541257]
# find the real eigenvectors  of the transpose of W corresponding to the first three real eigenvalues
zt := eigenvecs(transpose(W))
zte1 := z[:, 3]
zte2 := z[:, 6]
zte3 := z[:, 7]
zte1 = [0.989381; -0.14427; 0.00730058; -0.0106451; 0.011324; -0.00386281; 0.000909492]
zte2 = [0.240577; 0.61713; -0.361281; -0.447698; 0.00368689; 0.449994; -0.166756]
zte3 = [0.0940736; 0.290406; 0.510195; -0.526834; -0.226295; 0.157457; 0.541257]
# note that in this case the eigenvalues and eigenvectors are the same as the original matrix W
# check that the eigenvectors are orthonormal
sum(ze1[k]*zte1[k], k) = 1
sum(ze2[k]*zte2[k], k) = 1
sum(ze3[k]*zte3[k], k) = 1
# check the error in the spectral function representation at time t=0 for each eigenmode
# examine error in function at t=0
# for eigenvalue
v[3] = -9.89473
# calculated solution | exact solution | difference
yz1[i] := sum(ze1[k]*w[k, i], k)
sin1[i] := sin(π*x[i])
error1[i] := yz1[i] - sin1[i]
# in the plot note that absolute error is scaled by 1
# [plot: sin1[i], 1*error1[i] vs x[i]]
# examine error in function at t=0
# for eigenvalue
v[6] = -44.9748
# calculated solution | exact solution | difference
yz2[i] := sum(ze2[k]*w[k, i], k)
sin2[i] := sin(2*π*x[i])
error2[i] := yz2[i] - sin2[i]
# in the plot note that absolute error is scaled by 1
# [plot: sin2[i], 1*error2[i] vs x[i]]
# examine error in function at t=0
# for eigenvalue
v[7] = -248.9
# calculated solution | exact solution | difference
yz3[i] := sum(ze3[k]*w[k, i], k)
sin3[i] := sin(3*π*x[i])
error3[i] := yz3[i] - sin3[i]
# in the plot note that absolute error is scaled by 1
# [plot: sin3[i], error3[i] vs x[i]]
# the conclusion is that a rank N=7 spectral function approximation does not provide a sufficient bound on the accuracy for either the eigenvalues or eigenvectors
# ----------------------------------------------------------------------------------------------------------------------------------------------
