# ----------------------------------------------------------------------------------------------------------------------------------------------
# EXAMPLE  9.26:  Compute matrix eigenvalues and eigenvectors of W for rank N=9
# ----------------------------------------------------------------------------------------------------------------------------------------------
# Define Chebyshev Polynomials
T0(x) := 1
T1(x) := x
T2(x) := 2*x^2 - 1
T3(x) := 4*x^3 - 3*x
T4(x) := 8*x^4 - 8*x^2 + 1
T5(x) := 16*x^5 - 20*x^3 + 5*x
T6(x) := 32*x^6 - 48*x^4 + 18*x^2 - 1
T7(x) := 64*x^7 - 112*x^5 + 56*x^3 - 7*x
T8(x) := 128*x^8 - 256*x^6 + 160*x^4 - 32*x^2 + 1
T9(x) := 256*x^9 - 576*x^7 + 432*x^5 - 120*x^3 + 9*x
T10(x) := 512*x^10 - 1280*x^8 + 1120*x^6 - 400*x^4 + 50*x^2 - 1
T11(x) := 1024*x^11 - 2816*x^9 + 2816*x^7 - 1232*x^5 + 220*x^3 - 11*x
# rows | columns
# Set index origin to 1
# and set up matrix T in e = T t
ORIGIN := 1
N := 9
k := 1 .. N
j := 1 .. N + 2
# Initialize to zero
T[k, j] := 0
S[k, j] := 0
# set up grid in x for plots: showing full range even though only [0,1] is required
# Minimum and maximum value of the range
xmin := -1
xmax := 1
# for plots set argument range
imax := 101
i := 1 .. imax
x[i] := xmin + (i - 1)*(xmax - xmin)/(imax - 1)
# Define basis functions t(x) on this grid
t[1, i] := T0(x[i])
t[2, i] := T1(x[i])
t[3, i] := T2(x[i])
t[4, i] := T3(x[i])
t[5, i] := T4(x[i])
t[6, i] := T5(x[i])
t[7, i] := T6(x[i])
t[8, i] := T7(x[i])
t[9, i] := T8(x[i])
t[10, i] := T9(x[i])
t[11, i] := T10(x[i])
# read matrix S then inspect it
S := READFILE("S9.PRN", "delimited")
S = [
    0, -0.56419, 0, 0.56419, 0, 0, 0, 0, 0, 0, 0;
    0, -0.325735, 0, -0.325735, 0, 0.65147, 0, 0, 0, 0, 0;
    0, -0.230329, 0, -0.230329, 0, -0.230329, 0, 0.690988, 0, 0, 0;
    0, -0.178412, 0, -0.178412, 0, -0.178412, 0, -0.178412, 0, 0.71365, 0;
    0.409306, -0.163722, 0.409306, -0.163722, 0, -0.163722, 0, -0.163722, 0, -0.163722, 0;
    -0.270835, -0.120371, 0.300928, -0.120371, 0.571763, -0.120371, 0, -0.120371, 0, -0.120371, 0;
    0.0853853, -0.102462, -0.375695, -0.102462, 0.170771, -0.102462, 0.631851, -0.102462, 0, -0.102462, 0;
    -0.14647, -0.0901352, 0.112669, -0.0901352, -0.29294, -0.0901352, 0.112669, -0.0901352, 0.664747, -0.0901352, 0;
    0.0403508, -0.0807015, -0.242105, -0.0807015, 0.0807015, -0.0807015, -0.242105, -0.0807015, 0.0807015, -0.0807015, 0.685963
]
# Form the orthonormal basis w(x) in functions space using input coefficients from the modified Gram-Schmidt (MGS) algorithm, for  n = 1,2, ... , N, note index ranges are set above for k = rows, j = columns. Note that the boundary conditions at x = 0 and x = 1
n := 1 .. 9
w[n, i] := sum(S[n, j]*t[j, i], j)
# [plot: w[1, i], w[2, i], w[3, i], w[4, i] vs x[i]]
# [plot: w[5, i], w[6, i], w[7, i] vs x[i]]
# [plot: w[8, i], w[9, i] vs x[i]]
# Now proceed to find the second derivative of functions w(x) with respect to x
# FIRST STEP: expansion coefficients of the second derivative of Chebyshev polynomials in a Chebyshev series
# form coefficient matrix ce for even powers of x
m := 1 .. 5
ce[m, 1] := 4*m^3
m := 2 .. 5
ce[m, 2] := 8*m*(m^2 - 1^2)
m := 3 .. 5
ce[m, 3] := 8*m*(m^2 - 2^2)
m := 4 .. 5
ce[m, 4] := 8*m*(m^2 - 3^2)
m := 5 .. 5
ce[m, 5] := 8*m*(m^2 - 4^2)
# form coefficient matrix co for odd powers of x
m := 2 .. 5
co[m - 1, 1] := 4*(2*m - 1)*(m - 1)*(m + 1 - 1)
m := 3 .. 5
co[m - 1, 2] := 4*(2*m - 1)*(m - 2)*(m + 2 - 1)
m := 4 .. 5
co[m - 1, 3] := 4*(2*m - 1)*(m - 3)*(m + 3 - 1)
m := 5 .. 5
co[m - 1, 4] := 4*(2*m - 1)*(m - 4)*(m + 4 - 1)
# expansion for second derivative t2 is
m := 1 .. 5
t2[2*m + 1, i] := sum(ce[m, l]*t[2*(l - 1) + 1, i], l = 1 .. m)
m := 2 .. 5
t2[2*m, i] := sum(co[m - 1, l]*t[2*l, i], l = 1 .. m - 1)
N = 9
N2 := 5
np := 1 .. 9
# Form matrix K (even powers)
ke := 0 .. 4
Ke[n, ke + 1] := 0
Ke[n, ke + 1] := sum(S[n, 2*m + 1]*ce[m, ke + 1], m = ke + 1 .. N2)
# Form matrix K (odd powers)
ko := 0 .. 3
Ko[n, ko + 1] := 0
Ko[n, ko + 1] := sum(S[n, 2*m]*co[m - 1, ko + 1], m = ko + 2 .. N2)
ce = [
    4, 0, 0, 0, 0;
    32, 48, 0, 0, 0;
    108, 192, 120, 0, 0;
    256, 480, 384, 224, 0;
    500, 960, 840, 640, 360
]
Ke = [
    0, 0, 0, 0, 0;
    0, 0, 0, 0, 0;
    0, 0, 0, 0, 0;
    0, 0, 0, 0, 0;
    1.63722, 0, 0, 0, 0;
    19.5001, 27.4446, 0, 0, 0;
    72.2018, 129.512, 75.8222, 0, 0;
    173.42, 326.65, 268.783, 148.903, 0;
    339.108, 654.651, 578.146, 457.093, 246.947
]
co = [24, 0, 0, 0; 120, 80, 0, 0; 336, 280, 168, 0; 720, 648, 504, 288]
Ko = [
    13.5406, 0, 0, 0;
    70.3588, 52.1176, 0, 0;
    199.005, 175.05, 116.086, 0;
    428.19, 398.217, 329.706, 205.531;
    -196.467, -165.032, -110.021, -47.1521;
    -144.445, -121.334, -80.8894, -34.6669;
    -122.955, -103.282, -68.8547, -29.5092;
    -108.162, -90.8563, -60.5709, -25.9589;
    -96.8418, -81.3471, -54.2314, -23.242
]
# form np x n matrix W
np := 1 .. 9
W[np, n] := 0
W[np, n] := π/2*(2*S[np, 1]*Ke[n, 1] + sum(S[np, 2*kk + 1]*Ke[n, kk + 1] + S[np, 2*kk]*Ko[n, kk], kk = 1 .. N2 - 1))
W = [
    -12, -16.1658, -21.2289, -26.5631, 27.8583, 20.4818, 17.4345, 15.337, 13.7318;
    -6.9282, -62.6667, -72.5963, -85.4447, 72.378, 53.2133, 45.2963, 39.8467, 35.6763;
    -4.89898, -44.312, -177.333, -195.198, 119.418, 87.7975, 74.735, 65.7437, 58.8629;
    -3.79473, -34.3239, -137.362, -381.6, 145.358, 106.869, 90.9692, 80.0248, 71.6493;
    -3.48229, -31.4978, -126.052, -350.18, 135.495, 140.79, 259.59, 506.447, 922.698;
    -2.56023, -23.1577, -92.6752, -257.458, 96.6769, 68.4836, 129.26, 302.243, 588.506;
    -2.17932, -19.7123, -78.887, -219.153, 83.9183, 50.4097, 15.5199, 119.596, 354.531;
    -1.91713, -17.3407, -69.3962, -192.787, 72.6824, 49.8753, 0.766455, -78.8865, 68.7391;
    -1.71648, -15.5258, -62.133, -172.61, 65.9574, 40.3751, 10.6594, -88.5976, -242.803
]
# Check determinant of matrix W and find the eigenvalues
detW := det(W)
detW = 3.00171e15
# find the real eigenvalues
v := eigenvals(W)
# computed value | exact value
v[4] = -9.87033
(1*π)^2 = 9.8696
v = [34.3846; 17.5645 + 32.8762i; 17.5645 - 32.8762i; -9.87033; -31.6565 - 37.8623i; -31.6565 + 37.8623i; -40.5441; -111.04; -580.537]
v[7] = -40.5441
(2*π)^2 = 39.4784
v[8] = -111.04
(3*π)^2 = 88.8264
v[9] = -580.537
(4*π)^2 = 157.914
# show absolute and relative error of the real eigenvalues
v[4] + (1*π)^2 = -0.000724513
error[1] := (v[4] + (1*π)^2)/(1*π)^2
error[1] = -7.34085e-5
v[7] + (2*π)^2 = -1.06573
error[2] := (v[7] + (2*π)^2)/(2*π)^2
error[2] = -0.0269953
v[8] + (3*π)^2 = -22.2134
error[3] := (v[8] + (3*π)^2)/(3*π)^2
error[3] = -0.250077
v[9] + (4*π)^2 = -422.624
error[4] := (v[9] + (4*π)^2)/(4*π)^2
error[4] = -2.6763
# note that the accuracy of the eigenvalues decreases as their magnitude increases, or conversely, the eigenvalues of smallest magnitude converge fastest
# however, note the improved accuracy with N=9 compared to N=7
# find the real eigenvalues of the transpose of W
vt := eigenvals(transpose(W))
# computed value
vt[4] = -9.87033
vt = [34.3846; 17.5645 - 32.8762i; 17.5645 + 32.8762i; -9.87033; -31.6565 + 37.8623i; -31.6565 - 37.8623i; -40.5441; -111.04; -580.537]
vt[7] = -40.5441
vt[8] = -111.04
vt[9] = -580.537
# find the real eigenvectors  of W corresponding to the first three real eigenvalues
z := eigenvecs(W)
ze1 := z[:, 4]
ze2 := z[:, 7]
ze3 := z[:, 8]
ze1 = [-0.989875; 0.141668; -0.00882975; 0.000336937; 0.000375836; -0.000439026; 0.000160811; -6.22928e-5; 1.86233e-5]
ze2 = [0.285013; 0.832838; -0.419069; 0.0458254; -0.143907; 0.00934505; 0.139388; -0.0821034; 0.0215267]
ze3 = [-0.115896; -0.334087; -0.353794; 0.401842; 0.46727; 0.199626; -0.260248; -0.444654; 0.2543]
# find the real eigenvectors  of the transpose of W corresponding to the first three real eigenvalues
zt := eigenvecs(transpose(W))
zte1 := z[:, 4]
zte2 := z[:, 7]
zte3 := z[:, 8]
zte1 = [-0.989875; 0.141668; -0.00882975; 0.000336937; 0.000375836; -0.000439026; 0.000160811; -6.22928e-5; 1.86233e-5]
zte2 = [0.285013; 0.832838; -0.419069; 0.0458254; -0.143907; 0.00934505; 0.139388; -0.0821034; 0.0215267]
zte3 = [-0.115896; -0.334087; -0.353794; 0.401842; 0.46727; 0.199626; -0.260248; -0.444654; 0.2543]
# note that in this case the eigenvalues and eigenvectors are the same as the original matrix W
# check that the eigenvectors are orthonormal
sum(ze1[k]*zte1[k], k) = 1
sum(ze2[k]*zte2[k], k) = 1
sum(ze3[k]*zte3[k], k) = 1
# check the error in the spectral function representation at time t=0 for each eigenmode
# examine error in function at t=0
# for eigenvalue
v[4] = -9.87033
# calculated solution | exact solution | difference
yz1[i] := sum(ze1[k]*w[k, i], k)
sin1[i] := sin(π*x[i])
error1[i] := yz1[i] - sin1[i]
# in the plot note that absolute error is scaled by 10
# [plot: sin1[i], 10*error1[i] vs x[i]]
# examine error in function at t=0
# for eigenvalue
v[7] = -40.5441
# calculated solution | exact solution | difference
yz2[i] := sum(ze2[k]*w[k, i], k)
sin2[i] := sin(2*π*x[i])
error2[i] := yz2[i] - sin2[i]
# in the plot note that absolute error is scaled by 10
# [plot: sin2[i], 10*error2[i] vs x[i]]
# examine error in function at t=0
# for eigenvalue
v[8] = -111.04
# calculated solution | exact solution | difference
yz3[i] := sum(ze3[k]*w[k, i], k)
sin3[i] := sin(3*π*x[i])
error3[i] := yz3[i] - sin3[i]
# in the plot note that absolute error is scaled by 1
# [plot: sin3[i], error3[i] vs x[i]]
# the conclusion is that a rank N=9 spectral function approximation does not provide a sufficient bound on the accuracy for either the eigenvalues or eigenvectors, but does improve over the results for N=7
PRNPRECISION := 15
PRNCOLWIDTH := 22
se := WRITEPRN("ze1.PRN", ze1)
se := WRITEPRN("ze2.PRN", ze2)
se := WRITEPRN("ze3.PRN", ze3)
# ----------------------------------------------------------------------------------------------------------------------------------------------
