# ----------------------------------------------------------------------------------------------------------------------------------------------
# EXAMPLE  9.27 : Euler formula for dp/dt = Λp  for first eigenvalue with step sizes 0.1
# ----------------------------------------------------------------------------------------------------------------------------------------------
# Exact solution to compare
n := 1
F(t, x) := exp(-n^2*t)*sin(n*π*x)
N := 10
ORIGIN := 0
# tabulate evenly spaced grid in 1-D with step h for time t and variable r
# Minimum and maximum value of the t range
tmax := 10
jt := 0 .. tmax
h := 0.1
t[jt] := jt*h
# read in eigenvector of first eigenvalue
eigenvec1 := READFILE("ze1.PRN", "delimited")
eigenvalue1 := -9.87032891
Λ := eigenvalue1/π^2
Λ = -1.00007
# exact value is -1
eigenvec1 = [-0.989875; 0.141668; -0.00882975; 0.000336937; 0.000375836; -0.000439026; 0.000160811; -6.22928e-5; 1.86233e-5]
# Length of eigenvector p
Lvec := 9
l := 0 .. Lvec - 1
# initial value of vector p at t=0
p[l, 0] := eigenvec1[l]
# Euler steps j=1,..,tmax, for vector p
p[l, jt + 1] := p[l, jt] + h*Λ*p[l, jt]
time := t
t[1] = 0.1
t[2] = 0.2
t[3] = 0.3
t[4] = 0.4
t[5] = 0.5
p[l, 1] = [-0.89088; 0.127501; -0.00794671; 0.000303241; 0.00033825; -0.000395121; 0.000144728; -5.60631e-5; 1.67608e-5]
p[l, 2] = [-0.801785; 0.11475; -0.00715198; 0.000272914; 0.000304422; -0.000355606; 0.000130254; -5.04564e-5; 1.50846e-5]
p[l, 3] = [-0.721601; 0.103274; -0.00643673; 0.000245621; 0.000273978; -0.000320042; 0.000117228; -4.54103e-5; 1.3576e-5]
p[l, 4] = [-0.649435; 0.0929456; -0.00579301; 0.000221057; 0.000246578; -0.000288036; 0.000105504; -4.0869e-5; 1.22183e-5]
p[l, 5] = [-0.584487; 0.0836504; -0.00521366; 0.00019895; 0.000221918; -0.00025923; 9.49532e-5; -3.67818e-5; 1.09964e-5]
# to compare to the exact values the orthonormal set of spectral functions w(x) for rank N=9 are needed and these are computed from the basis set t(x) as follows
# Define Chebyshev Polynomials
T0(x) := 1
T1(x) := x
T2(x) := 2*x^2 - 1
T3(x) := 4*x^3 - 3*x
T4(x) := 8*x^4 - 8*x^2 + 1
T5(x) := 16*x^5 - 20*x^3 + 5*x
T6(x) := 32*x^6 - 48*x^4 + 18*x^2 - 1
T7(x) := 64*x^7 - 112*x^5 + 56*x^3 - 7*x
T8(x) := 128*x^8 - 256*x^6 + 160*x^4 - 32*x^2 + 1
T9(x) := 256*x^9 - 576*x^7 + 432*x^5 - 120*x^3 + 9*x
T10(x) := 512*x^10 - 1280*x^8 + 1120*x^6 - 400*x^4 + 50*x^2 - 1
T11(x) := 1024*x^11 - 2816*x^9 + 2816*x^7 - 1232*x^5 + 220*x^3 - 11*x
# rows | columns
# Set index origin to 1
# and set up matrix S in w = S t and note the change in starting value of the index
ORIGIN := 1
N := 9
k := 1 .. N
j := 1 .. N + 2
# Initialize to zero
S[k, j] := 0
# set up grid in x for plots: showing the range [0,1]
# Minimum and maximum value of the range
xmin := 0
xmax := 1
# for plots set argument range
imax := 101
i := 1 .. imax
x[i] := xmin + (i - 1)*(xmax - xmin)/(imax - 1)
# Define basis functions t(x) on this grid
t[1, i] := T0(x[i])
t[2, i] := T1(x[i])
t[3, i] := T2(x[i])
t[4, i] := T3(x[i])
t[5, i] := T4(x[i])
t[6, i] := T5(x[i])
t[7, i] := T6(x[i])
t[8, i] := T7(x[i])
t[9, i] := T8(x[i])
t[10, i] := T9(x[i])
t[11, i] := T10(x[i])
# read matrix S then inspect it
S := READFILE("S9.PRN", "delimited")
S = [
    0, -0.56419, 0, 0.56419, 0, 0, 0, 0, 0, 0, 0;
    0, -0.325735, 0, -0.325735, 0, 0.65147, 0, 0, 0, 0, 0;
    0, -0.230329, 0, -0.230329, 0, -0.230329, 0, 0.690988, 0, 0, 0;
    0, -0.178412, 0, -0.178412, 0, -0.178412, 0, -0.178412, 0, 0.71365, 0;
    0.409306, -0.163722, 0.409306, -0.163722, 0, -0.163722, 0, -0.163722, 0, -0.163722, 0;
    -0.270835, -0.120371, 0.300928, -0.120371, 0.571763, -0.120371, 0, -0.120371, 0, -0.120371, 0;
    0.0853853, -0.102462, -0.375695, -0.102462, 0.170771, -0.102462, 0.631851, -0.102462, 0, -0.102462, 0;
    -0.14647, -0.0901352, 0.112669, -0.0901352, -0.29294, -0.0901352, 0.112669, -0.0901352, 0.664747, -0.0901352, 0;
    0.0403508, -0.0807015, -0.242105, -0.0807015, 0.0807015, -0.0807015, -0.242105, -0.0807015, 0.0807015, -0.0807015, 0.685963
]
# Form the orthonormal basis w(x) in functions space using input coefficients in matrix S from the modified Gram-Schmidt (MGS) algorithm, for  n = 1,2, ... , N, note index ranges are set above for k = rows, j = columns.
n := 1 .. 9
w[n, i] := sum(S[n, j]*t[j, i], j)
# sample of the predicted values of vector p at a few subsequent time steps
time[2] = 0.1
time[3] = 0.2
time[4] = 0.3
time[5] = 0.4
p[n, 2] = [-0.89088; 0.127501; -0.00794671; 0.000303241; 0.00033825; -0.000395121; 0.000144728; -5.60631e-5; 1.67608e-5]
p[n, 3] = [-0.801785; 0.11475; -0.00715198; 0.000272914; 0.000304422; -0.000355606; 0.000130254; -5.04564e-5; 1.50846e-5]
p[n, 4] = [-0.721601; 0.103274; -0.00643673; 0.000245621; 0.000273978; -0.000320042; 0.000117228; -4.54103e-5; 1.3576e-5]
p[n, 5] = [-0.649435; 0.0929456; -0.00579301; 0.000221057; 0.000246578; -0.000288036; 0.000105504; -4.0869e-5; 1.22183e-5]
transpose(time) = [0, 0.1, 0.2, 0.3, 0.4, 0.5, 0.6, 0.7, 0.8, 0.9, 1]
# show plots of the predicted values of the solution in the range x=[0,1] from the calculation at three time steps together with the absolute error when compared to the exact value
# note that the error curve has been scaled by 10 on the plots with a sample at the midpoint in x
time[2] = 0.1
x[51] = 0.5
Fcalc[i] := sum(p[n, 2]*w[n, i], n)
error[i] := |F(time[2], x[i]) - Fcalc[i]|
F(time[2], x[51]) = 0.904837
Fcalc[51] = 0.81373
error[51] = 0.0911079
error[51]*F(time[2], x[51])^-1 = 0.10069
# [plot: Fcalc[i], 10*error[i] vs x[i]]
time[6] = 0.5
x[51] = 0.5
Fcalc[i] := sum(p[n, 6]*w[n, i], n)
error[i] := |F(time[6], x[i]) - Fcalc[i]|
F(time[6], x[51]) = 0.606531
Fcalc[51] = 0.533871
error[51] = 0.0726601
error[51]*F(time[6], x[51])^-1 = 0.119796
# [plot: Fcalc[i], 10*error[i] vs x[i]]
time[11] = 1
x[51] = 0.5
Fcalc[i] := sum(p[n, 11]*w[n, i], n)
error[i] := |F(time[11], x[i]) - Fcalc[i]|
F(time[11], x[51]) = 0.367879
Fcalc[51] = 0.315232
error[51] = 0.0526471
error[51]*F(time[11], x[51])^-1 = 0.14311
# [plot: Fcalc[i], 10*error[i] vs x[i]]
# note that the relative error at x=0.5 has grown by more than 1.4 from time 0.1 to 1.0 but it is not clear if this is due to the error in using the Euler method or from the error in spectral functions w(x) with N=9
# ----------------------------------------------------------------------------------------------------------------------------------------------
