# ----------------------------------------------------------------------------------------------------------------------------------------------
# EXAMPLE  9.28 : Euler formula for dp/dt = Λp  for the second eigenvalue with step sizes 0.1
# ----------------------------------------------------------------------------------------------------------------------------------------------
# Exact solution to compare
n := 2
F(t, x) := exp(-n^2*t)*sin(n*π*x)
N := 10
ORIGIN := 0
# tabulate evenly spaced grid in 1-D with step h for time t and variable r
# Minimum and maximum value of the t range
tmax := 10
jt := 0 .. tmax
h := 0.1
t[jt] := jt*h
# read in eigenvector of first eigenvalue
eigenvec2 := READFILE("ze2.PRN", "delimited")
eigenvalue2 := -40.54414746
Λ := eigenvalue2/π^2
Λ = -4.10798
# exact value is -4
eigenvec2 = [0.285013; 0.832838; -0.419069; 0.0458254; -0.143907; 0.00934505; 0.139388; -0.0821034; 0.0215267]
# Length of eigenvector p
Lvec := 9
l := 0 .. Lvec - 1
# initial value of vector p at t=0
p[l, 0] := eigenvec2[l]
# Euler steps j=1,..,tmax, for vector p
p[l, jt + 1] := p[l, jt] + h*Λ*p[l, jt]
time := t
t[1] = 0.1
t[2] = 0.2
t[3] = 0.3
t[4] = 0.4
t[5] = 0.5
p[l, 1] = [0.16793; 0.49071; -0.246916; 0.0270004; -0.0847901; 0.00550612; 0.0821279; -0.0483755; 0.0126836]
p[l, 2] = [0.0989446; 0.289127; -0.145483; 0.0159087; -0.0499585; 0.00324422; 0.0483899; -0.0285029; 0.00747317]
p[l, 3] = [0.0582984; 0.170354; -0.0857191; 0.00937342; -0.0294357; 0.0019115; 0.0285114; -0.016794; 0.00440321]
p[l, 4] = [0.0343495; 0.100373; -0.0505058; 0.00552284; -0.0173435; 0.00112626; 0.016799; -0.00989505; 0.00259438]
p[l, 5] = [0.0202388; 0.05914; -0.0297581; 0.00325407; -0.0102188; 0.000663594; 0.009898; -0.00583018; 0.00152861]
# to compare to the exact values the orthonormal set of spectral functions w(x) for rank N=9 are needed and these are computed from the basis set t(x) as follows
# Define Chebyshev Polynomials
T0(x) := 1
T1(x) := x
T2(x) := 2*x^2 - 1
T3(x) := 4*x^3 - 3*x
T4(x) := 8*x^4 - 8*x^2 + 1
T5(x) := 16*x^5 - 20*x^3 + 5*x
T6(x) := 32*x^6 - 48*x^4 + 18*x^2 - 1
T7(x) := 64*x^7 - 112*x^5 + 56*x^3 - 7*x
T8(x) := 128*x^8 - 256*x^6 + 160*x^4 - 32*x^2 + 1
T9(x) := 256*x^9 - 576*x^7 + 432*x^5 - 120*x^3 + 9*x
T10(x) := 512*x^10 - 1280*x^8 + 1120*x^6 - 400*x^4 + 50*x^2 - 1
T11(x) := 1024*x^11 - 2816*x^9 + 2816*x^7 - 1232*x^5 + 220*x^3 - 11*x
# rows | columns
# Set index origin to 1
# and set up matrix S in w = S t and note the change in starting value of the index
ORIGIN := 1
N := 9
k := 1 .. N
j := 1 .. N + 2
# Initialize to zero
S[k, j] := 0
# set up grid in x for plots: showing the range [0,1]
# Minimum and maximum value of the range
xmin := 0
xmax := 1
# for plots set argument range
imax := 101
i := 1 .. imax
x[i] := xmin + (i - 1)*(xmax - xmin)/(imax - 1)
# Define basis functions t(x) on this grid
t[1, i] := T0(x[i])
t[2, i] := T1(x[i])
t[3, i] := T2(x[i])
t[4, i] := T3(x[i])
t[5, i] := T4(x[i])
t[6, i] := T5(x[i])
t[7, i] := T6(x[i])
t[8, i] := T7(x[i])
t[9, i] := T8(x[i])
t[10, i] := T9(x[i])
t[11, i] := T10(x[i])
# read matrix S then inspect it
S := READFILE("S9.PRN", "delimited")
S = [
    0, -0.56419, 0, 0.56419, 0, 0, 0, 0, 0, 0, 0;
    0, -0.325735, 0, -0.325735, 0, 0.65147, 0, 0, 0, 0, 0;
    0, -0.230329, 0, -0.230329, 0, -0.230329, 0, 0.690988, 0, 0, 0;
    0, -0.178412, 0, -0.178412, 0, -0.178412, 0, -0.178412, 0, 0.71365, 0;
    0.409306, -0.163722, 0.409306, -0.163722, 0, -0.163722, 0, -0.163722, 0, -0.163722, 0;
    -0.270835, -0.120371, 0.300928, -0.120371, 0.571763, -0.120371, 0, -0.120371, 0, -0.120371, 0;
    0.0853853, -0.102462, -0.375695, -0.102462, 0.170771, -0.102462, 0.631851, -0.102462, 0, -0.102462, 0;
    -0.14647, -0.0901352, 0.112669, -0.0901352, -0.29294, -0.0901352, 0.112669, -0.0901352, 0.664747, -0.0901352, 0;
    0.0403508, -0.0807015, -0.242105, -0.0807015, 0.0807015, -0.0807015, -0.242105, -0.0807015, 0.0807015, -0.0807015, 0.685963
]
# Form the orthonormal basis w(x) in functions space using input coefficients in matrix S from the modified Gram-Schmidt (MGS) algorithm, for  n = 1,2, ... , N, note index ranges are set above for k = rows, j = columns.
n := 1 .. 9
w[n, i] := sum(S[n, j]*t[j, i], j)
# sample of the predicted values of vector p at a few subsequent time steps
time[2] = 0.1
time[3] = 0.2
time[4] = 0.3
time[5] = 0.4
p[n, 2] = [0.16793; 0.49071; -0.246916; 0.0270004; -0.0847901; 0.00550612; 0.0821279; -0.0483755; 0.0126836]
p[n, 3] = [0.0989446; 0.289127; -0.145483; 0.0159087; -0.0499585; 0.00324422; 0.0483899; -0.0285029; 0.00747317]
p[n, 4] = [0.0582984; 0.170354; -0.0857191; 0.00937342; -0.0294357; 0.0019115; 0.0285114; -0.016794; 0.00440321]
p[n, 5] = [0.0343495; 0.100373; -0.0505058; 0.00552284; -0.0173435; 0.00112626; 0.016799; -0.00989505; 0.00259438]
transpose(time) = [0, 0.1, 0.2, 0.3, 0.4, 0.5, 0.6, 0.7, 0.8, 0.9, 1]
# show plots of the predicted values of the solution in the range x=[0,1] from the calculation at three time steps together with the absolute error when compared to the exact value
# note that the error curve has been scaled by 10 on the plots with a sample at x=0.25
time[2] = 0.1
x[26] = 0.25
Fcalc[i] := sum(p[n, 2]*w[n, i], n)
error[i] := |F(time[2], x[i]) - Fcalc[i]|
F(time[2], x[26]) = 0.67032
Fcalc[26] = 0.57905
error[26] = 0.0912699
error[26]*F(time[2], x[26])^-1 = 0.136159
# [plot: Fcalc[i], 10*error[i] vs x[i]]
time[6] = 0.5
x[26] = 0.25
Fcalc[i] := sum(p[n, 6]*w[n, i], n)
error[i] := |F(time[6], x[i]) - Fcalc[i]|
F(time[6], x[26]) = 0.135335
Fcalc[26] = 0.0697867
error[26] = 0.0655486
error[26]*F(time[6], x[26])^-1 = 0.484342
# [plot: Fcalc[i], 10*error[i] vs x[i]]
time[11] = 1
x[26] = 0.25
Fcalc[i] := sum(p[n, 11]*w[n, i], n)
error[i] := |F(time[11], x[i]) - Fcalc[i]|
F(time[11], x[26]) = 0.0183156
Fcalc[26] = 0.00495557
error[26] = 0.0133601
error[26]*F(time[11], x[26])^-1 = 0.729435
# [plot: Fcalc[i], 10*error[i] vs x[i]]
# note that the relative error at x=0.25 has grown by more than a factor of 5 from time 0.1 to 1.0 but it is not clear if this is due to the error in using the Euler method or from the error in spectral functions w(x) with N=9
# ----------------------------------------------------------------------------------------------------------------------------------------------
