# ----------------------------------------------------------------------------------------------------------------------------------------------
# EXAMPLE  9.29 : RK order 3 formula for dp/dt = Λp  for first eigenvalue with step sizes 0.1
# ----------------------------------------------------------------------------------------------------------------------------------------------
# Exact solution to compare
n := 1
F(t, x) := exp(-n^2*t)*sin(n*π*x)
N := 10
ORIGIN := 0
# tabulate evenly spaced grid in 1-D with step h for time t and variable r
# Minimum and maximum value of the t range
tmax := 10
jt := 0 .. tmax
h := 0.1
t[jt] := jt*h
time := t
# read in eigenvector of first eigenvalue
eigenvec1 := READFILE("ze1.PRN", "delimited")
eigenvalue1 := -9.87032891
Λ := eigenvalue1/π^2
Λ = -1.00007
# exact value is -1
eigenvec1 = [-0.989875; 0.141668; -0.00882975; 0.000336937; 0.000375836; -0.000439026; 0.000160811; -6.22928e-5; 1.86233e-5]
# Length of eigenvector p
Lvec := 9
l := 0 .. Lvec - 1
# initial value of vector p at t=0
p[l, 0] := eigenvec1[l]
# RK order 3 parameters
w[1] := 1/4
w[2] := 3/8
w[3] := 3/8
a21 := 2/3
a31 := 0
a32 := 2/3
c[1] := 0
c[2] := a21
# define right hand side
f(p) := Λ*p
c[1] := 0
c[2] := a21
c[3] := a31 + a32
# Perform RK iteration loop over p for jt=0,..,10 and store result in matrix  RK_u  using initial value
RK_p :=
    h ← 0.1
    for jt ∈ 0 .. 10
        for l ∈ 0 .. Lvec - 1
            R1[l, jt] ← h*f(p[l, jt])
            R2[l, jt] ← h*f(p[l, jt] + a21*R1[l, jt])
            R3[l, jt] ← h*f(p[l, jt] + a31*R1[l, jt] + a32*R2[l, jt])
            p[l, jt + 1] ← p[l, jt] + w[1]*R1[l, jt] + w[2]*R2[l, jt] + w[3]*R3[l, jt]
        t[jt + 1] ← (jt + 1)*h
    p
f(p[l, 0]) = [0.989947; -0.141679; 0.00883039; -0.000336962; -0.000375864; 0.000439059; -0.000160822; 6.22974e-5; -1.86246e-5]
t[1] = 0.1
t[2] = 0.2
t[3] = 0.3
t[4] = 0.4
RK_p[l, 1] = [-0.895665; 0.128185; -0.00798939; 0.00030487; 0.000340067; -0.000397243; 0.000145506; -5.63642e-5; 1.68508e-5]
RK_p[l, 2] = [-0.810422; 0.115986; -0.00722901; 0.000275854; 0.000307701; -0.000359436; 0.000131657; -5.09998e-5; 1.52471e-5]
RK_p[l, 3] = [-0.733291; 0.104947; -0.006541; 0.0002496; 0.000278416; -0.000325227; 0.000119127; -4.6146e-5; 1.3796e-5]
RK_p[l, 4] = [-0.663501; 0.0949587; -0.00591848; 0.000225845; 0.000251919; -0.000294274; 0.000107789; -4.17541e-5; 1.2483e-5]
# to compare to the exact values the orthonormal set of spectral functions w(x) for rank N=9 are needed and these are computed from the basis set t(x) as follows
# Define Chebyshev Polynomials
T0(x) := 1
T1(x) := x
T2(x) := 2*x^2 - 1
T3(x) := 4*x^3 - 3*x
T4(x) := 8*x^4 - 8*x^2 + 1
T5(x) := 16*x^5 - 20*x^3 + 5*x
T6(x) := 32*x^6 - 48*x^4 + 18*x^2 - 1
T7(x) := 64*x^7 - 112*x^5 + 56*x^3 - 7*x
T8(x) := 128*x^8 - 256*x^6 + 160*x^4 - 32*x^2 + 1
T9(x) := 256*x^9 - 576*x^7 + 432*x^5 - 120*x^3 + 9*x
T10(x) := 512*x^10 - 1280*x^8 + 1120*x^6 - 400*x^4 + 50*x^2 - 1
T11(x) := 1024*x^11 - 2816*x^9 + 2816*x^7 - 1232*x^5 + 220*x^3 - 11*x
# rows | columns
# Set index origin to 1
# and set up matrix S in w = S t and note the change in starting value of the index
ORIGIN := 1
N := 9
k := 1 .. N
j := 1 .. N + 2
# Initialize to zero
S[k, j] := 0
# set up grid in x for plots: showing the range [0,1]
# Minimum and maximum value of the range
xmin := 0
xmax := 1
# for plots set argument range
imax := 101
i := 1 .. imax
x[i] := xmin + (i - 1)*(xmax - xmin)/(imax - 1)
# Define basis functions t(x) on this grid
t[1, i] := T0(x[i])
t[2, i] := T1(x[i])
t[3, i] := T2(x[i])
t[4, i] := T3(x[i])
t[5, i] := T4(x[i])
t[6, i] := T5(x[i])
t[7, i] := T6(x[i])
t[8, i] := T7(x[i])
t[9, i] := T8(x[i])
t[10, i] := T9(x[i])
t[11, i] := T10(x[i])
# read matrix S then inspect it
S := READFILE("S9.PRN", "delimited")
S = [
    0, -0.56419, 0, 0.56419, 0, 0, 0, 0, 0, 0, 0;
    0, -0.325735, 0, -0.325735, 0, 0.65147, 0, 0, 0, 0, 0;
    0, -0.230329, 0, -0.230329, 0, -0.230329, 0, 0.690988, 0, 0, 0;
    0, -0.178412, 0, -0.178412, 0, -0.178412, 0, -0.178412, 0, 0.71365, 0;
    0.409306, -0.163722, 0.409306, -0.163722, 0, -0.163722, 0, -0.163722, 0, -0.163722, 0;
    -0.270835, -0.120371, 0.300928, -0.120371, 0.571763, -0.120371, 0, -0.120371, 0, -0.120371, 0;
    0.0853853, -0.102462, -0.375695, -0.102462, 0.170771, -0.102462, 0.631851, -0.102462, 0, -0.102462, 0;
    -0.14647, -0.0901352, 0.112669, -0.0901352, -0.29294, -0.0901352, 0.112669, -0.0901352, 0.664747, -0.0901352, 0;
    0.0403508, -0.0807015, -0.242105, -0.0807015, 0.0807015, -0.0807015, -0.242105, -0.0807015, 0.0807015, -0.0807015, 0.685963
]
# Form the orthonormal basis w(x) in functions space using input coefficients in matrix S from the modified Gram-Schmidt (MGS) algorithm, for  n = 1,2, ... , N, note index ranges are set above for k = rows, j = columns.
n := 1 .. 9
w[n, i] := sum(S[n, j]*t[j, i], j)
# show plots of the predicted values of the solution in the range x=[0,1] from the calculation at two time steps together with the absolute error when compared to the exact value
# note that the error curve has been scaled by 10 on the plots with a sample at the midpoint in x
time[6] = 0.5
x[51] = 0.5
Fcalc[i] := sum(RK_p[n, 6]*w[n, i], n)
error[i] := |F(time[6], x[i]) - Fcalc[i]|
F(time[6], x[51]) = 0.606531
Fcalc[51] = 0.548363
error[51] = 0.0581677
error[51]*F(time[6], x[51])^-1 = 0.0959023
# [plot: Fcalc[i], 10*error[i] vs x[i]]
time[11] = 1
x[51] = 0.5
Fcalc[i] := sum(RK_p[n, 11]*w[n, i], n)
error[i] := |F(time[11], x[i]) - Fcalc[i]|
F(time[11], x[51]) = 0.367879
Fcalc[51] = 0.332579
error[51] = 0.0353002
error[51]*F(time[11], x[51])^-1 = 0.0959559
# [plot: Fcalc[i], 10*error[i] vs x[i]]
# note that the relative error at x=0.5 is unchanged from time 0.5 to 1.0 hence the order 3 RK method is superior to the Euler method with spectral functions w(x) with N=9
# tabulate evenly spaced grid in 1-D with step h for time t and variable x
# Minimum and maximum value of the t range
tmax := 10
jt := 1 .. tmax
wave[jt, i] := sum(RK_p[n, jt]*w[n, i], n)
# [3D plot: wave]
# the 3-D perspective plot shows magnitude in the vertical (z) axis, x axis on the right [0,1], and the time axis on the left for the time interval [0, 1 ]
# ----------------------------------------------------------------------------------------------------------------------------------------------
