# ----------------------------------------------------------------------------------------------------------------------------------------------
# EXAMPLE  9.3 : Euler formula for du/dx = 1 - u(x) for step sizes 0.1 and 0.05
# ----------------------------------------------------------------------------------------------------------------------------------------------
# Exact solution to compare
F(x) := 1 - exp(-x)
N := 20
ORIGIN := 0
# argument values and tabulate evenly spaced grid in 1-D with step h
imax := N
i := 0 .. imax + 1
j := 0 .. imax
k := 0, 2 .. 20
h := 0.1
x[i] := i*h
u[0] := 0
# initial argument
x[0] = 0
# exact value
F(x[0]) = 0
F(x[0]) + u[0] = 0
# Euler estimate
u[j + 1] := u[j] + h*(1 - u[j])
error[j + 1] := |F(x[j + 1]) - u[j + 1]|
rel_err[j + 1] := error[j + 1]*(F(x[j + 1])^-1)
# argument | Euler estimate | exact value | absolute error | relative error
x[k] = [0; 0.2; 0.4; 0.6; 0.8; 1; 1.2; 1.4; 1.6; 1.8; 2]
u[k] = [0; 0.19; 0.3439; 0.468559; 0.569533; 0.651322; 0.71757; 0.771232; 0.814698; 0.849905; 0.878423]
F(x[k]) = [0; 0.181269; 0.32968; 0.451188; 0.550671; 0.632121; 0.698806; 0.753403; 0.798103; 0.834701; 0.864665]
error[k] = [0; 0.00873075; 0.01422; 0.0173706; 0.0188618; 0.019201; 0.0187647; 0.017829; 0.0165945; 0.0152043; 0.0137586]
rel_err[k] = [0; 0.0481646; 0.0431329; 0.0384997; 0.0342523; 0.0303755; 0.0268525; 0.0236647; 0.0207924; 0.0182152; 0.0159121]
# [plot: error[j] vs x[j]]
# the error on a log scale grows as the argument increases
h := 0.05
x[i] := i*h
u[0] := 0
# initial argument
x[0] = 0
# exact value
F(x[0]) = 0
F(x[0]) + u[0] = 0
# Euler estimate
u[j + 1] := u[j] + h*(1 - u[j])
error[j + 1] := |F(x[j + 1]) - u[j + 1]|
rel_err[j + 1] := error[j + 1]*(F(x[j + 1])^-1)
# argument | Euler estimate | exact value | absolute error | relative error
x[k] = [0; 0.1; 0.2; 0.3; 0.4; 0.5; 0.6; 0.7; 0.8; 0.9; 1]
u[k] = [0; 0.0975; 0.185494; 0.264908; 0.33658; 0.401263; 0.45964; 0.512325; 0.559873; 0.602786; 0.641514]
F(x[k]) = [0; 0.0951626; 0.181269; 0.259182; 0.32968; 0.393469; 0.451188; 0.503415; 0.550671; 0.59343; 0.632121]
error[k] = [0; 0.00233742; 0.0042245; 0.00572633; 0.00689961; 0.00779372; 0.00845155; 0.00891032; 0.0092023; 0.00935534; 0.00939352]
rel_err[k] = [0; 0.0245624; 0.0233051; 0.0220939; 0.0209282; 0.0198077; 0.0187318; 0.0176998; 0.0167111; 0.0157649; 0.0148603]
# [plot: error[j] vs x[j]]
# compare the error on a log scale at half the step size h on the same interval [0,1]
# the error at x=1 is approximately halved at half the step size
# ----------------------------------------------------------------------------------------------------------------------------------------------
