# ----------------------------------------------------------------------------------------------------------------------------------------------
# EXAMPLE  9.31 : Euler formula for problem 4 du/dx = p+q for step sizes in argument and time
# ----------------------------------------------------------------------------------------------------------------------------------------------
# Exact solution to compare
N := 10
ORIGIN := 0
F(t, x) := (1 - exp(-t))*sin(π*x)
# inhomogeneous term
Q(x) := sin(π*x)
# argument value z tabulated on an evenly spaced grid in 1-D with step hz
zmax := 2*N
jz := 0 .. zmax
hz := 0.05
z[jz] := jz*hz
# time value x tabulated on an evenly spaced grid in 1-D with step h
imax := N
i := 0 .. imax + 1
h := 0.1
x[i] := i*h
# initial time
x[0] = 0
# initial function value
u[0, jz] := 0
# exact value
F(z[0], x[0]) = 0
# value of inhomogeneous term in P4 on argument grid
q[jz] := Q(z[jz])
m := 2, 4 .. 10
# Euler estimate time stepping
u[i + 1, jz] := u[i, jz] + h*(q[jz] - u[i, jz])
error[i, jz] := |F(x[i], z[jz]) - u[i, jz]|
ratio[m] := error[m, 10]/F(x[m], z[10])
# argument value for error tabulation
z[10] = 0.5
k := 0, 2 .. 10
# time | Euler estimate | exact value | absolute error | relative error does not grow
x[k] = [0; 0.2; 0.4; 0.6; 0.8; 1]
u[k, 10] = [0; 0.19; 0.3439; 0.468559; 0.569533; 0.651322]
F(x[k], z[10]) = [0; 0.181269; 0.32968; 0.451188; 0.550671; 0.632121]
error[k, 10] = [0; 0.00873075; 0.01422; 0.0173706; 0.0188618; 0.019201]
ratio[m] = [0.0481646; 0.0431329; 0.0384997; 0.0342523; 0.0303755]
# function and error curves at 5 time steps showing how the solution grows with increasing time
# [plot: u[2, jz], 10*error[2, jz] vs z[jz]]
# [plot: u[4, jz], 10*error[4, jz] vs z[jz]]
# [plot: u[6, jz], 10*error[6, jz] vs z[jz]]
# [plot: u[8, jz], 10*error[6, jz] vs z[jz]]
# [plot: u[10, jz], 10*error[6, jz] vs z[jz]]
# ----------------------------------------------------------------------------------------------------------------------------------------------
