# ----------------------------------------------------------------------------------------------------------------------------------------------
# EXAMPLE  9.33 : DSFM and RK solution for dp/dt = Λp  for second eigenvalue
# ----------------------------------------------------------------------------------------------------------------------------------------------
# Exact solution to compare
n := 2
F(t, x) := exp(-n^2*t)*sin(n*π*x)
N := 10
ORIGIN := 0
# tabulate evenly spaced grid in 1-D with step h for time t and variable r
F(0, 0) = 0
# Minimum and maximum value of the t range
tmax := 10
jt := 0 .. tmax
h := 0.1
t[jt] := jt*h
time := t
# read in eigenvector of first eigenvalue
eigenvec2 := READFILE("ze2.PRN", "delimited")
eigenvalue2 := -40.54414746
Λ := eigenvalue2/π^2
Λ = -4.10798
# exact value is -4
eigenvec2 = [0.285013; 0.832838; -0.419069; 0.0458254; -0.143907; 0.00934505; 0.139388; -0.0821034; 0.0215267]
# RK order 3 parameters
w[1] := 1/4
w[2] := 3/8
w[3] := 3/8
a21 := 2/3
a31 := 0
a32 := 2/3
c[1] := 0
c[2] := a21
c[1] := 0
c[2] := a21
c[3] := a31 + a32
# rows | columns
# Set index origin to 1 and set up matrix S in w = S t and note the change in starting value of the index
N := 9
k := 1 .. N
j := 1 .. N + 2
# Initialize to zero
S[k, j] := 0
# read in matrix S then inspect it
S := READFILE("S9.PRN", "delimited")
S = [
    0, -0.56419, 0, 0.56419, 0, 0, 0, 0, 0, 0, 0;
    0, -0.325735, 0, -0.325735, 0, 0.65147, 0, 0, 0, 0, 0;
    0, -0.230329, 0, -0.230329, 0, -0.230329, 0, 0.690988, 0, 0, 0;
    0, -0.178412, 0, -0.178412, 0, -0.178412, 0, -0.178412, 0, 0.71365, 0;
    0.409306, -0.163722, 0.409306, -0.163722, 0, -0.163722, 0, -0.163722, 0, -0.163722, 0;
    -0.270835, -0.120371, 0.300928, -0.120371, 0.571763, -0.120371, 0, -0.120371, 0, -0.120371, 0;
    0.0853853, -0.102462, -0.375695, -0.102462, 0.170771, -0.102462, 0.631851, -0.102462, 0, -0.102462, 0;
    -0.14647, -0.0901352, 0.112669, -0.0901352, -0.29294, -0.0901352, 0.112669, -0.0901352, 0.664747, -0.0901352, 0;
    0.0403508, -0.0807015, -0.242105, -0.0807015, 0.0807015, -0.0807015, -0.242105, -0.0807015, 0.0807015, -0.0807015, 0.685963
]
ORIGIN := 0
# Length of eigenvector p
Lvec := 9
l := 0 .. Lvec - 1
# initial value of vector p at t=0
p[l, 0] := eigenvec2[l]
# define right hand side
f(p) := Λ*p
# Perform RK iteration loop over p for jt=0,..,10 and store result in matrix  RK_u  using initial value
RK_p :=
    h ← 0.1
    for jt ∈ 0 .. 10
        for l ∈ 0 .. Lvec - 1
            R1[l, jt] ← h*f(p[l, jt])
            R2[l, jt] ← h*f(p[l, jt] + a21*R1[l, jt])
            R3[l, jt] ← h*f(p[l, jt] + a31*R1[l, jt] + a32*R2[l, jt])
            p[l, jt + 1] ← p[l, jt] + w[1]*R1[l, jt] + w[2]*R2[l, jt] + w[3]*R3[l, jt]
        t[jt + 1] ← (jt + 1)*h
    p
f(p[l, 0]) = [-1.17083; -3.42128; 1.72153; -0.18825; 0.591166; -0.0383893; -0.572605; 0.337279; -0.0884311]
t[1] = 0.1
t[2] = 0.2
t[3] = 0.3
t[4] = 0.4
RK_p[l, 1] = [0.188686; 0.55136; -0.277434; 0.0303375; -0.0952699; 0.00618666; 0.0922787; -0.0543545; 0.0142512]
RK_p[l, 2] = [0.124915; 0.365014; -0.183668; 0.0200842; -0.0630711; 0.00409573; 0.0610908; -0.0359841; 0.00943466]
RK_p[l, 3] = [0.0826966; 0.241649; -0.121593; 0.0132963; -0.0417547; 0.00271147; 0.0404437; -0.0238224; 0.00624598]
RK_p[l, 4] = [0.0547473; 0.159978; -0.0804977; 0.00880247; -0.0276427; 0.00179506; 0.0267747; -0.015771; 0.004135]
# to compare to the exact values the orthonormal set of spectral functions w(x) for rank N=9 are needed and these are computed from the basis set t(x) as follows
# Define Chebyshev Polynomials
T0(x) := 1
T1(x) := x
T2(x) := 2*x^2 - 1
T3(x) := 4*x^3 - 3*x
T4(x) := 8*x^4 - 8*x^2 + 1
T5(x) := 16*x^5 - 20*x^3 + 5*x
T6(x) := 32*x^6 - 48*x^4 + 18*x^2 - 1
T7(x) := 64*x^7 - 112*x^5 + 56*x^3 - 7*x
T8(x) := 128*x^8 - 256*x^6 + 160*x^4 - 32*x^2 + 1
T9(x) := 256*x^9 - 576*x^7 + 432*x^5 - 120*x^3 + 9*x
T10(x) := 512*x^10 - 1280*x^8 + 1120*x^6 - 400*x^4 + 50*x^2 - 1
T11(x) := 1024*x^11 - 2816*x^9 + 2816*x^7 - 1232*x^5 + 220*x^3 - 11*x
# set up grid in x for plots: showing the range [0,1]
ORIGIN := 1
# Minimum and maximum value of the range
xmin := 0
xmax := 1
# for plots set argument range
imax := 101
i := 1 .. imax
x[i] := xmin + (i - 1)*(xmax - xmin)/(imax - 1)
# Define basis functions t(x) on this grid
t[1, i] := T0(x[i])
t[2, i] := T1(x[i])
t[3, i] := T2(x[i])
t[4, i] := T3(x[i])
t[5, i] := T4(x[i])
t[6, i] := T5(x[i])
t[7, i] := T6(x[i])
t[8, i] := T7(x[i])
t[9, i] := T8(x[i])
t[10, i] := T9(x[i])
t[11, i] := T10(x[i])
# For the DSFM use shifted Chebyshev polynomials Tm*(x)=Tm(2x-1), Tm*(0)=(-1)^m on a time grid
# Minimum and maximum value of the time range
ymin := 0
ymax := 1
# for plots set time grid range
iymax := 11
it := 1 .. iymax
y[it] := ymin + (it - 1)*(ymax - ymin)/(iymax - 1)
# time grid steps are
y[1] = 0
y[2] = 0.1
y[3] = 0.2
y[4] = 0.3
y[5] = 0.4
y[6] = 0.5
y[7] = 0.6
y[8] = 0.7
y[9] = 0.8
y[10] = 0.9
y[11] = 1
ts[1, it] := T0(2*y[it] - 1)
ts[2, it] := T1(2*y[it] - 1)
ts[3, it] := T2(2*y[it] - 1)
ts[4, it] := T3(2*y[it] - 1)
ts[5, it] := T4(2*y[it] - 1)
ts[6, it] := T5(2*y[it] - 1)
ts[7, it] := T6(2*y[it] - 1)
ts[8, it] := T7(2*y[it] - 1)
ts[9, it] := T8(2*y[it] - 1)
ts[10, it] := T9(2*y[it] - 1)
ts[11, it] := T10(2*y[it] - 1)
# Recurrence for P coefficients on the grid with inhomogeneous term Q=0
M := 10
m := M, M - 1 .. 2
P[2, M + 1] := 0
P[2, M] := 1
Q[2, m] := 0
Q[2, M + 1] := 0
Q[2, 1] := 0
Q[2, 2] := 0
P[2, m - 1] := 4*(m - 1)/Λ*P[2, m] + P[2, m + 1] + 1/Λ*(Q[2, m - 1] - Q[2, m + 1])
# normalize the P coefficients: normalization with constant at t=0 is e^(-4t) = 1
pz0 := 0.5*P[2, 1] + sum((-1)^(m - 1)*P[2, m], m = 2 .. M)
m := 1 .. M
P[2, m] := P[2, m]/pz0
pz0 = -991113
# normalized coefficient values are for a series in shifted Chebyshev polynomials
# e^(-4t)
P[2, m] = [0.607174; -0.428934; 0.189514; -0.0598697; 0.0146258; -0.00290446; 0.000485183; -6.98857e-5; 8.84201e-6; -1.00897e-6]
FC[it] := 0.5*P[2, 1]*ts[1, it] + sum(P[2, m]*ts[m, it], m = 2 .. M)
# Form the orthonormal basis w(x) in functions space using input coefficients in matrix S from the modified Gram-Schmidt (MGS) algorithm, for  n = 1,2, ... , N, note index ranges are set above for k = rows, j = columns.
n := 1 .. 9
w[n, i] := sum(S[n, j]*t[j, i], j)
# show plots of the predicted values of the DSFM and RK solution in the range x=[0,1] from the calculation at one time step together with the absolute error curve when compared to the exact value
# note that the error curve has been scaled by 10 on the plots with a sample at the quarter point in x
# DSFM solution
time[6] = 0.5
x[26] = 0.25
Fsalc[i] := sum(FC[6]*eigenvec2[n]*w[n, i], n)
error[i] := |F(time[6], x[i]) - Fsalc[i]|
F(time[6], x[26]) = 0.135335
Fsalc[26] = 0.126013
error[26] = 0.0093222
error[26]*F(time[6], x[26])^-1 = 0.0688823
# [plot: Fsalc[i], 10*error[i] vs x[i]]
# RK solution
Fcalc[i] := sum(RK_p[n, 6]*w[n, i], n)
error[i] := |F(time[6], x[i]) - Fcalc[i]|
F(time[6], x[26]) = 0.135335
Fcalc[26] = 0.124976
error[26] = 0.0103597
error[26]*F(time[6], x[26])^-1 = 0.0765482
# [plot: Fcalc[i], 10*error[i] vs x[i]]
# Exact value and difference of DSFM versus RK scaled by 10^2
error[i] := |Fsalc[i] - Fcalc[i]|
Fsalc[26] = 0.126013
Fcalc[26] = 0.124976
error[26] = 0.00103748
error[26]*F(time[6], x[26])^-1 = 0.00766599
# [plot: 100*error[i], F(time[6], x[i]) vs x[i]]
# ----------------------------------------------------------------------------------------------------------------------------------------------
