# ----------------------------------------------------------------------------------------------------------------------------------------------
# EXAMPLE  9.34 : DSFM and RK solution for dp/dt = p+q  for first eigenvalue of problem 4
# ----------------------------------------------------------------------------------------------------------------------------------------------
# Exact solution to compare
N := 10
ORIGIN := 0
F(t, x) := (1 - exp(-t))*sin(π*x)
# inhomogeneous term
Q(x) := sin(π*x)
# tabulate evenly spaced grid in 1-D with step h for time t and variable r
F(0, 0) = 0
# Minimum and maximum value of the t range
tmax := 10
jt := 0 .. tmax
h := 0.1
t[jt] := jt*h
time := t
# read in eigenvector of first eigenvalue
eigenvec1 := READFILE("ze1.PRN", "delimited")
eigenvalue1 := -9.87032891
Λ := eigenvalue1/π^2
Λ = -1.00007
# exact value is -1
eigenvec1 = [-0.989875; 0.141668; -0.00882975; 0.000336937; 0.000375836; -0.000439026; 0.000160811; -6.22928e-5; 1.86233e-5]
# RK order 3 parameters
w[1] := 1/4
w[2] := 3/8
w[3] := 3/8
a21 := 2/3
a31 := 0
a32 := 2/3
c[1] := 0
c[2] := a21
c[1] := 0
c[2] := a21
c[3] := a31 + a32
# rows | columns
# Set index origin to 1 and set up matrix S in w = S t and note the change in starting value of the index
N := 9
k := 1 .. N
j := 1 .. N + 2
# Initialize to zero
S[k, j] := 0
# read in matrix S
S := READFILE("S9.PRN", "delimited")
# initial value of vector p at t=0
ORIGIN := 0  # Length of eigenvector p
Lvec := 9
l := 0 .. Lvec - 1
# value of inhomogeneous term on argument grid is same as spectral resolution of problem P1 sin(r) so its representation in spectral space has the same eigenvector
q[l] := eigenvec1[l]
p[l, 0] := 0
# define right hand side
f(p, q) := Λ*p + q
# Perform RK iteration loop over p for jt=0,..,10 and store result in matrix  RK_u  using initial value
RK_p :=
    h ← 0.1
    for jt ∈ 0 .. 10
        for l ∈ 0 .. Lvec - 1
            R1[l, jt] ← h*f(p[l, jt], q[l])
            R2[l, jt] ← h*f(p[l, jt] + a21*R1[l, jt], q[l])
            R3[l, jt] ← h*f(p[l, jt] + a31*R1[l, jt] + a32*R2[l, jt], q[l])
            p[l, jt + 1] ← p[l, jt] + w[1]*R1[l, jt] + w[2]*R2[l, jt] + w[3]*R3[l, jt]
        t[jt + 1] ← (jt + 1)*h
    p
f(p[l, 0], q[l]) = [-0.989875; 0.141668; -0.00882975; 0.000336937; 0.000375836; -0.000439026; 0.000160811; -6.22928e-5; 1.86233e-5]
# to compare to the exact values the orthonormal set of spectral functions w(x) for rank N=9 are needed and these are computed from the basis set t(x) as follows
# Define Chebyshev Polynomials
T0(x) := 1
T1(x) := x
T2(x) := 2*x^2 - 1
T3(x) := 4*x^3 - 3*x
T4(x) := 8*x^4 - 8*x^2 + 1
T5(x) := 16*x^5 - 20*x^3 + 5*x
T6(x) := 32*x^6 - 48*x^4 + 18*x^2 - 1
T7(x) := 64*x^7 - 112*x^5 + 56*x^3 - 7*x
T8(x) := 128*x^8 - 256*x^6 + 160*x^4 - 32*x^2 + 1
T9(x) := 256*x^9 - 576*x^7 + 432*x^5 - 120*x^3 + 9*x
T10(x) := 512*x^10 - 1280*x^8 + 1120*x^6 - 400*x^4 + 50*x^2 - 1
T11(x) := 1024*x^11 - 2816*x^9 + 2816*x^7 - 1232*x^5 + 220*x^3 - 11*x
# set up grid in x for plots: showing the range [0,1]
ORIGIN := 1
# Minimum and maximum value of the range
xmin := 0
xmax := 1
# for plots set argument range
imax := 101
i := 1 .. imax
x[i] := xmin + (i - 1)*(xmax - xmin)/(imax - 1)
# Define basis functions t(x) on this grid
t[1, i] := T0(x[i])
t[2, i] := T1(x[i])
t[3, i] := T2(x[i])
t[4, i] := T3(x[i])
t[5, i] := T4(x[i])
t[6, i] := T5(x[i])
t[7, i] := T6(x[i])
t[8, i] := T7(x[i])
t[9, i] := T8(x[i])
t[10, i] := T9(x[i])
t[11, i] := T10(x[i])
# For the DSFM use shifted Chebyshev polynomials Tm*(x)=Tm(2x-1), Tm*(0)=(-1)^m on a time grid
# Minimum and maximum value of the time range
ymin := 0
ymax := 1
# for plots set time grid range
iymax := tmax + 1
it := 1 .. iymax
y[it] := ymin + (it - 1)*(ymax - ymin)/(iymax - 1)
# time grid steps are where the shifted Chebyshev polynomials are evaluated
y[1] = 0
y[2] = 0.1
y[3] = 0.2
y[4] = 0.3
y[5] = 0.4
y[6] = 0.5
y[7] = 0.6
y[8] = 0.7
y[9] = 0.8
y[10] = 0.9
y[11] = 1
ts[1, it] := T0(2*y[it] - 1)
ts[2, it] := T1(2*y[it] - 1)
ts[3, it] := T2(2*y[it] - 1)
ts[4, it] := T3(2*y[it] - 1)
ts[5, it] := T4(2*y[it] - 1)
ts[6, it] := T5(2*y[it] - 1)
ts[7, it] := T6(2*y[it] - 1)
ts[8, it] := T7(2*y[it] - 1)
ts[9, it] := T8(2*y[it] - 1)
ts[10, it] := T9(2*y[it] - 1)
ts[11, it] := T10(2*y[it] - 1)
# Recurrence for P coefficients on the grid with inhomogeneous term Q=0
M := 10
m := M, M - 1 .. 2
P[1, M + 1] := 0
P[1, M] := 1
Q[1, m] := 0
Q[1, M + 1] := 0
Q[1, 1] := 0
Q[1, 3] := 0
P[1, m - 1] := 4*(m - 1)/Λ*P[1, m] + P[1, m + 1] + 1/Λ*(Q[1, m - 1] - Q[1, m + 1])
# normalize the P coefficients: normalization with constant at t=0 is e^(-t) = 1
pz0 := 0.5*P[1, 1] + sum((-1)^(m - 1)*P[1, m], m = 2 .. M)
m := 1 .. M
P[1, m] := P[1, m]/pz0
pz0 = -7.78277e10
# add the coefficient for the inhomogeneous term
# normalized coefficient values are for a series in shifted Chebyshev polynomials with the inhomogeneous term included
P[1, 1] := P[1, 1] - 2
P[1, m] = [-0.709965; -0.312855; 0.0387085; -0.00320928; 0.000199971; -9.97852e-6; 4.15185e-7; -1.48126e-8; 4.62526e-10; -1.28489e-11]
# evaluate the functions at the time grid points with the sign reversed
FC[it] := -0.5*P[1, 1]*ts[1, it] - sum(P[1, m]*ts[m, it], m = 2 .. M)
# Form the orthonormal basis w(x) in functions space using input coefficients in matrix S from the modified Gram-Schmidt (MGS) algorithm, for  n = 1,2, ... , N, note index ranges are set above for k = rows, j = columns.
n := 1 .. 9
w[n, i] := sum(S[n, j]*t[j, i], j)
# show plots of the predicted values of the DSFM and RK solution in the range x=[0,1] from the calculation at one time step together with the absolute error curve when compared to the exact value
# note that the error curve has been scaled by 10 on the plots with a sample at the midpoint in x
# DSFM solution
time[3] = 0.2
x[51] = 0.5
Fsalc[i] := sum(FC[3]*eigenvec1[n]*w[n, i], n)
error[i] := |F(time[3], x[i]) - Fsalc[i]|
# argument value for error tabulation
x[51] = 0.5
t2 := 1, 3 .. 11
m := 3, 5 .. 11
d[51, t2] := sum(FC[t2]*eigenvec1[n]*w[n, 51], n)
Aerr[51, t2] := |F(time[t2], x[51]) - d[51, t2]|
ratio[51, m] := Aerr[51, m]/F(time[m], x[51])
y[t2] = [0; 0.2; 0.4; 0.6; 0.8; 1]
d[51, t2] = [0; 0.163906; 0.298098; 0.407964; 0.497914; 0.571557]
F(time[t2], x[51]) = [0; 0.181269; 0.32968; 0.451188; 0.550671; 0.632121]
Aerr[51, t2] = [0; 0.0173636; 0.0315816; 0.043224; 0.0527572; 0.0605635]
ratio[51, m] = [0.0957887; 0.0957947; 0.0958002; 0.0958054; 0.0958101]
F(time[3], x[51]) = 0.181269
Fsalc[51] = 0.163906
error[51] = 0.0173636
error[51]*F(time[3], x[51])^-1 = 0.0957887
# [plot: Fsalc[i], 10*error[i] vs x[i]]
# RK solution
u[51, t2] := sum(RK_p[n, t2]*w[n, 51], n)
Aerr[51, t2] := |F(time[t2], x[51]) - u[51, t2]|
ratio[51, m] := Aerr[51, m]/F(time[m], x[51])
y[t2] = [0; 0.2; 0.4; 0.6; 0.8; 1]
u[51, t2] = [0; 0.1639; 0.298087; 0.407948; 0.497892; 0.57153]
F(time[t2], x[51]) = [0; 0.181269; 0.32968; 0.451188; 0.550671; 0.632121]
Aerr[51, t2] = [0; 0.0173689; 0.0315925; 0.0432405; 0.0527791; 0.0605904]
ratio[51, m] = [0.0958182; 0.0958279; 0.0958368; 0.0958451; 0.0958527]
# RK solution at time
time[3] = 0.2
Fcalc[i] := sum(RK_p[n, 3]*w[n, i], n)
error[i] := |F(time[3], x[i]) - Fcalc[i]|
# [plot: Fcalc[i], 10*error[i] vs x[i]]
# Exact value and difference of DSFM versus RK scaled by 10^4
error[i] := |Fsalc[i] - Fcalc[i]|
# [plot: 10^4*error[i], F(time[3], x[i]) vs x[i]]
# DSFM solution
time[11] = 1
Fsalc[i] := sum(FC[11]*eigenvec1[n]*w[n, i], n)
error[i] := |F(time[11], x[i]) - Fsalc[i]|
# [plot: Fsalc[i], 10*error[i] vs x[i]]
# RK solution at time
time[11] = 1
Fcalc[i] := sum(RK_p[n, 11]*w[n, i], n)
error[i] := |F(time[11], x[i]) - Fcalc[i]|
# [plot: Fcalc[i], 10*error[i] vs x[i]]
# Exact value and difference of DSFM versus RK scaled by 10^4
error[i] := |Fsalc[i] - Fcalc[i]|
# [plot: 10^4*error[i], F(time[11], x[i]) vs x[i]]
# ----------------------------------------------------------------------------------------------------------------------------------------------
