# ----------------------------------------------------------------------------------------------------------------------------------------------
# EXAMPLE  9.35: Numerical solution for P6 (code at the end of Chapter 6  of Rektorys)
ORIGIN := 1
# ----------------------------------------------------------------------------------------------------------------------------------------------
# Minimum and maximum value of the x range
xmin := 0
xmax := 1
imax := 101
i := 1 .. imax
x[i] := xmin + (i - 1)*(xmax - xmin)/(imax - 1)
# initialize arrays and set time step increments
N := 11
j := 1 .. N
b[j] := 0
c[j] := 0
B :=
    for j ∈ 1 .. N
        S ← 0
        T ← 0
        for i ∈ 1 .. j
            S ← S + 4/3*b[i]^2 - 8/15*b[i]*c[i] + 36/35*c[i]^2
            T ← T - 4/15*b[i]^2 + 72/35*b[i]*c[i] + 4/9*c[i]^2
        b[j + 1] ← (50*b[j] + 0.02*j/π - 0.01*S/π)*2/(100 + π^2)
        c[j + 1] ← (50*c[j] + 0.02*j*1/(3*π) - 0.01*T/π)*2/(100 + 9*π^2)
        BB[1, j] ← b[j]
        BB[2, j] ← c[j]
    BB
# compute numerical coefficients from the code at end of Chapter 6 in Rektorys in a double loop: note that the error in the table there - the first nonzero values are for j=2 not j=1, and time=0.1 is for j=11 for the implied time step size value of h=0.01
# plot of solution on the interval [0,1]
i := 1 .. imax
# numerical solution is
# time
j := 1 .. N
z[i, j] := B[1, j]*sin(π*x[i]) + B[2, j]*sin(3*π*x[i])
# Coefficients for first 11 time steps
# tabulate the first 11 spatial values
k := 1 .. N
B[1, j] = [0; 0.000115886; 0.000337249; 0.000654613; 0.00105935; 0.00154362; 0.00210028; 0.00272281; 0.00340531; 0.00414239; 0.00492914]
B[2, j] = [0; 2.24764e-5; 5.68559e-5; 9.75392e-5; 0.000141561; 0.000187351; 0.000234077; 0.000281298; 0.000328783; 0.000376406; 0.000424104]
x[k] = [0; 0.01; 0.02; 0.03; 0.04; 0.05; 0.06; 0.07; 0.08; 0.09; 0.1]
z[k, 11] = [0; 0.00019474; 0.000388972; 0.000582194; 0.000773908; 0.000963626; 0.00115087; 0.00133519; 0.00151615; 0.00169331; 0.00186629]
# [plot: 1000*z[i, 11] vs x[i]]
# ----------------------------------------------------------------------------------------------------------------------------------------------
