# ----------------------------------------------------------------------------------------------------------------------------------------------
# EXAMPLE  9.36 : Nystrom order 4 formula for p" = Λp  for first eigenvalue
# ----------------------------------------------------------------------------------------------------------------------------------------------
# Exact solution to compare
n := 1
F(t, x) := cos(t)*sin(n*π*x)
N := 10
ORIGIN := 0
# tabulate evenly spaced grid in 1-D with step h for time t and variable r
# Minimum and maximum value of the t range
tmax := 62
jt := 0 .. tmax
h := 0.05
t[jt] := jt*h
time := t
# read in eigenvector of first eigenvalue
eigenvec1 := READFILE("ze1.PRN", "delimited")
eigenvalue1 := -9.87032891
Λ := eigenvalue1/π^2
Λ = -1.00007
# exact value is -1
eigenvec1 = [-0.989875; 0.141668; -0.00882975; 0.000336937; 0.000375836; -0.000439026; 0.000160811; -6.22928e-5; 1.86233e-5]
# Length of eigenvector p
Lvec := 9
l := 0 .. Lvec - 1
# initial value of vector p at t=0
p[l, 0] := eigenvec1[l]  # initial value of vector dp/dt at t=0
pp[l, 0] := 0
# define right hand side
# Nystrom order 4 parameters
wb[1] := 1/6
wb[2] := 1/3
wb[3] := 0
a21 := 1/8
a31 := 0
a32 := 1/2
wa[1] := 1/6
wa[2] := 2/3
wa[3] := 1/6
c[1] := 0
c[2] := 1/2
c[3] := 1
f(p) := Λ*p
# Perform iteration loop over p for jt and store result in matrix  N_p  using initial value
N_p :=
    h ← 0.05
    for jt ∈ 0 .. 126
        for l ∈ 0 .. Lvec - 1
            kp1[l, jt] ← f(p[l, jt])
            kp2[l, jt] ← f(p[l, jt] + c[2]*h*pp[l, jt] + h^2*a21*kp1[l, jt])
            kp3[l, jt] ← f(p[l, jt] + c[3]*h*pp[l, jt] + h^2*a32*kp2[l, jt])
            p[l, jt + 1] ← p[l, jt] + h*pp[l, jt] + h^2*(wb[1]*kp1[l, jt] + wb[2]*kp2[l, jt] + wb[3]*kp3[l, jt])
            pp[l, jt + 1] ← pp[l, jt] + h*(wa[1]*kp1[l, jt] + wa[2]*kp2[l, jt] + wa[3]*kp3[l, jt])
    p
# to compare to the exact values the orthonormal set of spectral functions w(x) for rank N=9 are needed and these are computed from the basis set t(x) as follows
# Define Chebyshev Polynomials
T0(x) := 1
T1(x) := x
T2(x) := 2*x^2 - 1
T3(x) := 4*x^3 - 3*x
T4(x) := 8*x^4 - 8*x^2 + 1
T5(x) := 16*x^5 - 20*x^3 + 5*x
T6(x) := 32*x^6 - 48*x^4 + 18*x^2 - 1
T7(x) := 64*x^7 - 112*x^5 + 56*x^3 - 7*x
T8(x) := 128*x^8 - 256*x^6 + 160*x^4 - 32*x^2 + 1
T9(x) := 256*x^9 - 576*x^7 + 432*x^5 - 120*x^3 + 9*x
T10(x) := 512*x^10 - 1280*x^8 + 1120*x^6 - 400*x^4 + 50*x^2 - 1
T11(x) := 1024*x^11 - 2816*x^9 + 2816*x^7 - 1232*x^5 + 220*x^3 - 11*x
# rows | columns
# Set index origin to 1
# and set up matrix S in w = S t and note the change in starting value of the index
ORIGIN := 1
N := 9
k := 1 .. N
j := 1 .. N + 2
# Initialize to zero
S[k, j] := 0
# set up grid in x for plots: showing the range [0,1]
# Minimum and maximum value of the range
xmin := 0
xmax := 1
# for plots set argument range
imax := 101
i := 1 .. imax
x[i] := xmin + (i - 1)*(xmax - xmin)/(imax - 1)
# Define basis functions t(x) on this grid
t[1, i] := T0(x[i])
t[2, i] := T1(x[i])
t[3, i] := T2(x[i])
t[4, i] := T3(x[i])
t[5, i] := T4(x[i])
t[6, i] := T5(x[i])
t[7, i] := T6(x[i])
t[8, i] := T7(x[i])
t[9, i] := T8(x[i])
t[10, i] := T9(x[i])
t[11, i] := T10(x[i])
# read matrix S then inspect it
S := READFILE("S9.PRN", "delimited")
S = [
    0, -0.56419, 0, 0.56419, 0, 0, 0, 0, 0, 0, 0;
    0, -0.325735, 0, -0.325735, 0, 0.65147, 0, 0, 0, 0, 0;
    0, -0.230329, 0, -0.230329, 0, -0.230329, 0, 0.690988, 0, 0, 0;
    0, -0.178412, 0, -0.178412, 0, -0.178412, 0, -0.178412, 0, 0.71365, 0;
    0.409306, -0.163722, 0.409306, -0.163722, 0, -0.163722, 0, -0.163722, 0, -0.163722, 0;
    -0.270835, -0.120371, 0.300928, -0.120371, 0.571763, -0.120371, 0, -0.120371, 0, -0.120371, 0;
    0.0853853, -0.102462, -0.375695, -0.102462, 0.170771, -0.102462, 0.631851, -0.102462, 0, -0.102462, 0;
    -0.14647, -0.0901352, 0.112669, -0.0901352, -0.29294, -0.0901352, 0.112669, -0.0901352, 0.664747, -0.0901352, 0;
    0.0403508, -0.0807015, -0.242105, -0.0807015, 0.0807015, -0.0807015, -0.242105, -0.0807015, 0.0807015, -0.0807015, 0.685963
]
# Form the orthonormal basis w(x) in functions space using input coefficients in matrix S from the modified Gram-Schmidt (MGS) algorithm, for  n = 1,2, ... , N, note index ranges are set above for k = rows, j = columns.
n := 1 .. 9
w[n, i] := sum(S[n, j]*t[j, i], j)
# show plots of the predicted values of the solution in the range x=[0,1] from the calculation at two times together with the absolute error scaled by 10 when comparing calculated and the exact value
m := 2
time[m] = 0.05
x[51] = 0.5
Fcalc[i] := sum(N_p[n, m]*w[n, i], n)
error[i] := |F(time[m], x[i]) - Fcalc[i]|
F(time[m], x[51]) = 0.99875
Fcalc[51] = 0.903021
error[51] = 0.095729
error[51]*F(time[m], x[51])^-1 = 0.0958488
# [plot: Fcalc[i], 10*error[i] vs x[i]]
m := 62
time[m] = 3.05
x[51] = 0.5
Fcalc[i] := sum(N_p[n, m]*w[n, i], n)
error[i] := |F(time[m], x[i]) - Fcalc[i]|
F(time[m], x[51]) = -0.995808
Fcalc[51] = -0.900371
error[51] = 0.0954377
error[51]*F(time[m], x[51])^-1 = -0.0958394
# [plot: Fcalc[i], -10*error[i] vs x[i]]
# tabulate evenly spaced grid in 1-D with step h for time t and variable x
# Minimum and maximum value of the t range
tmax := 63
jt := 1 .. tmax
wave[jt, i] := sum(N_p[n, jt]*w[n, i], n)
# [3D plot: wave]
# the 3-D perspective plot shows the magnitude in the vertical (z) axis, x axis on the right [0,1], and the time axis on the left for the time interval [0, π ]
# note that the extremum for x close to 0.5 at the end of the time interval is negative
# tabulate evenly spaced grid in 1-D with step h for time t and variable x
# Minimum and maximum value of the t range
tmax := 126
jt := 1 .. tmax
wave[jt, i] := sum(N_p[n, jt]*w[n, i], n)
# [3D plot: wave]
# the 3-D perspective plot shows the magnitude in the vertical (z) axis, x axis on the right [0,1], and the time axis on the left for the time interval [0, 2*π ] with the time axis twice that of the above figure
# note that the extremum for x close to 0.5 at the end of the time interval is positive
# ----------------------------------------------------------------------------------------------------------------------------------------------
