# ----------------------------------------------------------------------------------------------------------------------------------------------
# EXAMPLE  9.4: RK order 2 formula for du/dx = -u(x) for step sizes 0.1 and 0.05
# ----------------------------------------------------------------------------------------------------------------------------------------------
# Exact solution to compare
F(x) := exp(-x)
N := 20
ORIGIN := 0
# argument values and tabulate evenly spaced grid in 1-D with step h
imax := N
i := 0 .. imax + 1
j := 0 .. imax
k := 0, 2 .. 20
h := 0.1
x[i] := i*h  # given initial value (IV)
u[0] := 1
# initial argument value
x[0] := 0
# exact value
F(x[0]) = 1
# RK order 2 parameters
w[1] := 1/2
w[2] := 1/2
a21 := 1
c[1] := 0
c[2] := a21
# define right hand side
f(u) := -u
# check IV
f(u[0]) = -1
# Perform iteration loop over j=0,..,20 and store result in vector  RK_u on the grid
RK_u :=
    u[0] ← 1
    h ← 0.1
    for j ∈ 0 .. 20
        R1[j] ← h*f(u[j])
        R2[j] ← h*f(u[j] + a21*R1[j])
        u[j + 1] ← u[j] + w[1]*R1[j] + w[2]*R2[j]
        x[j + 1] ← (j + 1)*h
    u
# inspect the error at selected argument values
error[j + 1] := |F(x[j + 1]) - RK_u[j + 1]|
rel_err[j + 1] := error[j + 1]*(F(x[j + 1])^-1)
# RK estimate | exact value | absolute error | relative error
x[k] = [0; 0.2; 0.4; 0.6; 0.8; 1; 1.2; 1.4; 1.6; 1.8; 2]
RK_u[k] = [1; 0.819025; 0.670802; 0.549404; 0.449975; 0.368541; 0.301844; 0.247218; 0.202478; 0.165834; 0.135822]
F(x[k]) = [1; 0.818731; 0.67032; 0.548812; 0.449329; 0.367879; 0.301194; 0.246597; 0.201897; 0.165299; 0.135335]
error[k] = [0; 0.000294247; 0.000481905; 0.000591932; 0.000646293; 0.000661544; 0.000650068; 0.000621048; 0.000581214; 0.000535436; 0.000487174]
rel_err[k] = [0; 0.000359394; 0.000718917; 0.00107857; 0.00143835; 0.00179826; 0.0021583; 0.00251847; 0.00287877; 0.0032392; 0.00359976]
# [plot: error[j] vs x[j]]
# the error on a log scale grows as the argument increases then levels off
# Repeat for half the step size
RK_u :=
    u[0] ← 1
    h ← 0.05
    for j ∈ 0 .. 20
        R1[j] ← h*f(u[j])
        R2[j] ← h*f(u[j] + a21*R1[j])
        u[j + 1] ← u[j] + w[1]*R1[j] + w[2]*R2[j]
        x[j + 1] ← (j + 1)*h
    u
h := 0.05
x[i] := i*h
error[j + 1] := |F(x[j + 1]) - RK_u[j + 1]|
# Perform iteration loop over j=0,..,20 and store result in vector  RK_u on the grid
# inspect the error at selected argument values
rel_err[j + 1] := error[j + 1]*(F(x[j + 1])^-1)
# RK estimate | exact value | absolute error | relative error
x[k] = [0; 0.1; 0.2; 0.3; 0.4; 0.5; 0.6; 0.7; 0.8; 0.9; 1]
RK_u[k] = [1; 0.904877; 0.818802; 0.740914; 0.670436; 0.606662; 0.548954; 0.496736; 0.449484; 0.406728; 0.368039]
F(x[k]) = [1; 0.904837; 0.818731; 0.740818; 0.67032; 0.606531; 0.548812; 0.496585; 0.449329; 0.40657; 0.367879]
error[k] = [0; 3.91445e-5; 7.08403e-5; 9.61505e-5; 0.000116003; 0.000131208; 0.000142469; 0.0001504; 0.000155532; 0.000158326; 0.000159181]
rel_err[k] = [0; 4.32613e-5; 8.65245e-5; 0.00012979; 0.000173057; 0.000216325; 0.000259596; 0.000302869; 0.000346143; 0.000389419; 0.000432697]
# [plot: error[j] vs x[j]]
# compare the error on a log scale at half the step size h on the same interval [0,1]
# the the relative error at x=1 is approximately four times smaller at half the step size
# ----------------------------------------------------------------------------------------------------------------------------------------------
