# ----------------------------------------------------------------------------------------------------------------------------------------------
# EXAMPLE  9.5: RK order 2 formula for du/dx = u(x) for step sizes 0.1 and 0.05
# ----------------------------------------------------------------------------------------------------------------------------------------------
# Exact solution to compare
F(x) := exp(x)
N := 20
ORIGIN := 0
# argument values and tabulate evenly spaced grid in 1-D with step h
imax := N
i := 0 .. imax + 1
j := 0 .. imax
k := 0, 2 .. 20
h := 0.1
x[i] := i*h  # given initial value (IV)
u[0] := 1
# initial argument value
x[0] := 0
# exact value
F(x[0]) = 1
# RK order 2 parameters
w[1] := 1/2
w[2] := 1/2
a21 := 1
c[1] := 0
c[2] := a21
# define right hand side
f(u) := u
# check IV
f(u[0]) = 1
# Perform iteration loop over j=0,..,20 and store result in vector  RK_u on the grid
RK_u :=
    u[0] ← 1
    h ← 0.1
    for j ∈ 0 .. 20
        R1[j] ← h*f(u[j])
        R2[j] ← h*f(u[j] + a21*R1[j])
        u[j + 1] ← u[j] + w[1]*R1[j] + w[2]*R2[j]
        x[j + 1] ← (j + 1)*h
    u
# inspect the error at selected argument values
error[j + 1] := |F(x[j + 1]) - RK_u[j + 1]|
rel_err[j + 1] := error[j + 1]*(F(x[j + 1])^-1)
# RK estimate | exact value | absolute error | relative error
x[k] = [0; 0.2; 0.4; 0.6; 0.8; 1; 1.2; 1.4; 1.6; 1.8; 2]
RK_u[k] = [1; 1.22103; 1.4909; 1.82043; 2.22279; 2.71408; 3.31396; 4.04643; 4.94079; 6.03283; 7.36623]
F(x[k]) = [1; 1.2214; 1.49182; 1.82212; 2.22554; 2.71828; 3.32012; 4.0552; 4.95303; 6.04965; 7.38906]
error[k] = [0; 0.000377758; 0.000922647; 0.00169012; 0.002752; 0.00420098; 0.00615636; 0.00877127; 0.0122418; 0.0168186; 0.0228213]
rel_err[k] = [0; 0.000309282; 0.000618469; 0.00092756; 0.00123656; 0.00154545; 0.00185426; 0.00216297; 0.00247158; 0.0027801; 0.00308852]
# [plot: error[j] vs x[j]]
# the error on a log scale grows as the argument increases then levels off
# Repeat for half the step size
RK_u :=
    u[0] ← 1
    h ← 0.05
    for j ∈ 0 .. 20
        R1[j] ← h*f(u[j])
        R2[j] ← h*f(u[j] + a21*R1[j])
        u[j + 1] ← u[j] + w[1]*R1[j] + w[2]*R2[j]
        x[j + 1] ← (j + 1)*h
    u
h := 0.05
x[i] := i*h
error[j + 1] := |F(x[j + 1]) - RK_u[j + 1]|
# Perform iteration loop over j=0,..,20 and store result in vector  RK_u on the grid
# inspect the error at selected argument values
rel_err[j + 1] := error[j + 1]*(F(x[j + 1])^-1)
# RK estimate | exact value | absolute error | relative error
x[k] = [0; 0.1; 0.2; 0.3; 0.4; 0.5; 0.6; 0.7; 0.8; 0.9; 1]
RK_u[k] = [1; 1.10513; 1.2213; 1.3497; 1.49159; 1.64839; 1.82168; 2.01319; 2.22483; 2.45871; 2.71719]
F(x[k]) = [1; 1.10517; 1.2214; 1.34986; 1.49182; 1.64872; 1.82212; 2.01375; 2.22554; 2.4596; 2.71828]
error[k] = [0; 4.43556e-5; 9.8039e-5; 0.000162522; 0.000239481; 0.000330827; 0.000438736; 0.00056568; 0.000714469; 0.000888294; 0.00109077]
rel_err[k] = [0; 4.01346e-5; 8.02676e-5; 0.000120399; 0.000160529; 0.000200657; 0.000240783; 0.000280908; 0.000321032; 0.000361153; 0.000401273]
# [plot: error[j] vs x[j]]
# compare the error on a log scale at half the step size h on the same interval [0,1]
# the the relative error at x=1 is approximately four times smaller at half the step size
# ----------------------------------------------------------------------------------------------------------------------------------------------
