# ----------------------------------------------------------------------------------------------------------------------------------------------
# EXAMPLE  9.6: RK order 2 formula for du/dx = 1-u(x) for step sizes 0.1 and 0.05
# ----------------------------------------------------------------------------------------------------------------------------------------------
# Exact solution to compare
F(x) := 1 - exp(-x)
N := 20
ORIGIN := 0
# argument values and tabulate evenly spaced grid in 1-D with step h
imax := N
i := 0 .. imax + 1
j := 0 .. imax
k := 0, 2 .. 20
h := 0.1
x[i] := i*h  # given initial value (IV)
u[0] := 0
# initial argument value
x[0] := 0
# exact value
F(x[0]) = 0
# RK order three parameters
w[1] := 1/2
w[2] := 1/2
a21 := 1
c[1] := 0
c[2] := a21
# define right hand side
f(u) := 1 - u
# check IV
f(u[0]) = 1
# Perform iteration loop over j=0,..,20 and store result in vector  RK_u on the grid
RK_u :=
    u[0] ← 0
    h ← 0.1
    for j ∈ 0 .. 20
        R1[j] ← h*f(u[j])
        R2[j] ← h*f(u[j] + a21*R1[j])
        u[j + 1] ← u[j] + w[1]*R1[j] + w[2]*R2[j]
        x[j + 1] ← (j + 1)*h
    u
# inspect the error at selected argument values
j := 0 .. imax
error[j + 1] := |F(x[j + 1]) - RK_u[j + 1]|
rel_err[j + 1] := error[j + 1]*(F(x[j + 1])^-1)
# RK estimate | exact value | absolute error | relative error
x[k] = [0; 0.2; 0.4; 0.6; 0.8; 1; 1.2; 1.4; 1.6; 1.8; 2]
RK_u[k] = [0; 0.180975; 0.329198; 0.450596; 0.550025; 0.631459; 0.698156; 0.752782; 0.797522; 0.834166; 0.864178]
F(x[k]) = [0; 0.181269; 0.32968; 0.451188; 0.550671; 0.632121; 0.698806; 0.753403; 0.798103; 0.834701; 0.864665]
error[k] = [0; 0.000294247; 0.000481905; 0.000591932; 0.000646293; 0.000661544; 0.000650068; 0.000621048; 0.000581214; 0.000535436; 0.000487174]
rel_err[k] = [0; 0.00162326; 0.00146173; 0.00131194; 0.00117365; 0.00104655; 0.000930256; 0.000824323; 0.000728244; 0.00064147; 0.000563426]
# [plot: error[j] vs x[j]]
# the error on a log scale grows as the argument increases then levels off
# Repeat for half the step size
RK_u :=
    u[0] ← 0
    h ← 0.05
    for j ∈ 0 .. 20
        R1[j] ← h*f(u[j])
        R2[j] ← h*f(u[j] + a21*R1[j])
        u[j + 1] ← u[j] + w[1]*R1[j] + w[2]*R2[j]
        x[j + 1] ← (j + 1)*h
    u
h := 0.05
x[i] := i*h
error[j + 1] := |F(x[j + 1]) - RK_u[j + 1]|
# Perform iteration loop over j=0,..,20 and store result in vector  RK_u on the grid
# inspect the error at selected argument values
rel_err[j + 1] := error[j + 1]*(F(x[j + 1])^-1)
# RK estimate | exact value | absolute error | relative error
x[k] = [0; 0.1; 0.2; 0.3; 0.4; 0.5; 0.6; 0.7; 0.8; 0.9; 1]
RK_u[k] = [0; 0.0951234; 0.181198; 0.259086; 0.329564; 0.393338; 0.451046; 0.503264; 0.550516; 0.593272; 0.631961]
F(x[k]) = [0; 0.0951626; 0.181269; 0.259182; 0.32968; 0.393469; 0.451188; 0.503415; 0.550671; 0.59343; 0.632121]
error[k] = [0; 3.91445e-5; 7.08403e-5; 9.61505e-5; 0.000116003; 0.000131208; 0.000142469; 0.0001504; 0.000155532; 0.000158326; 0.000159181]
rel_err[k] = [0; 0.000411343; 0.000390801; 0.000370977; 0.000351866; 0.000333464; 0.000315765; 0.00029876; 0.000282441; 0.000266798; 0.00025182]
# [plot: error[j] vs x[j]]
# compare the error on a log scale at half the step size h on the same interval [0,1]
# the the relative error at x=1 is approximately four times smaller at half the step size
# ----------------------------------------------------------------------------------------------------------------------------------------------
