# ----------------------------------------------------------------------------------------------------------------------------------------------
# EXAMPLE  9.7: RK order 3 formula for du/dx = -u(x) for step sizes 0.1 and 0.05
# ----------------------------------------------------------------------------------------------------------------------------------------------
# Exact solution to compare
F(x) := exp(-x)
N := 20
ORIGIN := 0
# argument values and tabulate evenly spaced grid in 1-D with step h
imax := N
i := 0 .. imax + 1
j := 0 .. imax
k := 0, 2 .. 20
h := 0.1
x[i] := i*h  # given initial value (IV)
u[0] := 1
# initial argument value
x[0] := 0
# exact value
F(x[0]) = 1
# RK order 3 parameters
w[1] := 1/4
w[2] := 3/8
w[3] := 3/8
a21 := 2/3
a31 := 0
a32 := 2/3
c[1] := 0
c[2] := a21
# define right hand side
f(u) := -u
# check IV
f(u[0]) = -1
c[1] := 0
c[2] := a21
c[3] := a31 + a32
# Perform iteration loop over j=0,..,20 and store result in vector  RK_u on the grid
RK_u :=
    u[0] ← 1
    h ← 0.1
    for j ∈ 0 .. 20
        R1[j] ← h*f(u[j])
        R2[j] ← h*f(u[j] + a21*R1[j])
        R3[j] ← h*f(u[j] + a31*R1[j] + a32*R2[j])
        u[j + 1] ← u[j] + w[1]*R1[j] + w[2]*R2[j] + w[3]*R3[j]
        x[j + 1] ← (j + 1)*h
    u
# inspect the error at selected argument values
error[j + 1] := |F(x[j + 1]) - RK_u[j + 1]|
rel_err[j + 1] := error[j + 1]*(F(x[j + 1])^-1)
# RK estimate | exact value | absolute error | relative error
x[k] = [0; 0.2; 0.4; 0.6; 0.8; 1; 1.2; 1.4; 1.6; 1.8; 2]
RK_u[k] = [1; 0.818723; 0.670308; 0.548797; 0.449313; 0.367863; 0.301178; 0.246581; 0.201882; 0.165285; 0.135323]
F(x[k]) = [1; 0.818731; 0.67032; 0.548812; 0.449329; 0.367879; 0.301194; 0.246597; 0.201897; 0.165299; 0.135335]
error[k] = [0; 7.39197e-6; 1.2104e-5; 1.48648e-5; 1.6227e-5; 1.66068e-5; 1.63157e-5; 1.55845e-5; 1.45822e-5; 1.34312e-5; 1.22183e-5]
rel_err[k] = [0; 9.02857e-6; 1.80571e-5; 2.70855e-5; 3.61138e-5; 4.5142e-5; 5.41702e-5; 6.31983e-5; 7.22263e-5; 8.12542e-5; 9.0282e-5]
# [plot: error[j] vs x[j]]
# the error on a log scale grows as the argument increases then levels off
# Repeat for half the step size
RK_u :=
    u[0] ← 1
    h ← 0.05
    for j ∈ 0 .. 20
        R1[j] ← h*f(u[j])
        R2[j] ← h*f(u[j] + a21*R1[j])
        R3[j] ← h*f(u[j] + a31*R1[j] + a32*R2[j])
        u[j + 1] ← u[j] + w[1]*R1[j] + w[2]*R2[j] + w[3]*R3[j]
        x[j + 1] ← (j + 1)*h
    u
h := 0.05
x[i] := i*h
error[j + 1] := |F(x[j + 1]) - RK_u[j + 1]|
# Perform iteration loop over j=0,..,20 and store result in vector  RK_u on the grid
# inspect the error at selected argument values
rel_err[j + 1] := error[j + 1]*(F(x[j + 1])^-1)
# RK estimate | exact value | absolute error | relative error
x[k] = [0; 0.1; 0.2; 0.3; 0.4; 0.5; 0.6; 0.7; 0.8; 0.9; 1]
RK_u[k] = [1; 0.904837; 0.81873; 0.740817; 0.670319; 0.606529; 0.54881; 0.496583; 0.449327; 0.406568; 0.367877]
F(x[k]) = [1; 0.904837; 0.818731; 0.740818; 0.67032; 0.606531; 0.548812; 0.496585; 0.449329; 0.40657; 0.367879]
error[k] = [0; 4.90519e-7; 8.87679e-7; 1.20481e-6; 1.45354e-6; 1.64402e-6; 1.78508e-6; 1.88441e-6; 1.94867e-6; 1.98363e-6; 1.99429e-6]
rel_err[k] = [0; 5.42107e-7; 1.08421e-6; 1.62632e-6; 2.16843e-6; 2.71053e-6; 3.25264e-6; 3.79474e-6; 4.33685e-6; 4.87895e-6; 5.42106e-6]
# [plot: error[j] vs x[j]]
# compare the error on a log scale at half the step size h on the same interval [0,1]
# the the relative error at x=1 is approximately eight times smaller at half the step size
# ----------------------------------------------------------------------------------------------------------------------------------------------
