# ----------------------------------------------------------------------------------------------------------------------------------------------
# EXAMPLE  9.8: RK order 3 formula for du/dx = u(x) for step sizes 0.1 and 0.05
# ----------------------------------------------------------------------------------------------------------------------------------------------
# Exact solution to compare
F(x) := exp(x)
N := 20
ORIGIN := 0
# argument values and tabulate evenly spaced grid in 1-D with step h
imax := N
i := 0 .. imax + 1
j := 0 .. imax
k := 0, 2 .. 20
h := 0.1
x[i] := i*h  # given initial value (IV)
u[0] := 1
# initial argument value
x[0] := 0
# exact value
F(x[0]) = 1
# RK order 3 parameters
w[1] := 1/4
w[2] := 3/8
w[3] := 3/8
a21 := 2/3
a31 := 0
a32 := 2/3
c[1] := 0
c[2] := a21
# define right hand side
f(u) := u
# check IV
f(u[0]) = 1
c[1] := 0
c[2] := a21
c[3] := a31 + a32
# Perform iteration loop over j=0,..,20 and store result in vector  RK_u on the grid
RK_u :=
    u[0] ← 1
    h ← 0.1
    for j ∈ 0 .. 20
        R1[j] ← h*f(u[j])
        R2[j] ← h*f(u[j] + a21*R1[j])
        R3[j] ← h*f(u[j] + a31*R1[j] + a32*R2[j])
        u[j + 1] ← u[j] + w[1]*R1[j] + w[2]*R2[j] + w[3]*R3[j]
        x[j + 1] ← (j + 1)*h
    u
# inspect the error at selected argument values
error[j + 1] := |F(x[j + 1]) - RK_u[j + 1]|
rel_err[j + 1] := error[j + 1]*(F(x[j + 1])^-1)
# RK estimate | exact value | absolute error | relative error
x[k] = [0; 0.2; 0.4; 0.6; 0.8; 1; 1.2; 1.4; 1.6; 1.8; 2]
RK_u[k] = [1; 1.22139; 1.4918; 1.82208; 2.22547; 2.71818; 3.31996; 4.05498; 4.95273; 6.04923; 7.38849]
F(x[k]) = [1; 1.2214; 1.49182; 1.82212; 2.22554; 2.71828; 3.32012; 4.0552; 4.95303; 6.04965; 7.38906]
error[k] = [0; 9.39705e-6; 2.29551e-5; 4.20559e-5; 6.84894e-5; 0.000104566; 0.00015326; 0.00021839; 0.000304847; 0.000418882; 0.000568469]
rel_err[k] = [0; 7.69365e-6; 1.53872e-5; 2.30808e-5; 3.07743e-5; 3.84677e-5; 4.6161e-5; 5.38543e-5; 6.15476e-5; 6.92407e-5; 7.69339e-5]
# [plot: error[j] vs x[j]]
# the error on a log scale grows as the argument increases then levels off
# Repeat for half the step size
RK_u :=
    u[0] ← 1
    h ← 0.05
    for j ∈ 0 .. 20
        R1[j] ← h*f(u[j])
        R2[j] ← h*f(u[j] + a21*R1[j])
        R3[j] ← h*f(u[j] + a31*R1[j] + a32*R2[j])
        u[j + 1] ← u[j] + w[1]*R1[j] + w[2]*R2[j] + w[3]*R3[j]
        x[j + 1] ← (j + 1)*h
    u
h := 0.05
x[i] := i*h
error[j + 1] := |F(x[j + 1]) - RK_u[j + 1]|
# Perform iteration loop over j=0,..,20 and store result in vector  RK_u on the grid
# inspect the error at selected argument values
rel_err[j + 1] := error[j + 1]*(F(x[j + 1])^-1)
# RK estimate | exact value | absolute error | relative error
x[k] = [0; 0.1; 0.2; 0.3; 0.4; 0.5; 0.6; 0.7; 0.8; 0.9; 1]
RK_u[k] = [1; 1.10517; 1.2214; 1.34986; 1.49182; 1.64872; 1.82211; 2.01375; 2.22553; 2.45959; 2.71827]
F(x[k]) = [1; 1.10517; 1.2214; 1.34986; 1.49182; 1.64872; 1.82212; 2.01375; 2.22554; 2.4596; 2.71828]
error[k] = [0; 5.53058e-7; 1.22245e-6; 2.02652e-6; 2.9862e-6; 4.12533e-6; 5.47103e-6; 7.05415e-6; 8.90977e-6; 1.10777e-5; 1.3603e-5]
rel_err[k] = [0; 5.00428e-7; 1.00086e-6; 1.50128e-6; 2.00171e-6; 2.50214e-6; 3.00256e-6; 3.50299e-6; 4.00342e-6; 4.50384e-6; 5.00427e-6]
# [plot: error[j] vs x[j]]
# compare the error on a log scale at half the step size h on the same interval [0,1]
# the the relative error at x=1 is more than 7 times smaller at half the step size
# ----------------------------------------------------------------------------------------------------------------------------------------------
