# ----------------------------------------------------------------------------------------------------------------------------------------------
# EXAMPLE  9.9: RK order 3 formula for du/dx = 1-u(x) for step sizes 0.1 and 0.05
# ----------------------------------------------------------------------------------------------------------------------------------------------
# Exact solution to compare
F(x) := 1 - exp(-x)
N := 20
ORIGIN := 0
# argument values and tabulate evenly spaced grid in 1-D with step h
imax := N
i := 0 .. imax + 1
j := 0 .. imax
k := 0, 2 .. 20
h := 0.1
x[i] := i*h  # given initial value (IV)
u[0] := 0
# initial argument value
x[0] := 0
# exact value
F(x[0]) = 0
# RK order 3 parameters
w[1] := 1/4
w[2] := 3/8
w[3] := 3/8
a21 := 2/3
a31 := 0
a32 := 2/3
c[1] := 0
c[2] := a21
# define right hand side
f(u) := 1 - u
# check IV
f(u[0]) = 1
c[1] := 0
c[2] := a21
c[3] := a31 + a32
# Perform iteration loop over j=0,..,20 and store result in vector  RK_u on the grid
RK_u :=
    u[0] ← 0
    h ← 0.1
    for j ∈ 0 .. 20
        R1[j] ← h*f(u[j])
        R2[j] ← h*f(u[j] + a21*R1[j])
        R3[j] ← h*f(u[j] + a31*R1[j] + a32*R2[j])
        u[j + 1] ← u[j] + w[1]*R1[j] + w[2]*R2[j] + w[3]*R3[j]
        x[j + 1] ← (j + 1)*h
    u
# inspect the error at selected argument values
error[j + 1] := |F(x[j + 1]) - RK_u[j + 1]|
rel_err[j + 1] := error[j + 1]*(F(x[j + 1])^-1)
# RK estimate | exact value | absolute error | relative error
x[k] = [0; 0.2; 0.4; 0.6; 0.8; 1; 1.2; 1.4; 1.6; 1.8; 2]
RK_u[k] = [0; 0.181277; 0.329692; 0.451203; 0.550687; 0.632137; 0.698822; 0.753419; 0.798118; 0.834715; 0.864677]
F(x[k]) = [0; 0.181269; 0.32968; 0.451188; 0.550671; 0.632121; 0.698806; 0.753403; 0.798103; 0.834701; 0.864665]
error[k] = [0; 7.39197e-6; 1.2104e-5; 1.48648e-5; 1.6227e-5; 1.66068e-5; 1.63157e-5; 1.55845e-5; 1.45822e-5; 1.34312e-5; 1.22183e-5]
rel_err[k] = [0; 4.07789e-5; 3.67144e-5; 3.29459e-5; 2.94676e-5; 2.62716e-5; 2.3348e-5; 2.06855e-5; 1.82711e-5; 1.60911e-5; 1.41307e-5]
# [plot: error[j] vs x[j]]
# the error on a log scale grows as the argument increases then levels off
# Repeat for half the step size
RK_u :=
    u[0] ← 0
    h ← 0.05
    for j ∈ 0 .. 20
        R1[j] ← h*f(u[j])
        R2[j] ← h*f(u[j] + a21*R1[j])
        R3[j] ← h*f(u[j] + a31*R1[j] + a32*R2[j])
        u[j + 1] ← u[j] + w[1]*R1[j] + w[2]*R2[j] + w[3]*R3[j]
        x[j + 1] ← (j + 1)*h
    u
h := 0.05
x[i] := i*h
error[j + 1] := |F(x[j + 1]) - RK_u[j + 1]|
# Perform iteration loop over j=0,..,20 and store result in vector  RK_u on the grid
# inspect the error at selected argument values
rel_err[j + 1] := error[j + 1]*(F(x[j + 1])^-1)
# RK estimate | exact value | absolute error | relative error
x[k] = [0; 0.1; 0.2; 0.3; 0.4; 0.5; 0.6; 0.7; 0.8; 0.9; 1]
RK_u[k] = [0; 0.0951631; 0.18127; 0.259183; 0.329681; 0.393471; 0.45119; 0.503417; 0.550673; 0.593432; 0.632123]
F(x[k]) = [0; 0.0951626; 0.181269; 0.259182; 0.32968; 0.393469; 0.451188; 0.503415; 0.550671; 0.59343; 0.632121]
error[k] = [0; 4.90519e-7; 8.87679e-7; 1.20481e-6; 1.45354e-6; 1.64402e-6; 1.78508e-6; 1.88441e-6; 1.94867e-6; 1.98363e-6; 1.99429e-6]
rel_err[k] = [0; 5.15453e-6; 4.89702e-6; 4.6485e-6; 4.40894e-6; 4.17827e-6; 3.95641e-6; 3.74326e-6; 3.53872e-6; 3.34266e-6; 3.15493e-6]
# [plot: error[j] vs x[j]]
# compare the error on a log scale at half the step size h on the same interval [0,1]
# the the relative error at x=1 is more than 8 times smaller at half the step size
# ----------------------------------------------------------------------------------------------------------------------------------------------
